# AguaClara Water Treatment Plants -- 4 Communities
# Automated Design
# User Inputs:
HW_Sed := 2.4 m
# Design References
# [reference: UserInputs- 4 Communities.xmcd]
# [reference: DesignAssumptions- 4 Communities.xmcd]
# [reference: MathFunctions.xmcd]
# [reference: PipeDatabase.xmcd]
# [reference: MinorLossCoefficients.xmcd]
# [reference: FluidsFunctions.xmcd]
# Sed Tanks and Slopes:
# [reference: Sed. Inlet Slopes.xmcd]
N_SedTanks = 2
Q_Plant = 100.385 gal/min
H_SedBetween = 0.0762 m
HW_Sed = 2.4 m
L_Sed = 5.49318 m
H_SedPort = 0.101114 m
N_TrianglesperTank = 2
W_Sed = 1.0795 m
ND_SedPipeEntrance = 8 in
# Sedimentation Tank Sludge Drain:
# [reference: SludgeDrain.xmcd]
N_SedSludgeOrifices = 54
ND_SedSludge = 3 in
Q_SludgeDrainInitial = 948.782 L/min
D_SedSludgeOrifice = 0.1875 in
# Sedimentation Tank Dimensions:
# [reference: Sedimentation Dimensions.xmcd]
H_SedBottomSlope = 0.311625 m
H_SedTopSlope = 0.934874 m
H_SlopeRectangle = 0.1 m
Z_SedSlopes = 2.05865 m
H_Sed = 2.5 m
W_Sed = 1.0795 m
# Inlet Channel:
# [reference: Inlet Channel.xmcd]
W_InletChannel = 0.377904 m
L_Channel = 2.459 m
ND_SedPipeEntrance = 8 in
N_SedInletPipes = 2
H_InletChannel = 0.291351 m
Q_Plant = 100.385 gal/min
# Sedimentation Tank Effluent Launder:
# [reference: Launder.xmcd]
N_SedLaunderOrifices = 90
Q_SedLaunderOrifices = 1.05556 L/min
# Exit Channel:
# [reference: Exit Channel.xmcd]
W_ExitChannel = 0.377904 m
ND_SedLaunder = 4 in
H_ExitChannel = 0.291351 m
L_SedLaunder = 4.58737 m
L_ExitChannel = 2.459 m
D_SedLaunderOrifice = 0.25 in
H_PltWeir = 0.113566 m
Z_SedLaunder = 2.30285 m
HW_ExitChannel = 0.151351 m
ZW_ExitChannel = 2.36 m
# Lamella:
# [reference: Lamella.xmcd]
L_SedPlate = 0.128 m
B_SedPlate = 1.09327 cm
S_SedPlate = 0.793267 cm
N_SedPlates = 348
AN_SedPlate = 60 deg
V_SedC = 10.0171 m/day
V_SedUp = 46.1391 m/day
H_SedPlate = 0.110851 m
H_SedAbove = 0.1543 m
# Flow Controller:
# [reference: FCM.xmcd]
N_Fcm = 1
ID_FcmTube = 3.175 mm
ID_FcmTube = 0.125 in
L_FcmTube = 99.0625 cm
Q_FcmTubeMax = 285 mL/min
HL_FcmValve = 15.0907 cm
# Flocculator:
# [reference: Flocculation.xmcd]
W_FlocChannel = 0.53975 m
S_FlocBaffle = [0.0814312; 0.0974128; 0.129144; 0.234601] m
B_FlocBaffle = [0.0854312; 0.101413; 0.133144; 0.238601] m
N_FlocBafflesMin = 53
HL_Floc = 9.191 cm
X_FlocBaffles = [
    0.68975, 5.24358;
    0.775181, 5.00498;
    0.860612, 4.76638;
    0.946044, 4.52778;
    1.03147, 4.28918;
    1.11691, 4.05058;
    1.20234, 3.81197;
    1.28777, 3.57337;
    1.3732, 3.33477;
    1.45863, 3.09617
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] m
HW_FlocStart = 2.49191 m
L_FlocBaffles = [
    2.31857, 2.1654;
    2.41857, 2.2654;
    2.31857, 2.1654;
    2.41857, 2.2654;
    2.31857, 2.1654;
    2.41857, 2.2654;
    2.31857, 2.1654;
    2.41857, 2.2654;
    2.31857, 2.1654;
    2.41857, 2.2654
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] m
W_FlocPort = 0.234601 m
H_FlocPort = 0.53975 m
N_FlocBaffles = 60
Z_FlocBaffles = [
    0, 0;
    0.0814312, 0.234601;
    0, 0;
    0.0814312, 0.234601;
    0, 0;
    0.0814312, 0.234601;
    0, 0;
    0.0814312, 0.234601;
    0, 0;
    0.0814312, 0.234601
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] m
Gt_FlocMinFlow = 7960.07
N_FlocChannels = 2
# Entrance Tank:
# [reference: EntranceTank.xmcd]
ND_Lfom = 6 in
HL_Rm = 0.911511 cm
N_Lfom = 1
D_LfomOrifices = 19.05 mm
Q_LfomErrorMax = 1.3255 %
N_LfomOrifices = [5; 4; 2; 2; 2; 2; 1; 2; 1; 1]
L_Et = 1.5 m
W_Et = 0.75 m
HW_EtMin = 0.2 m
HW_EtMax = 0.4 m
H_Et = 2.89191 m
ZW_Et = 2.79191 m
# Any additional needed elevations should be calculated in the files above.
# Elevations:
ZW_ExitChannel = 2.36 m  # Water Level at the end of the plant in the exit channel and exit channel box
HW_Sed = 2.4 m
HW_FlocStart = 2.49191 m  # Water level at the beginning of the floc tank
HL_Floc = 9.191 cm  # just for ref. the head loss throught the floc tank
ZW_Et = 2.79191 m  # the height of the water in the entrance tank.
# AutoCAD References
# [reference: basics.xmcd]
# [reference: pipe.xmcd]
# [reference: tank.xmcd]
# [reference: lamina.xmcd]
# [reference: laminaplain.xmcd]
# [reference: cross.xmcd]
# [reference: Tee.xmcd]
# [reference: elbow.xmcd]
# [reference: Sludge.xmcd]
# [reference: Channel.xmcd]
# [reference: Manifold.xmcd]
# [reference: SedTankslopes.xmcd]
# [reference: Sed Tank Inlet Slope.xmcd]
# [reference: chemicalstock.xmcd]
# [reference: Sedimentation Tank.xmcd]
# [component: inputs SedTank]
# [reference: Flocculation Tank.xmcd]
# [component: inputs FlocTank]
# [reference: Entrance Tank.xmcd]
# [component: inputs EntranceTank]
