# AguaClara Water Treatment Plants
# Automated Design
# User Inputs:
HW_Sed := 2.55 m
# Design References
# [reference: UserInputs- Gracias.xmcd]
# [reference: DesignAssumptions- Gracias.xmcd]
# [reference: MathFunctions.xmcd]
# [reference: PipeDatabase.xmcd]
# [reference: MinorLossCoefficients.xmcd]
# [reference: FluidsFunctions.xmcd]
# Inlet Channel:
# [reference: Inlet Channel.xmcd]
W_InletChannel = 0.606267 m
L_Channel = 6.927 m
ND_SedPipeEntrance = 20 in
N_SedInletPipes = 4
H_InletChannel = 1.38893 m
Q_Plant = 800 gal/min
# Sedimentation Tanks:
# [reference: Sedimentation - Gracias.xmcd]
N_SedTanks = 3
H_SedBelowSlope = 1.03487 m
H_SedBetween = 0.0762 m
HW_Sed = 2.55 m
H_Sed = 2.65 m
H_SedBelow = 1.1714 m
L_Sed = 9.6182 m
ND_SedPipeEntrance = 20 in
# Sedimentation Tank Sludge Drain:
# [reference: SludgeDrain.xmcd]
N_SedSludgeOrifices = 96
ND_SedSludge = 6 in
Q_SludgeDrainInitial = 3530.17 L/min
D_SedSludgeOrifice = 0.3125 in
# Sedimentation Tank Inlet Slopes:
# [reference: Sed. Inlet Slopes- minV.xmcd]
B_SedInlet = 3.80249 cm
L_SedTopFilled = 0.211377 m
H_SedInlet = 11.1177 cm
W_SlopesFilled = 0.105688 m
L_SedBottomFilled = 0.137966 m
AN_SedTopInlet = 60 deg
L_SedTopInlet = 1.0795 m
AN_SedBottom = 40 deg
A_SedInletTotal = 1300.72 cm^2
A_SedInlet = 841.203 cm^2
H_SedTopSlope = 0.934874 m
A_SedInletActual = 833.509 cm^2
A_Inlet = 10693.3 cm^2
L_SedBottom = 0.704594 m
Z_SedSlopes = 1.20315 m
H_SedBottomSlope = 0.452904 m
L_SedTopInlet = 1.0795 m
W_SlopesOpen = 0.434062 m
# Sedimentation Tank Effluent Launder:
# [reference: Launder.xmcd]
N_SedLaunderOrifices = 164
Q_SedLaunderOrifices = 3.07757 L/min
# Exit Channel:
# [reference: Exit Channel.xmcd]
W_ExitChannel = 0.606267 m
ND_SedLaunder = 8 in
H_ExitChannel = 1.38893 m
L_SedLaunder = 8.25566 m
L_ExitChannel = 6.927 m
D_SedLaunderOrifice = 0.4375 in
H_PltWeir = 1.15396 m
Z_SedLaunder = 2.40046 m
HW_ExitChannel = 1.24893 m
ZW_ExitChannel = 2.51 m
# Lamella:
# [reference: Lamella.xmcd]
L_SedPlate = 0.925204 m
B_SedPlate = 5.09191 cm
S_SedPlate = 4.79191 cm
N_SedPlates = 131
AN_SedPlate = 60 deg
V_SedC = 10.0049 m/day
V_SedUp = 70 m/day
H_SedPlate = 0.801251 m
H_SedAbove = 0.259075 m
# Flow Controller:
# [reference: FCM.xmcd]
N_Fcm = 6
ID_FcmTube = 4.318 mm
ID_FcmTube = 0.17 in
L_FcmTube = 255.151 cm
Q_FcmTubeMax = 378.541 mL/min
HL_FcmValve = 26.6223 cm
# Flocculator:
# [reference: FlocculationGracias.xmcd]
W_FlocChannel = 2.159 m
S_FlocBaffle = [0.136556; 0.163356; 0.216567; 0.556371] m
B_FlocBaffle = [0.140556; 0.167356; 0.220567; 0.560371] m
N_FlocBafflesMin = 38
HL_Floc = 8.75493 cm
X_FlocBaffles = [
    0.140556, 9.04683;
    0.281112, 8.48645;
    0.421668, 7.92608;
    0.562224, 7.36571;
    0.70278, 6.80534;
    0.843336, 6.24497;
    0.983892, 5.6846;
    1.12445, 5.12423;
    1.265, 4.56386;
    1.43236, 4.00348
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] m
HW_FlocStart = 2.63755 m
L_FlocBaffles = [
    2.41344, 1.99363;
    2.51344, 2.09363;
    2.41344, 1.99363;
    2.51344, 2.09363;
    2.41344, 1.99363;
    2.51344, 2.09363;
    2.41344, 1.99363;
    2.51344, 2.09363;
    2.41344, 1.99363;
    2.48664, 2.09363
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] m
W_FlocPort = 0.556371 m
H_FlocPort = 2.159 m
N_FlocBaffles = 49
Z_FlocBaffles = [
    0, 0;
    0.136556, 0.556371;
    0, 0;
    0.136556, 0.556371;
    0, 0;
    0.136556, 0.556371;
    0, 0;
    0.136556, 0.556371;
    0, 0;
    0.163356, 0.556371
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] m
Gt_FlocMinFlow = 9175.74
N_FlocChannels = 2
# Entrance Tank:
# [reference: EntranceTank.xmcd]
ND_Lfom = 20 in
HL_Rm = 0.890191 cm
N_Lfom = 1
D_LfomOrifices = 52.3875 mm
Q_LfomErrorMax = 0.74575 %
N_LfomOrifices = [5; 4; 3; 2; 2; 2; 1; 2; 1; 1]
L_Et = 3 m
W_Et = 1.5 m
HW_EtMin = 0.2 m
HW_EtMax = 0.4 m
H_Et = 2.98755 m
ZW_Et = 2.88755 m
# Any additional needed elevations should be calculated in the files above.
# Elevations:
ZW_ExitChannel = 2.51 m  # Water Level at the end of the plant in the exit channel and exit channel box
HW_Sed = 2.55 m
HW_FlocStart = 2.63755 m  # Water level at the beginning of the floc tank
HL_Floc = 8.75493 cm  # just for ref. the head loss throught the floc tank
ZW_Et = 2.88755 m  # the height of the water in the entrance tank.
# AutoCAD References
# [reference: basics.xmcd]
# [reference: pipe.xmcd]
# [reference: tank.xmcd]
# [reference: lamina.xmcd]
# [reference: cross.xmcd]
# [reference: Tee.xmcd]
# [reference: elbow.xmcd]
# [reference: Sludge.xmcd]
# [reference: Channel.xmcd]
# [reference: Manifold.xmcd]
# [reference: SedTankslopes.xmcd]
# [reference: Sed Tank Inlet Slope.xmcd]
# [reference: chemicalstock.xmcd]
# [reference: Sedimentation Tank.xmcd]
# [component: inputs SedTank]
# [reference: Flocculation Tank.xmcd]
# [component: inputs FlocTank]
# [reference: Entrance Tank.xmcd]
# [component: inputs EntranceTank]
