# AguaClara Water Treatment Plants
# Automated Design
# References
# [reference: Channel design.xmcd]
# [reference: Chemical Feed.xmcd]
# [reference: Flocculation Function.xmcd]
# [reference: GritChamber.xmcd]
# [reference: Launder.xmcd]
# [reference: Plant Elevation Design.xmcd]
# [reference: plantleveltank.xmcd]
# [reference: Sedimentation Function.xmcd]
# [reference: Sludge Drain Design Program.xmcd]
# User Inputs:
# Engineer Entered Values: | Values used to Draw Plant:
tank_thick = 0.2
Q_plant = 0.00333333
lvltank_thick = 0.15
# sed tank parameters
stockplat_thick := lvltank_thick
beta = 0.523599
grit_thick := lvltank_thick
SedTank_width = 1  # Width of the lamella
platform_thick = 0.3
L_lamella = 0.9
# length of the lamella
channel_thick = 0.15
lamella_spacing = 0.05  # lamella spacing
walkway_width = 1
PipeSpecification = 9
DrillSeries = 0
Q_plant := Q_plant*m^3/sec = 200 L/min
tank_thick := tank_thick*m
beta := beta*rad = 30 deg
lvltank_thick := lvltank_thick*m
SedTank_width := SedTank_width*m
stockplat_thick := stockplat_thick*m
L_lamella := L_lamella*m
grit_thick := grit_thick*m
lamella_spacing := lamella_spacing*m = 5 cm
platform_thick := platform_thick*m
channel_thick := channel_thick*m
walkway_width := walkway_width*m
# Calls Functions Here:
# Chemical Feed Design
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Q_alum := ChemicalFeed(Q_plant) = 100 mL/min
# Channel Design
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Channel_dim := Channel(Q_plant, SedTank_width, tank_thick) = [3.4; 0.166464; 0.7] m
# Sedimentation Tank Design
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SedTank := SedTankDesign(Q_plant, SedTank_width, lamella_spacing, L_lamella, beta, Channel_dim) = [[1.41; 1; 2.12942], 13, 2.02942, 1.42942, 11.3711, 0.25, 0.711325]
# outputs:
[sedtank_dim/m, N_lamella, water_depth/m, z_plat/m, v_c*day/m, spaceabove/m]  # disabled
# Flocculator Design
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# The baffle positions are reported in the following way:
# There is one matrix for each channel. The first column is the x position
# of the baffle. The 2nd column is the starting y position of a baffle (ie top of the tank (0),
# or bottom of tank), the 3rd column is the final position of the baffle.
# Therefore a baffle at position x extends between the two y coordinates.
[floc_dim/m, baffle_spacing/m, tot_baffle, total_hl/m, uturnhole_dim/m, baffle_length/m, baffle_positions, Gθ_newmin, length_duetobaffles/m]  # disabled
Flocculator := flocculator(Q_plant, SedTank[:, 0][0]) = [[2.82; 0.5; 2.22296], [0.0560598; 0.0886383; 0.198201], 42, 0.0935344, [0.0410598; 1.07938], [1.94533; 1.89647; 1.73212], [[
    0.0560598, 2.22296, 0.277624;
    0.11212, 0, 1.94533;
    0.168179, 2.22296, 0.277624;
    0.224239, 0, 1.94533;
    0.280299, 2.22296, 0.277624;
    0.336359, 0, 1.94533;
    0.392418, 2.22296, 0.277624;
    0.448478, 0, 1.94533;
    0.504538, 2.22296, 0.277624;
    0.560598, 0, 1.94533;
    0.616657, 2.22296, 0.277624;
    0.672717, 0, 1.94533;
    0.728777, 2.22296, 0.277624;
    0.784837, 0, 1.94533;
    0.840896, 2.22296, 0.277624;
    0.896956, 0, 1.94533;
    0.953016, 2.22296, 0.277624;
    1.00908, 0, 1.94533;
    1.06514, 2.22296, 0.277624;
    1.1212, 0, 1.94533;
    1.17725, 2.22296, 0.277624;
    1.23331, 0, 1.94533;
    1.28937, 2.22296, 0.277624;
    1.34543, 0, 1.94533
], [
    1.35394, 2.22296, 0.277624;
    1.29788, 0, 1.94533;
    1.24182, 2.22296, 0.277624;
    1.18576, 0, 1.94533;
    1.1297, 2.22296, 0.277624;
    1.07364, 0, 1.94533;
    1.01758, 2.22296, 0.277624;
    0.961522, 0, 1.94533;
    0.905462, 2.22296, 0.277624;
    0.849402, 0, 1.94533;
    0.793343, 2.22296, 0.277624;
    0.737283, 0, 1.94533;
    0.681223, 2.22296, 0.277624;
    0.592585, 0, 1.89647;
    0.503947, 2.22296, 0.326492;
    0.415308, 0, 1.89647;
    0.32667, 2.22296, 0.326492;
    0.238032, 0, 1.89647
]], [[3398.67; 1377.84; -918.559], 4776.5], 3.99839]
# Grit Chamber Design
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Grit := gritchamber(Q_plant, PipeSpecification, DrillSeries, lamella_spacing, L_lamella, beta, Channel_dim, SedTank[:, 0][0]*m, SedTank[:, 2][0]*m, Flocculator[:, 3][0]*m) = [[1.08585; 0.9048; 0.665572], 2, [1; 4; 1; 1; 0; 1; 1; 0; 1; 1], 0.1016, [0.02]]
# Launderer Design
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Laund := Launder(Q_plant, PipeSpecification, SedTank[:, 0][0][0]*m, lamella_spacing, SedTank[:, 2][0]*m, SedTank[:, 5][0]*m, Channel_dim[1], SedTank[:, 0][0][1]*m, platform_thick, walkway_width) = [1.41, 0.0162459, 0.1, 1.90442, 0.00960969, 28, 0.00470769, 0.160172, 0.366523, 0.1524]
# Sludge Pipe Design
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SludgePipe := Sludge(Q_plant, PipeSpecification, SedTank[:, 0][0][0]*m, lamella_spacing, SedTank_width, SedTank[:, 2][0]*m) = [0.0508, 0.00507347, 0.1]
[D_sludgedrain/m, D_orifice/m, L_sludgeports/m]
# Plant Leveling Tank
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PLT := PlantLevelingTank(Q_plant, PipeSpecification, Laund[:, 4][0]*m, Laund[:, 6][0]*m)  # error: This program has no return value. You must account for all cases when using conditional statements in a Mathcad program.
# Plant Elevation Design
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Z_elevation := PlantElevations(Q_plant, Grit, Laund, SedTank, Q_alum, PLT[:, 2][0], PLT[:, 1][0], Flocculator[:, 3][0]*m, L_lamella, 10 cm)
# Constructing Tables of Parameters:
# Defining components of Output Arrays:
[sedtank_dim, N_lamella, water_depth, z_plat, v_c, spaceabove] := SedTank
[floc_dim, baffle_spacing, tot_baffle, floctotal_hl, uturnhole_dim, baffle_length, baffle_positions, Gθ_newmin, length_duetobaffles] := Flocculator
[SedPipe_length, D_laundOrf, laundOrf_dist, manifold_elevation, HL_laundertotal, n_laundOrf, h_laundOrf, offfloor_length, Pipe9_length, D_launder] := Laund
[waste_ind, D_sludgeOrf, sludgeOrf_dist] := SludgePipe
[lvltank_dim, D_weir, H_weir, HW_plantleveling] := PLT/m
[grit_dim, n_GritRisers, n_GritOrf, D_GritRiser, D_GritOrf] := Grit
# Defining components of Table Arrays:
headerrow := ["Parameter"; "Value"; "Units"]
Parameters := [
    "Number of lamella in sedimentation tanks", N_lamella, " ";
    "critical velocity in sed tank", v_c, " meter per day";
    "number of baffles in flocculator", tot_baffle, " ";
    "total headloss through flocculator", floctotal_hl*m/cm, "centimeters";
    "length of the sedimentation inlet launder", SedPipe_length, "meters";
    "diameter of orifices in the launder", D_laundOrf*m/in, "inches";
    "distance between orifices in the launder", laundOrf_dist, "meters";
    "manifold elevation", manifold_elevation, "meters";
    "diameter of the sedimentation inlet launder", D_launder*m/in, "inches";
    "number of orifices in the launder", n_laundOrf, " ";
    "diameter of sedimentation outlet sludge pipe", waste_ind*m/in, "inches";
    "diameter of orifices in sludge pipe", D_sludgeOrf*m/cm, "centimeters";
    "distance between orifices in sludge pipe", sludgeOrf_dist, "meters";
    "Diameter of weir in Plant Leveling Tank", D_weir*m/in, "inches";
    "Height of weir in PLT", H_weir*m/in, "inches";
    "Height of the Water in the PLT", HW_plantleveling, "meters";
    "number of risers in grit chamber", n_GritRisers, " ";
    "diameter of risers in grit chamber", D_GritRiser*m/in, "inches";
    "diameter of orifices in grit chamber", D_GritOrf*m/cm, "centimeters"
]
headercolumn
Units := Parameters[:, 2]
headercolumn := Parameters[:, 0]
Z := Parameters[:, 1]
table(headerrow, headercolumn, Z) :=
    for i ∈ 0 .. length(headercolumn)
        for j ∈ 0 .. last(headerrow)
            table[i, j] ← headerrow[j] if i == 0
            otherwise
                table[i, j] ← headercolumn[i - 1] if j == 0
                table[i, j] ← Z[i - 1] if j == 1
                table[i, j] ← Units[i - 1] if j == 2
    return table
headercolumn_Dim := [" Sedimentation Tank"; "Dimensions of Flocculator"; "Dimensions of Grit Chamber"; "Dimensions of Leveling Tank"; "Dimensions of Channel"]
headerrow_Dim := ["Component"; "Length"; "Width"; "Height"; "Units"]
Dim_y := [sedtank_dim[1]; floc_dim[1]; grit_dim[1]; lvltank_dim[1]; Channel_dim[1]/m]
Dim_z := [sedtank_dim[2]; floc_dim[1]; grit_dim[2]; lvltank_dim[2]; Channel_dim[2]/m]
Dim_x := [sedtank_dim[0]; floc_dim[0]; grit_dim[0]; lvltank_dim[0]; Channel_dim[0]/m]
Units2 := ["meter"; "meter"; "meter"; "meter"; "meter"]
tableDim(headerrow_Dim, headercolumn_Dim, Dim_x, Dim_y, Dim_z, Units2) :=
    for i ∈ 0 .. length(headercolumn_Dim)
        for j ∈ 0 .. last(headerrow_Dim)
            tableDim[i, j] ← headerrow_Dim[j] if i == 0
            otherwise
                tableDim[i, j] ← headercolumn_Dim[i - 1] if j == 0
                tableDim[i, j] ← Dim_x[i - 1] if j == 1
                tableDim[i, j] ← Dim_y[i - 1] if j == 2
                tableDim[i, j] ← Dim_z[i - 1] if j == 3
                tableDim[i, j] ← Units2[i - 1] if j == 4
    return tableDim
# Constructing Plant Elevation Tables:
headerrow_elevation := ["Element"; "Elevation from bottom of the sed tank (m)"; "Elevation from platform (m)"]
# top of alum stock tank
# port on alum stock tank
# bottom of alum stock tank
# alum platform height
# valve level in the FCM
# water level in the FCM
# end of the FCM tube at maximum alum dose
# grit chamber wall
# grit chamber maximum water level
# orifice elevation in the grit chamber
# horizontal pipe centerline where it leaves the grit chamber
# water level in rapid mix
# wall height for beginning of flocculator
# water level at beginning of flocculator
# wall height for the sedimentation tank
# water level in the sedimentation tank and channel
# top of the effluent launder
# top of the plate settlers
# bottom of the plate settlers
# platform height
# weir height
# level control water height
headercolumn_elevation := [
    "top of alum stock tank";
    "port on alum stock tank";
    "bottom of alum stock tank";
    "alum platform height";
    "valve level in the FCM";
    "water level in the FCM";
    "end of the FCM tube at maximum alum dose";
    "grit chamber wall";
    "grit chamber maximum water level";
    "orifice elevation in the grit chamber";
    "horizontal pipe centerline where it leaves the grit chamber";
    "water level in rapid mix";
    "wall height for beginning of flocculator";
    "water level at beginning of flocculator";
    "wall height for the sedimentation tank";
    "water level in the sedimentation tank and channel";
    "centerline of the effluent launder";
    "top of the plate settlers";
    "bottom of the plate settlers";
    "platform height";
    "weir height";
    "level control water height";
    "level control wall height"
]
tableElevation(headerrow_elevation, headercolumn_elevation, Z_elevation) :=
    for i ∈ 0 .. length(headercolumn_elevation)
        for j ∈ 0 .. last(headerrow_elevation)
            table[i, j] ← headerrow_elevation[j] if i == 0
            otherwise
                table[i, j] ← headercolumn_elevation[i - 1] if j == 0
                table[i, j] ← Z_elevation[i - 1] if j == 1
                table[i, j] ← Z_elevation[i - 1] - Z_elevation[22] if j == 2
    return table
# Tables:
# top
# [component: inputs table(headerrow, headercolumn, Z)]
# [component: inputs tableDim(headerrow_Dim, headercolumn_Dim, Dim_x, Dim_y, Dim_z, Units2)]
# [component: inputs tableElevation(headerrow_elevation, headercolumn_elevation, Z_elevation)]
# the negative sign here for alum platform height shows that the height chosen
# for the height of the chemical platform column is larger than
# that calculated based on the headloss through the FCM and
# Grit Chamber, so that from the platform the height of the platform
# is actually below the platform to make up for the shorter height needed
