# AguaClara Design Tool
Q_Plant := 50*L/s
method := "EtFlocSedFi"
Mod := 0
## References
# MathCAD dimension calculations:
# [reference: ExpertInputs.xmcd]
# [reference: MathFunctions.xmcd]
# [reference: PipeDatabase.xmcd]
# [reference: MaterialsDatabase.xmcd]
# [reference: FluidsFunctions.xmcd]
# [reference: SedTankFunctions.xmcd]
# [reference: CdcFunctions.xmcd]
# [reference: LfomFunctions.xmcd]
# [reference: SedimentationTank.xmcd]
# [reference: Flocculator.xmcd]
# [reference: LFOM.xmcd]
# [reference: EntranceTank.xmcd]
# [reference: StackedRapidSandFilter.xmcd]
# [reference: LinearCdc.xmcd]
# [reference: ChemStorageTanks.xmcd]
# AutoCAD drawing programs:
# Translators:
# These are the codes that take MathCAD outputs and create AutoCAD scripts that are used to draw the plant (formerly Basics)
# [reference: MtoATranslators.xmcd]
# The wrapped MtoA translator contains the functions that the user will want to access. These functions will draw pieces with full functionality - specifying the location, dimension, and orientation of the object. Also, it contains layer control and subtraction capabilities for grouped objects.
# [reference: MtoATranslatorsWrapped.xmcd]
# Drawing functions:
# [reference: ChannelF.xmcd]
# [reference: PlumbingF.xmcd]
# [reference: TankF.xmcd]
# [reference: StairsF.xmcd]
# [reference: DrainChannelF.xmcd]
# AutoCAD Script Files:
# [reference: FlocculatorAC.xmcd]
# [reference: SedimentationTankAC.xmcd]
# [reference: EntranceTankAC.xmcd]
# [reference: ChemStockTanksAC_tl428.xmcd]
# [reference: StackedRapidSandFilterAC.xmcd]
# [reference: CdcAC_tl428.xmcd]
# [reference: OperatorAccessAC.xmcd]
# [reference: MaterialsAC.xmcd]
# Materials List:
# [reference: MaterialsList.xmcd]
# Layouts:
# This file will execute at the very end to create multiple views of the entire plant in paperspace
# [reference: LayoutsAC.xmcd]
# Section Cuts:
# This file will create section cuts in paper space
## All variables displayed must have the standard SI units. They may not have units attached by the user.
# General
Q_Plant = 0.05 m^3/s
Pi_VenaContractaOrifice = 0.63
T_PlantWall = 0.15 m
W_SedPlate = 1.0668 m
T_ConcreteMin = 0.05 m
L_SedPlateSheet = 3 m
C_CoagStock = 200 kg/m^3
T_SedPlate = 0.002 m
Ti_CoagStock = 108000 s
T_SedWeir = 0.05 m
C_ChlorineStock = 15 kg/m^3
W_SedBay = 1.0668 m
Ti_ChlorineStock = 108000 s
HL_ChannelMax = 0.05 m  # Eliminate FCM variable from design specs
H_PlantFreeboard = 0.1 m
EN_DrillSeries = 0
W_HumanMin = 0.5 m
W_ChannelMin = 0.15 m
# Entrance Tank
# Tank
HW_Et = 1.38491 m
HW_EtMax = 1.5 m
H_Et = 1.48491 m
Z_EtTop = 2.53489 m
L_Et = 7.46587 m
Z_Et = 1.04998 m
ZW_Et = 2.43489 m
W_Et = 1.29056 m
H_EtTop = 0.45 m  # height of the top part of the entrance tank above the hoppers
# Hoppers
H_EtHopperBack = 0.688962 m
N_EtFullHopper = 2
H_EtHopper = 1.03491 m
Z_EtHopper = 2.08489 m  # elevation of top of slab.
T_EtHopperLedge = 0.15 m
L_EtHopper = 2.27142 m
AN_EtSlope = 0.785398
# Rapid Mix
# Drain Channel
ED_Tee =  # error: This variable is undefined.
ND_RMPipe = 0.3048 m
W_EtDC = 0.488138 m  # drain channel under entrance tank dimensions
# Drains
L_EtDC = 7.01345 m
ND_EtDrain = 0.0762 m
H_EtDC = 0.899976 m  # Give heights of the channel at the beginning and end and change the design specs to explain that it's sloped.
L_EtDrainStopper = 1.48091 m
# Flow measurement
ND_LfomPipe = 0.3048 m
HL_Flowmeasure = 0.35 m
Z_LfomOrifices = 2.10394 m  # elevation of the center of
HL_Lfom = 0.35 m
D_LfomOrifices = 0.0381 m
B_LfomRows = 0.0388889 m
N_LfomOrifices = [13; 3; 3; 4; 2; 3; 2; 2; 2]
H_LfomOrifices = [0.01905; 0.0579389; 0.0968278; 0.135717; 0.174606; 0.213494; 0.252383; 0.291272; 0.330161] m
# Trash Rack
B_EtRebar = 0.0390783 m
# Flow Control Valve | Other Parameters
# Overflow Weir
ND_EtFlowControl = 0.2032 m
V_EtUp = 0.00621938 m/s
W_EtOverflowSlot = 0.120716 m
Ti_Et = 262.752 s
ND_EtOverflowDrain = 0.2032 m
H_EtOverflowCutaway = 0.0201193 m
L_EtOverflowWeir = 2.47302 m
W_PlantDC = 1 m
# Maybe give the vertical distances below the bottom of the sed tank of the beginning and end of the channel? Calculate them, display, and add to the design specs.
H_PlantDC =  # error
L_PlantDC = 13.1682 m
H_HumanAccess = 1.5 m
# Plant Drain Channel
# Coag Dose Controller
# Coagulant | Chlorine
Z_CoagTank = 2.80259 m
C_CoagStockMax = 200 kg/m^3
C_ChlorineStockMax = 15 kg/m^3
Z_CoagTankOutlet = 2.90259 m
C_CoagDoseMax = 0.08 kg/m^3
C_ChlorineDoseMax = 0.002 kg/m^3
L_CdcFloatArm = 0.525318 m
N_CdcCoagTubes = 1
N_CdcChlorineTubes = 1
L_CdcScaleArm = 0.389082 m
L_CdcCoagTube = 5.68464 m
L_CdcChlorineTube = 5.60486 m
B_StockOutlet = 0.1 m
HL_CdcCoag = 0.2 m
HL_CdcChlorine = 0.1 m
Ti_CoagStock = 108000 s
Vol_CoagTank = 2500 L
Vol_ChlorineTank = 750 L
H_CoagTankAboveHeadTank = 0.3 m
D_CdcCoag = 0.0079375 m
K_CdcTube = 2
D_CdcChlorine = 0.00635 m
ND_EtFloat = 0.2032 m
Q_CoagStock = 2e-5 m^3/s
Q_ChlorineStock = 6.66667e-6 m^3/s
ND_CoagPiping = 0.0127 m
# Flocculator
# Tank
EN_FlocType :=
    "horizontal" if EN_FlocHoriz == 1
    "vertical" otherwise
EN_FlocType = "vertical"
H_Floc = 1.91658 m
HW_FlocEnd = 1.59916 m
HW_FlocStart = 1.81658 m
Z_FlocTank = 0 m
L_Floc = 8.12785 m
H_FlocPort = [1.41082; 1.41082] m
W_FlocChannel = 0.88 m
N_FlocChannels = 2
# Drains
ND_FlocValve = 0.1016 m
N_FlocValves = 1
H_FlocSlope = 0.05715 m
Ti_FlocDrain = 1800 s
# Parameters
ED_Floc = 0.01 m^2/s^3
CP_Floc = 75 m^(2/3)
Ti_Floc =  # error
G_Floc =  # error  # Look at Flocculator Positioning arrays
V_Floc = 0.182879 m/s
# Fill last channel with bafffles from last channel
ED_FlocMax =  # error  # Fix port width to be based on energy dissipation in that channel
# Adjust spacing after the number of baffles per channel is known.
ED_FlocAve =  # error
# Check the residence time of the flocculator should be at least 20minutes
HL_Floc = 0.217415 m
K_FlocBaffle = 2.5
CP_Floc = 75 m^(2/3)
# Baffles
S_FlocBaffle = [0.310687; 0.310687] m
B_FlocBaffle = [0.312687; 0.312687] m
N_FlocChannelBaffles = [25; 24]
W_FlocPort = [0.290687; 0.542699] m
L_FlocBaffleLower = 1.13313 m
L_FlocBaffleUpper = 1.40055 m
T_FlocBaffle = 0.002 m
S_FlocBaffleFirst = 0.310687 m
EN_FlocBaffle = 1
Z_FlocBaffles = [
    0, 0.46603;
    0.46603, 0;
    0, 0.46603;
    0.46603, 0;
    0, 0.46603;
    0.46603, 0;
    0, 0.46603;
    0.46603, 0;
    0, 0.46603;
    0.46603, 0;
    0, 0.46603;
    0.46603, 0;
    0, 0.46603;
    0.46603, 0;
    0, 0.46603;
    0.46603, 0;
    0, 0.46603;
    0.46603, 0;
    0, 0.46603;
    0.46603, 0;
    0, 0.46603;
    0.46603, 0;
    0, 0.46603;
    0.46603, 0;
    0, 0
] m
# Modules
ND_FlocModulesMain = 0.0127 m
ND_FlocModulesLarge = 0.0381 m
L_FlocModuleLong = [0.937377; 0.937377] m
L_FlocModuleShort = [0.307464; 0] m
ND_SpacerPipe = 0.01905 m
L_FlocModuleLongOuter = [0.62469; 0.62469] m
# Sed Tanks
# Tanks
N_SedTanks = 7
Q_SedBay =  # error
W_Sed = 1.0668 m  # Total tank wall height
HW_Sed = 1.59916 m
L_Sed = 8.12785 m
L_Sed = 8.12785 m  # Total tank length
N_SedBays =  # error
H_Sed = 1.70553 m
W_SedSideSlopes = 0.492633 m
L_SedActive =  # error
AN_SedSlope = 0.872665
# Floc Hopper
AN_SedHopperSlope = 0.785398
# Parameters
V_SedUpBod = 0.001 m/s  # design constraints
V_SedCBod = 0.00012 m/s
V_SedUp = 0.00100312 m/s  # Actual values from this design
Ti_Sed = 1323.91 s
# sludge drain
N_SedSludgeOrifices =  # error  # per cell
Ti_SludgeDrain = 1800 s  # Tank Drain time
W_SedSludge =  # error  # Width of the sludge channel
H_SedSludge =  # error  # Depth of the sludge channel
# Distance center to center between drain orifices
B_SedSludgeOrifices =  # error
W_SedDrainCover =  # error
D_SedSludgeOrifice =  # error  # Diameter of drain orifices
N_SedSludgeOrifices =  # error
ND_SedSludgePipe =  # error
Z_SedSludge =  # error  # Height from 0 of the top of the sludge drain
Z_SedSideSlopes = 0.542647 m
# inlet channel | exit channel
W_SedExitChannel = 0.486538 m
HW_SedInletChannel = 0.367962 m
H_SedExitChannel = 0.467962 m
W_SedInletChannel = 0.766559 m
EN_InletChannelGeom =  # error
HW_SedExitChannel = 0.321592 m
# water height in exit channel from base of channel
L_SedChannel = 8.5176 m
H_SedWeirExit = 0.300077 m
H_SedInletChannel = 0.467962 m
Z_SedChannelBottom = 1.19312 m
W_SedInletChannelPreWeir = 0.542699 m
HL_SedWeirInlet = 0.0215155 m
H_SedWeirInlet = 0.387962 m
W_SedWeirInlet = 8.5176 m
# launder
N_SedLaunderOrifices = 64  # Number of orifices per launder
ND_SedLaunder = 0.1524 m
D_SedLaunderOrifice = 0.015875 m
Z_SedLaunder = 1.40906 m
L_SedLaunder = 6.654 m
Q_SedLaunderOrifices =  # error
HL_SedLaunderOrifice = 0.040843 m
B_SedLaunderOrifices = 0.1 m  # Center to center launder spacing
# inlet manifold
ND_SedManifold = 0.2032 m
L_SedManifoldDiffuser = 0.15 m
Z_SedManifoldPipe = 0.236147 m
ND_SedDiffuser = 0.0254 m
D_SedManifoldPort =  # error
B_SedManifoldPort = 0.05 m
N_SedManifoldPorts = 109
L_SedManifoldPipe = 6.60602 m
ED_SedInlet = 0.136089 m^2/s^3
Q_SedManifoldPort = 6.55308e-5 m^3/s
# plate settlers
S_SedPlateMin = 0.025 m
L_SedPlate = 0.5 m
B_SedPlate = 0.027 m  # center to center distance between lamella
S_SedPlate = 0.025 m  # spacing between lamella
N_SedPlates = 207  # Number of Sed Plates per Sedimentation Tank Bay.
N_SedModules = 23  # Number of modules per bay
N_SedModulePlates =  # error  # Number of plates per module
AN_SedPlate = 1.0472
# SRSF
# tank
Porosity_Sand := ε_FiSand
T_FiWall = 0.25 m
N_FiLayer = 6
Q_Fi = 0.0125 m^3/s
Z_FiBottom = -2.97043 m
HL_FiTerminal = 0.455621 m
H_FiLayer = 0.2 m
H_Fi = 4.42936 m
D_FiSand60 = 0.000825 m
HL_FiBwInitiation = 1.42842 m
Z_FiTop = 1.45893 m
V_FiLayer = 0.00183333 m/s
L_Fi = 1.18239 m
N_Fi = 4
HL_FiBwSS = 1.22842 m
Porosity_Sand = 0.4
W_Fi = 1.18015 m
H_FiBottomLayer = 0.2 m
V_FiBw = 0.011 m/s
H_FiSand = 1.24083 m
# sand drain
# trunk lines
Ti_FiSand = 684.661 s  # This is the time required to empty the filter of the sand.
ND_FiTrunk = 0.1016 m
ND_FiBwTrunk = 0.2032 m
ND_FiSandOutlet = 0.0508 m
# siphon
ND_FiSiphonAirValve = 0.01905 m
Z_FiSiphonCoupling = 0.540054 m
ND_FiSiphon = 0.2032 m
Z_FiSiphonInlet = -1.15735 m
B_FiSiphonManOrifices = 0.118232 m
N_FiSiphonManOrifices = 8
D_FiSiphonManOrifices = 0.0508 m
# Waste and drain pipes
ND_FiExitWaste = 0.0762 m
# branches
N_FiSlotRows = 2
B_FiManifoldBranch = 0.1 m
ND_FiManBranch = 0.0254 m
ND_FiBwManBranch = 0.0381 m
B_FiManSlot = 0.0047625 m
B_FiBwManSlot = 0.0047625 m
# Inlet Channel
HL_FiInletChannel = 0.000919805 m
L_FiInletChannel = 4.977 m
Z_FiEntranceWeir = 1.31317 m
# Entrance Box
Z_FiEntranceBottom = 0.327756 m  # bottom of the entrance box
# Exit Box
Z_FiExitBottom = 0.327756 m  # bottom of the filtered water box
L_FiExit = 0.5 m
# Materials List
L_SedLaunder = 6.654 m
N_ValveCouplings =  # error
N_SedPlatesTotal =  # error
N_SedPlatesPerSheet = 6
N_SedPlateSheets =  # error
N_Valves =  # error
A_EtFloor = 12.3521 m^2
W_FlocWithWalls = 2.06 m
L_FlocWithWalls = 8.42785 m
Vol_FlocFloor = 2793.83 L
A_FlocFloor = 18.6255 m^2
A_SedFloor = 73.0492 m^2
# Plant Summary Calculations:
HL_PlantTotal := Z_EtTop - H_PlantFreeboard - Z_FiExitWeir
## Display AC variables
AC_EntranceTank =  # no stored result
AC_FlocTank =  # no stored result
AC_OperatorAccess =  # error
AC_SedTank =  # no stored result
AC_ChemTanks =  # error
AC_Filter =  # error
AC_Cdc = [
    "-layer m CdcLayer";
    "c t 0,0,0";
    "CdcLayer";
    "  ";
    "_box -7.90641,11.14587,2.54759 -7.90958,12.04587,2.57299";
    "_box -8.07467,11.14587,2.54759 -8.07785,12.04587,2.57299";
    "_cylinder -7.93858,11.20527,2.61589 0.01067 a -8.54858,11.20527,2.61589";
    "_cylinder -7.92858,11.20527,2.61589 0.00966 a -8.55858,11.20527,2.61589";
    "_zoom w -8.55858,11.1846,2.61589 -8.53858,11.22594,2.61589";
    "_subtract -8.54858,11.21594,2.61589  -8.55858,11.21493,2.61589 "
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]  # AC_MatApply
AI_EtFlocSedFiSed = [
    "-group c * y "; "all "; "-layer s 0"; "  "; "-layer f *"; "  "; "-layer t *Sed*"; "  "; "-layer s *Sed*"; "  "
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]
AI_EtFlocSedFi = [
    "laythw"; "_-view o t"; "-plot y "; "PublishToWeb PNG.pc3"; "User 1 (824.00 x 583.00 Pixels)"; "l n e F"; ""; " ."; "y  [FILEPATH]EtFlocSedFi_t"; "n y"
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]
AI_EtFlocSedFiFloc = [
    "-group c * y "; "all "; "-layer s 0"; "  "; "-layer f *"; "  "; "-layer t *Floc*"; "  "; "-layer s *Floc*"; "  "
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]
AI_EtFlocSedFiFilter = [
    "-group c * y "; "all "; "-layer s 0"; "  "; "-layer f *"; "  "; "-layer t Fi*"; "  "; "-layer s Fi*"; "  "
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]
# [component: inputs AC_SedTank]
