# Low Flow AguaClara Design Tool
Q_Plant := 3*L/s  # This file should only be used for plant flow rates between 1L/s and 3L/s!
method := "EtFlocSedFiLow"
## References
# MathCAD dimension calculations:
# [reference: ExpertInputs.xmcd]
# [reference: MathFunctions.xmcd]
# [reference: PipeDatabase.xmcd]
# [reference: MaterialsDatabase.xmcd]
# [reference: FluidsFunctions.xmcd]
# [reference: CdcFunctions.xmcd]
# [reference: SedimentationTankjem384.xmcd]
# [reference: Flocculator.xmcd]
# [reference: LFOM.xmcd]
# [reference: EntranceTank.xmcd]
# [reference: StackedRapidSandFilter.xmcd]
# [reference: LinearCdc.xmcd]
# [reference: ChemStorageTanks.xmcd]
# AutoCAD drawing programs:
# Translators:
# These are the codes that take MathCAD outputs and create AutoCAD scripts that are used to draw the plant (formerly Basics)
# [reference: MtoATranslators.xmcd]
# The wrapped MtoA translator contains the functions that the user will want to access. These functions will draw pieces with full functionality - specifying the location, dimension, and orientation of the object. Also, it contains layer control and subtraction capabilities for grouped objects.
# [reference: MtoATranslatorsWrapped.xmcd]
# Drawing functions:
# [reference: ChannelF.xmcd]
# [reference: PlumbingF.xmcd]
# [reference: TankF.xmcd]
# [reference: StairsF.xmcd]
# [reference: DrainChannelF.xmcd]
# AutoCAD Script Files:
# [reference: FlocculatorACLow.xmcd]
# [reference: SedimentationTankACLow_jem384.xmcd]
# [reference: EntranceTankACLow.xmcd]
# [reference: ChemStockTanksAC.xmcd]
# [reference: StackedRapidSandFilterAC.xmcd]
# [reference: CdcAC.xmcd]
# [reference: OperatorAccessAC.xmcd]
# [reference: MaterialsAC.xmcd]
# Materials List:
# [reference: MaterialsList.xmcd]
# Layouts:
# This file will execute at the very end to create multiple views of the entire plant in paperspace
# [reference: LayoutsAC.xmcd]
## All variables displayed must have the standard SI units. They may not have units attached by the user.
# General
Q_Plant = 0.003 m^3/s
Pi_VenaContractaOrifice = 0.63
T_PlantWall = 0.2 m
W_SedPlate = 1.0668 m
T_ConcreteMin = 0.05 m
L_SedPlateSheet = 3 m
C_CoagStock = 200 kg/m^3
T_SedPlate = 0.002 m
Ti_CoagStock = 108000 s
T_SedWeir = 0.04 m
C_ChlorStock =  # error: This variable is undefined.
W_SedBay = 1.0668 m
Ti_ChlorineStock = 108000 s
HL_ChannelMax = 0.05 m  # Eliminate FCM variable from design specs
H_PlantFreeboard = 0.1 m
EN_DrillSeries = 0
# Entrance Tank
V_EtUp = 0.00148383 m/s
W_EtCapture = 0.213895 m
H_EtOverflowChannel =  # error
H_Et = 0.65 m
H_EtTop = 0.3 m  # height of the top part of the entrance tank above the hoppers
W_Et = 1.1532 m
L_Et = 2.3048 m
ND_EtDrain = 0.0762 m
HL_Lfom = 0.2 m
ZW_Et = 2.26699 m
Z_EtTop = 2.36699 m
Z_Et = 1.71699 m  # elevation of top of slab.
ND_RMPipe = 0.1016 m
Z_EtHopper = 2.06699 m
H_EtHopper = 0.35 m
N_EtHoppers =  # error
ND_EtFlowControl = 0.0508 m
L_EtHopper = 0.9016 m
AN_EtSlope = 0.785398
W_EtDC = 0.3532 m  # drain channel under entrance tank dimensions
L_EtDC = 2.07621 m
H_EtDC = 0.141199 m  # Give heights of the channel at the beginning and end and change the design specs to explain that it's sloped.
# Flow measurement
D_LfomOrifices = 0.0127 m
S_LfomRows =  # error
H_LfomOrifice =  # error
Q_LfomScale =  # error
N_LfomOrifices = [7; 4; 2; 2; 2; 1; 2; 1; 2; 1]
ND_Lfom =  # error
HL_Lfom = 0.2 m
# Rapid Mix
ED_Tee = 0.127689 m^2/s^3
Z_LfomOrifices = 2.07334 m  # elevation of the center of
Z_EtExit =  # error  # elevation of center of pipe exiting the entrance tank and heading toward the flocculator
W_DC =  # error
# Maybe give the vertical distances below the bottom of the sed tank of the beginning and end of the channel? Calculate them, display, and add to the design specs.
H_DC =  # error
L_DC =  # error
# Plant Drain Channel
# Coag Dose Controller
Z_CoagTank = 2.63469 m
Z_CoagTankOutlet = 2.73469 m
L_CdcFloatArm = 0.41275 m
Q_CdcMax =  # error
L_CdcScaleArm = 0.50165 m
C_CoagDoseMax = 0.08 kg/m^3
B_StockOutlet = 0.1 m
L_CoagCdcTube =  # error
D_CdcTube = ƒ(any1, any1^-1 · any2^2 · Length^-2 · Mass · Time^-1, Length^-3 · Mass, any2, any3 · Length, any2^2 · any3 · Length^-1, Unitless, any3) → any2
N_CoagCdcTubes =  # error
HL_Cdc =  # error
L_CdcFloatArm = 0.41275 m
L_CdcScaleArm = 0.50165 m
# Flocculator
H_Floc = 1.98404 m
Z_FlocTank = 0 m  # Look at Flocculator Positioning arrays
N_FlocValves = 6
W_FlocChannel = 0.235316 m
Ti_Floc = 567.84 s  # Fill last channel with bafffles from last channel
H_FlocSlope = 0.0301625 m  # Fix port width to be based on energy dissipation in that channel
ED_Floc = 0.0105 m^2/s^3
# Adjust spacing after the number of baffles per channel is known.
V_Floc = 0.0678916 m/s  # Check the residence time of the flocculator should be at least 20minutes
HW_FlocEnd = 1.60086 m
ND_FlocValve = 0.0508 m
CP_Floc = 75 m^(2/3)
ED_FlocAve = 0.00447112 m^2/s^3
Ti_FlocDrain = 1800 s
CP_FlocTotal =  # error
ED_FlocMax = 0.00447112 m^2/s^3
N_FlocChannels = 11
G_Floc = 66.8664 1/s
W_Floc = 3.20427 m
HL_Floc = 0.258894 m
ED_FlocChannelFirst =  # error
HW_FlocStart = 1.88404 m
S_FlocBaffle = [0.1125; 0.1125; 0.1125; 0.1125; 0.1125; 0.1125; 0.1125; 0.1125; 0.1125; 0.1125; 0.1125] m
B_FlocBaffle = [0.1145; 0.1145; 0.1145; 0.1145; 0.1145; 0.1145; 0.1145; 0.1145; 0.1145; 0.1145; 0.1145] m
N_FlocChannelBaffles = [3; 3; 3; 3; 3; 3; 3; 3; 3; 3; 3]
W_FlocPort = [0.0925; 0.0925; 0.0925; 0.0925; 0.0925; 0.0925; 0.0925; 0.0925; 0.0925; 0.0925; 0.28415] m
S_FlocBaffleFirst = 0.1125 m
HL_FlocChannels =  # error
L_FlocBaffleLower = 1.51265 m
L_FlocBaffleUpper = 1.78635 m
H_FlocPort = [0.443254; 0.443254; 0.443254; 0.443254; 0.443254; 0.443254; 0.443254; 0.443254; 0.443254; 0.443254; 0.443254] m
Ti_Floc = 567.84 s  # residence time of the flocculator
N_FlocBaffles =  # error
ND_FlocValve = 2 in
EN_FlocBaffle = 1
# Sed Tanks
N_SedTanks = 1
L_Sed = 3.20427 m
N_SedBays = 1  # Number of bays of inlet manifolds in each sed tank
Q_SedBay = 0.003 m^3/s
V_SedUpBod = 0.001 m/s  # design constraints
V_SedCBod = 0.00012 m/s
V_SedUp = 0.000951894 m/s  # Actual values from this design
V_SedC =  # error
W_SedSideSlopes = 0.52505 m
AN_SedSlope = 0.872665
Ti_Sed = 1267.72 s
# Sedimentation Tank Sludge Drain:
N_SedSludgeOrifices = 27  # per cell
Ti_SludgeDrain = 1800 s  # Tank Drain time
W_SedSludge = 0.0693876 m  # Width of the sludge channel
H_SedSludge = 0.0693876 m  # Depth of the sludge channel
# Distance center to center between drain orifices
B_SedSludgeOrifices = 0.10502 m
W_SedDrainCover = 0.109388 m
D_SedSludgeOrifice = 0.0094774 m  # Diameter of drain orifices
N_SedSludgeOrifices = 27
ND_SedSludgePipe = 0.0762 m
# Sedimentation Tank Dimensions:
Z_SedSludge = 0.0693876 m  # Height from 0 of the top of the sludge drain
Z_SedSideSlopes = 0.761818 m
W_Sed = 1.0668 m  # Total tank wall height
L_Sed = 3.20427 m  # Total tank length
H_Sed = 1.72515 m
# Sedimentation Tank Inlet Channel:
EN_InletChannelGeom = 0
HW_SedInletChannel = 0.23176 m
W_SedInletChannel = 0.28415 m
L_SedChannel = 1.0668 m
H_SedInletChannel = 0.33176 m
HL_SedWeirInlet = 0.0318199 m
W_SedInletChannelPreWeir = 0.28415 m
H_SedWeirInlet = 0.19994 m
W_SedWeirInlet = 0.28415 m
# Sedimentation Tank Effluent Launder:
N_SedLaunderOrifices = 31  # Number of orifices per launder
N_SedLaunderOrificesRow =  # error  # Number of orifices per row
Z_SedLaunder = 1.56086 m
Q_SedLaunderOrifices = 9.67742e-5 m^3/s
B_SedLaunderOrifices = 0.1 m  # Center to center launder spacing
# More Launder Dimensions
ND_SedLaunder = 0.1016 m
D_SedLaunderOrifice = 0.015 m
L_SedLaunder = 3.28506 m
HL_SedLaunderOrifice = 0.038525 m
# Sedimentation Tank Inlet Manifold:
ND_SedManifold = 0.1524 m
L_SedManifoldDiffuser = 0.214442 m
Z_SedManifoldPipe = 0.427784 m
ND_SedDiffuser = 0.0254 m
D_SedManifoldPort = 0.028 m
B_SedManifoldPort = 0.05 m
N_SedManifoldPorts = 56
L_SedManifoldPipe = 2.77659 m
ED_SedInlet = 0.0105 m^2/s^3
Q_SedManifoldPort = 5.26316e-5 m^3/s
# Exit Channel:
W_SedExitChannel = 0.34 m
H_SedExitChannel = 0.33176 m
HW_SedExitChannel = 0.19176 m  # water height in exit channel from base of channel
H_SedWeirExit = 0.178587 m
# Lamella:
L_SedPlate = 0.5 m
B_SedPlate = 0.027 m  # center to center distance between lamella
S_SedPlate = 0.025 m  # spacing between lamella
N_SedPlates = 96  # Number of Sed Plates per Sedimentation Tank Bay.
N_SedModules = 12  # Number of modules per bay
N_SedModulePlates = 8  # Number of plates per module
AN_SedPlate = 1.0472
L_SedActive = 2.99067 m
Z_SedLaunder = 1.56086 m
HW_Sed = 1.60086 m
H_Sed = 1.72515 m
# SRSF
H_Fi = 4.3041 m
L_Fi = 0.582392 m
W_Fi = 0.582588 m
B_FiManifoldBranch = 0.1 m
ND_FiTrunk = 0.0508 m
ND_FiManBranch = 0.0254 m
ND_FiBwTrunk = 0.1016 m
ND_FiBwManBranch = 0.0381 m
ND_FiExitWaste = 0.0381 m
ND_FiBwWeirDrain =  # error
ND_FiBwDrain =  # error  # For the box that holds keeps the end of the siphon submerged
ND_FiSandOutlet = 0.0508 m
Ti_FiSand = 166.477 s  # This is the time required to empty the filter of the sand.
ND_FiSiphonAirValve = 0.0127 m
ND_FiSiphon = 0.0762 m
Q_FiSiphonMax =  # error
B_FiSiphonManOrifices = 0.120198 m
N_FiSiphonManOrifices = 4
D_FiSiphonManOrifices = 0.04445 m
Ti_FiBwInitiation =  # error
H_FiSand = 1.24083 m
N_FiLayer = 6
H_FiLayer = 0.2 m
V_FiLayer = 0.00183333 m/s
HL_FiTerminal = 0.455621 m
V_FiBw = 0.011 m/s
HL_FiBwInitiation = 1.42842 m
HL_FiBwSS = 1.22842 m
D_FiSand =  # error
N_Fi = 1
Q_Fi = 0.003 m^3/s
W_Slots =  # error
B_FiBwManSlot = 0.0047625 m
L_FiBwManSlot =  # error
B_FiManSlot = 0.0047625 m
L_FiManSlot =  # error
N_FiSlotRows = 2
Z_FiBottom = -2.68145 m
Z_FiTop = 1.62265 m
# Weirs
HL_FiWeir =  # error
L_FiWeir =  # error
Z_FiEntranceWeir = 1.50243 m
Z_FiBwWeir =  # error
Z_FiSiphonInlet = -0.868368 m  # This is the centerline elevation of the siphon orifices
Z_FiExitWeir =  # error
Z_FiExitBottom = 0.544572 m  # bottom of the filtered water box
Z_FiEntranceBottom = 0.544572 m  # bottom of the entrance box
Z_FiSiphonCoupling = 0.821707 m
Z_FiBwTop =  # error
W_FiBwDrain =  # error
H_FiBwDrain =  # error
N_Launders =  # error
L_LaunderPipeTotal =  # error
N_LaunderCouplings =  # error
N_ValveCouplings = 1
N_SedPlatesTotal = 96
N_SedPlatesPerSheet = 6
N_SedPlateSheets = 16
N_Valves = 1
A_EtFloor = 4.2011 m^2
W_FlocWithWalls = 4.78848 m
L_FlocWithWalls = 3.60427 m
Vol_FlocFloor = 3595.96 L
A_FlocFloor = 17.9798 m^2
Vol_SedSlopes =  # error
A_SedWalls =  # error
A_SedFloor = 5.28674 m^2
# Materials List
# Plant Summary Calculations:
HL_PlantTotal := Z_EtTop - H_PlantFreeboard - Z_FiExitWeir
HL_PlantTotal =  # error
## Display AC variables
AC_EntranceTank =  # no stored result
AC_FlocTank = [
    "-layer m FlocTankCon"; "c t 132,132,132"; "FlocTankCon"; "  "; "_-view o t _zoom w 0.21,1.0568,0 -0.66,4.68107,1.98404"; "_box 0,1.2668,0 -0.45,4.47107,1.98404 _box 0.2,1.0668,-0.2 -0.65,4.67107,1.98404"; "_subtract 0.2,1.0668,-0.2  0,1.2668,0 "; "_box 0.2,1.0668,-0.2 0.25,4.67107,1.98404"; "mirror3d all  yz -0.225,0 n  "; "_union all "
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]
AC_OperatorAccess =  # error
AC_SedTank =  # no stored result
AC_ChemTanks =  # no stored result
AC_Filter =  # no stored result
AC_ZZLayout := AC_Layout
AC_ZZMatApply
AC_Cdc = [
    "-layer m CdcLayer"; "c t 0,0,0"; "CdcLayer"; "  "; "-layer m CdcAll"; "c t 214,214,214"; "CdcAll"; "  "; "_box -3.40427,3.04427,2.36699 -3.38839,3.04224,2.41779"; "_box -3.40427,3.04427,2.36699 -3.38839,3.09507,2.36902"
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]
AC_ZZLayout =  # error
L_Sed = 3.20427 m
L_Floc = 0.45 m
TestPlantLow := stack(AC_EntranceTank, AC_FlocTank, AC_SedTank, AC_ChemTanks, AC_Cdc)
Q_Plant = 0.003 m^3/s
EntranceTank := AC_EntranceTank
# [component: inputs TestPlantLow]
# [component: inputs AC_EntranceTank]
