# Flocculator Modular Design
# info for testing:
# User Inputs
6*L/s
Q_Plant := □  # To be left undefined and inputed online by the user
3.9 m
method := "Flocculator"
L_Sed := □  # Length of the Flocculator, defined by user
1.7 m
HW_Sed := □  # Height of Flocculator, defined by user
1.6 m
Z_FlocBafflesMin := □
.3 m
W_FlocChannelOpening := □
1.4 m
Z_FlocChannelBottom := □
# From Expert Inputs
N_SedBays :=
    1 if Q_Plant ≤ 29*L/s
    2 otherwise
N_SedTanks :=
    1 if Q_Plant ≤ 3*L/s
    2 if Q_Plant ≤ 6*L/s and Q_Plant > 3*L/s
    3 if Q_Plant ≤ 58*L/s and Q_Plant > 6*L/s
    4 if Q_Plant ≤ 78*L/s and Q_Plant > 58*L/s
    5 if Q_Plant ≤ 97*L/s and Q_Plant > 78*L/s
    6 if Q_Plant ≤ 117*L/s and Q_Plant > 97*L/s
    7 if Q_Plant ≤ 136*L/s and Q_Plant > 117*L/s
    8 if Q_Plant ≤ 156*L/s and Q_Plant > 136*L/s
    9 if Q_Plant ≤ 175*L/s and Q_Plant > 156*L/s
    10 if Q_Plant ≤ 195*L/s and Q_Plant > 175*L/s
    11 if Q_Plant ≤ 214*L/s and Q_Plant > 195*L/s
# Redefined for this modular code!
ND_RMPipe :=
    (.102 m) if Q_Plant ≤ 4*L/s
    (.152 m) if Q_Plant ≤ 10*L/s and Q_Plant > 4*L/s
    (.203 m) if Q_Plant ≤ 17*L/s and Q_Plant > 10*L/s
    (.254 m) if Q_Plant ≤ 27*L/s and Q_Plant > 17*L/s
    (.305 m) if Q_Plant ≤ 38*L/s and Q_Plant > 27*L/s
    (.381 m) if Q_Plant ≤ 54*L/s and Q_Plant > 38*L/s
    (.508 m) if Q_Plant ≤ 96*L/s and Q_Plant > 54*L/s
    .61 m otherwise
W_Sed :=
    (1.067 m) if Q_Plant ≤ 29*L/s
    (2.134 m) otherwise
ND_SedManifold :=
    (6 in) if Q_Plant ≤ 9*L/s
    (8 in) otherwise
Q_PlantMaxLF := 5*L/s
Country := 0
Language := 0
# Tabulated Constants
E_Pvc := 0.12 mm
Nu_Water := 1*10^-6*m^2/s  # The kinematic viscosity of water.
Pi_Jet := 0.4
Pi_VenaContractaOrifice := 0.63
E_Concrete := 2 mm
# General Assumptions and Constants
T_PlantWall := 15 cm
W_HumanMin := 0.54 m
S_Fitting := 5 cm  # minimum space between fittings in a tank or fittings and the wall of the tank.
W_ChannelMin := 15 cm  # Minimum channel width for constructability
HL_ChannelMax := 5 cm
H_PlantFreeboard := 0.1*m
T_ConcreteMin := 5 cm
USD := ¤
Lem := USD/19.06
ND_SpacerPipe := 3/4*in
# Entrance Tank
L_FlocCouplingExt := 5 cm
T_RMOrificePlate := 2 cm
E_MaxRM := 1*W/kg
# Flocculator
Pi_JSOptimal := 3
Pi_JSMin := 2
ED_Floc := 10.5*mW/kg
# Increased from 6 to 10 on 7/14/2011 to compensate for increase in Pi.Jet from 0.38 (in flocculator) and 0.34 (in ports, pipes, channels) to a new value of 0.4.
Pi_FlocBaffleMin := 1
Pi_FlocBaffleMax := 1.5
# increased to 100 at the request of Dan and Sarah
CP_Floc := 75 m^(2/3)  # value decreased 1/26/12
T_FlocBaffleRigidH := 15 cm
T_FlocBaffleRigidV := 5 cm
H_FlocOption := 0
# The minor loss coefficient is 2. According to measurements at Agalteca and according to
# https://confluence.cornell.edu/display/AGUACLARA/PAHO+Water+Treatment+Publications (page 100 in chapter on flocculation)
K_FlocBaffle := 2.5
# Increased both to provide a safety margin on flocculator head loss and to simultaneously scale back on the actual collision potential we are trying to achieve.
Ti_FlocDrain := 30 min
S_FlocBaffleSetBackPlastic := 2 cm
ND_FlocModulesMain := 1/2*in
ND_FlocModulesLarge := 1.5 in
# Sedimentation Tank
B_SedLaunderOrificesEst := 10 cm
ED_SedInlet := ED_Floc
T_SedWeir := 4 cm
HL_SedLaunderBod := 4 cm
V_SedUpBod := 1*mm/s
W_SedPlate := 42 in
W_SedBay := W_SedPlate
W_Plastic := W_SedPlate
T_SedPlate := 0.2 cm
Pi_QLaunderOrifices := 0.80
HL_SedWeirMax := 5 cm
Perpendicular_Weir := 0
Parallel_Weir := 1
L_SedLaunderCapExcess := 3 cm
S_SedPlateMin := 2.5 cm
AN_SedPlate := 60 deg
L_SedPlateCantilevered := 20 cm
# Stacked Rapid Sand Filter
HL_FiEntrancePipeMax := 10 cm
# Minor Loss Coefficients
# Individual K Values
K_PipeExit := 1
K_PipeEnt := 0.5
K_El90 := 0.9
K_GateValve := 0.39
K_Exp := 1
# Wall Thicknesses
T_ChannelWall := T_PlantWall
# Operator Access
W_DCWalkway := 1 m
# Design References
# [reference: MathFunctions.xmcd]
# [reference: PipeDatabase.xmcd]
# [reference: FluidsFunctions.xmcd]
# From Flocculator Design Code
Floc_Origin := [0 m; 0 m; 0 m]
# Redefined for this modular code!
Plant_Origin[0] := Floc_Origin[0]
Plant_Origin[1] := Floc_Origin[1] - N_SedTanks*(W_Sed + T_PlantWall) = -2.434 m
W_SedInletChannelPreWeir := .5 m  # This is temporary, need to fix!
# [reference: FlocculatorMod.xmcd]
# From Flocculator Drawing Code
# [reference: MtoATranslators.xmcd]
# [reference: MtoATranslatorsWrapped.xmcd]
# [reference: PlumbingF.xmcd]
# [reference: TankF.xmcd]
Plant_Origin[2] := Floc_Origin[2] - Z_FlocTank  # Redefined for this modular code!
# [reference: FlocculatorACMod.xmcd]
AC_FlocTank :=
    stack(FlocTankScript, FlocTankBaffleScriptH, FlocTankDrainCouplingScript, FlocTankDrainPipeScript, FlocTankDrainAdapterScript, FlocTankDrainValveScript, FlocRMScript) if EN_FlocHoriz == 1 and N_FlocChannels ≤ 2
    stack(FlocTankScript, FlocTankBaffleScriptH, FlocTankDrainCouplingScript, FlocTankDrainPipeScript, FlocTankDrainAdapterScript, FlocTankDrainValveScript, FlocDrainArray, FlocRMScript) if EN_FlocHoriz == 1 and N_FlocChannels > 2
    stack(FlocTankScript, FlocTankBaffleScriptV, FlocModules, FlocTankDrainCouplingScript, FlocTankDrainPipeScript, FlocTankDrainAdapterScript, FlocTankDrainValveScript, FlocRMScript) if EN_FlocHoriz == 0 and N_FlocChannels ≤ 2
    stack(FlocTankScript, FlocTankBaffleScriptV, FlocModules, FlocTankDrainCouplingScript, FlocTankDrainPipeScript, FlocTankDrainAdapterScript, FlocTankDrainValveScript, FlocDrainArray, FlocRMScript) otherwise
# Display Variables
EN_FlocType :=
    "horizontal" if EN_FlocHoriz == 1
    "vertical" otherwise
L_Sed =  # error: This variable is undefined.
HW_Sed =  # error
Q_Plant =  # error
Z_FlocBafflesMin =  # error
W_FlocChannelOpening =  # error
Z_FlocChannelBottom =  # error
# Tank
H_Floc =  # error
HW_FlocEnd =  # error
HW_FlocStart =  # error
Z_FlocTank =  # error
L_Floc =  # error
H_FlocPort =  # error
W_FlocChannel =  # error
N_FlocChannels =  # error
# Drains
ND_FlocValve =  # error
N_FlocValves =  # error
H_FlocSlope =  # error
Ti_FlocDrain = 1800 s
# Parameters
ED_Floc = 0.0105 m^2/s^3
CP_Floc = 75 m^(2/3)
Ti_Floc =  # error
G_Floc =  # error  # Look at Flocculator Positioning arrays
V_Floc =  # error
# Fill last channel with bafffles from last channel
ED_FlocMax =  # error  # Fix port width to be based on energy dissipation in that channel
# Adjust spacing after the number of baffles per channel is known.
ED_FlocAve =  # error
# Check the residence time of the flocculator should be at least 20minutes
HL_Floc =  # error
K_FlocBaffle = 2.5
CP_Floc = 75 m^(2/3)
# Baffles
S_FlocBaffle =  # error
B_FlocBaffle =  # error
N_FlocChannelBaffles =  # error
W_FlocPort =  # error
L_FlocBaffleLower =  # error
L_FlocBaffleUpper =  # error
T_FlocBaffle =  # error
S_FlocBaffleFirst =  # error
EN_FlocBaffle =  # error
Z_FlocBaffles =  # error
# Modules
ND_FlocModulesMain = 0.0127 m
ND_FlocModulesLarge = 0.0381 m
L_FlocModuleLong =  # error
L_FlocModuleShort =  # error
ND_SpacerPipe =  # error
L_FlocModuleLongOuter =  # error
AC_FlocTank =  # error
# Previews
# [reference: LayoutsAC.xmcd]
AI_FlocTank = [
    "laythw"; "_-view o t"; "-plot y "; "PublishToWeb PNG.pc3"; "VGA (640.00 x 480.00 Pixels)"; "l n e F"; ""; " ."; "y  [FILEPATH]Flocculator_t"; "n y"
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]
