# AguaClara Design Tool
Country =  # error: This variable is undefined.
Language =  # error
Country := 0
C_ChlorineDoseMax := 2*mg/L
C_ChlorineStock := 50*gm/L
Ti_ChlorineStock := 30 hr
# Design References
# MathCAD dimension calculations:
# [reference: BasicClientInputs.xmcd]
# [reference: BasicInputs.xmcd]
# [reference: ExpertInputs.xmcd]
# [reference: DesignAssumptions.xmcd]
# [reference: MathFunctions.xmcd]
# [reference: PipeDatabase.xmcd]
# [reference: MinorLossCoefficients.xmcd]
# [reference: FluidsFunctions.xmcd]
# [reference: Sedimentation Tank.xmcd]
# [reference: Flocculator.xmcd]
# [reference: LFOM.xmcd]
# [reference: EntranceTankDim.xmcd]
# [reference: LinearCdc_app37.xmcd]
# [reference: ChemStorageCylinders.xmcd]
# [reference: Stacked Rapid Sand Filter.xmcd]
# [reference: Materials List.xmcd]
# AutoCAD drawing programs:
# Translators:
# These are the codes that take MathCAD outputs and create AutoCAD scripts that are used to draw the plant (formerly Basics)
# [reference: MtoATranslators.xmcd]
# The wrapped MtoA translator contains the functions that the user will want to access. These functions will draw pieces with full functionality - specifying the location, dimension, and orientation of the object. Also, it contains layer control and subtraction capabilities for grouped objects.
# [reference: MtoATranslators Wrapped.xmcd]
# Plant Elements:
# These are all of the files that draw the fundamental parts of the plants (tees, elbows, tanks, pipes, etc)
# [reference: Channel.xmcd]
# [reference: cross.xmcd]
# [reference: Sludge.xmcd]
# [reference: Manifold.xmcd]
# [reference: pipe.xmcd]
# [reference: elbow.xmcd]
# [reference: tank.xmcd]
# [reference: adapter.xmcd]
# [reference: Tee.xmcd]
# [reference: pvccap.xmcd]
# [reference: LaunderCap.xmcd]
# [reference: ChimneyStops.xmcd]
# [reference: laminaplain.xmcd]
# [reference: Stairs.xmcd]
# [reference: DrainChannel.xmcd]
# [reference: Manifold.xmcd]
# Specific Pieces:
# These are the codes that draw the bigger pieces of the plant (the sed tank, floc tank, etc)
# [reference: floctank.xmcd]
# [reference: SedTank- with pieces.xmcd]
# [reference: Entrance Tank.xmcd]
# [reference: Plant Drain Channel.xmcd]
# [reference: ChemStockCylinders.xmcd]
# [reference: SRSF.xmcd]
# [reference: Operator Access.xmcd]
# Layouts:
# This file will execute at the very end to create multiple views of the entire plant in paperspace
# [reference: Layouts.xmcd]
## All variables displayed must have the standard SI units. They may not have units attached by the user.
# General:
Q_Plant = 0.012 m^3/s
T_PlantWall = 0.15 m
W_SedPlate = 1.08 m
T_ConcreteMin = 0.05 m
L_SedPlateSheet = 3.658 m
C_CoagStock = 120 kg/m^3
T_SedPlate = 0.002 m
Ti_CoagStock = 108000 s
T_SedWeir = 0.05 m
C_ChlorineStock = 50 kg/m^3
W_SedBay = 1.08 m
Ti_ChlorineStock = 108000 s
EN_FcmTube = 0
H_PlantFreeboard = 0.1 m
EN_DrillSeries = 1
# Entrance Tank
V_EtUp = 0.008 m/s
H_Et = 1.70186 m
W_Et = 0.54 m
L_Et = 3.74146 m
ZW_Et = 2.157 m
Z_EtTop = 2.257 m
Z_Et = 0.55514 m  # elevation of top of slab.
Z_EtHopper = 1.957 m
N_EtHoppers = 2
# Flow measurement
V_LfomExit = 0.840585 m/s
Π_LfomSafety = 1.5
D_LfomOrifices = 0.019 m
D_LfomMin = 6.5008 in
S_LfomRows = 0.02 m
H_LfomOrifice = [0.0095; 0.0295; 0.0495; 0.0695; 0.0895; 0.1095; 0.1295; 0.1495; 0.1695; 0.1895] m
N_LfomOrifices = [13; 5; 4; 3; 3; 3; 2; 3; 2; 2]
ND_Lfom = 0.2032 m
# Rapid Mix
ED_Tee = 0.0559814 m^2/s^3
Z_LfomOrifices = 1.957 m  # elevation of the center of
Z_EtExit = 1.5382 m  # elevation of center of pipe exiting the entrance tank and heading toward the flocculator
# Sed Tanks and Slopes:
N_SedTanks = 4
H_SedBetween = 0 m  # Distance from the top of the inlet manifold to the bottom of the ledge supporting the lamella frame
L_Sed = 3.50731 m
N_SedBays = 1  # Number of bays of inlet manifolds in each sed tank
# Length of the port through which water exits the inlet manifold
# Width of ferrous cement plates in whice one manifold port is cut
Q_SedBay = 0.003 m^3/s
ND_FlocValve = 2 in
V_SedCBod = 0.00012 m/s
V_SedUpBod = 0.0008 m/s
W_SedSlope = 0.416818 m
AN_SedSlope = 1.0472
H_SedBayDivider = 0.820132 m
# Sedimentation Tank Sludge Drain:
N_SedSludgeOrifices = 35  # per cell
Ti_SludgeDrain = 1800 s  # Tank Drain time
W_SedSludge = 0.0963644 m  # Width of the sludge channel
B_SedSludgeOrifices = 0.1 m  # Distance center to center between drain orifices
H_SedSludge = 0.0481822 m  # Depth of the sludge channel
T_SedSludge = 0.05 m
T_SedSludge = 0.05 m
# Thickness of the plate topping the sludge channel
# through which drain holes are formed
W_SedDrainCover = 0.196364 m
D_SedSludgeOrifice = 0.011 m  # Diameter of drain orifices
W_SedInletBottom = 0.441818 m
N_SedSludgeOrifices = 35
ND_SedSludgeValve = 0.0508 m
# Sedimentation Tank Dimensions:
Z_SedSludge = 0.0981822 m  # Height from 0 of the top of the sludge drain
Z_SedSlopes = 0.820132 m  # Height from 0 of the top of the inlet manifold
W_Sed = 1.08 m  # Total tank wall height
L_Sed = 3.50731 m  # Total tank length
H_Sed = 1.75242 m
# Sedimentation Tank Inlet Channel:
HW_InletChannel = 0.255898 m
W_InletChannel = 0.405898 m
L_Channel = 5.07 m
N_SedInletPipes = 1  # per sed bay
H_InletChannel = 0.355898 m
HL_SedWeirInlet = 0.0117426 m
W_SedInletchannelPreweir = 0.255898 m
H_SedWeirInlet = 0.244155 m
# Sedimentation Tank Effluent Launder:
N_SedLaunderOrifices = 44  # Number of orifices per launder
Z_SedLaunder = 1.54353 m
Q_SedLaunderOrifices = 7.12816e-5 m^3/s  # More Launder Dimensions
L_SedLaunder = 2.39027 m
ND_SedLaunder = 0.1016 m
B_SedLaunderOrifices = 0.102122 m  # Center to center launder spacing
D_SedLaunderOrifice = 0.013 m
# Sedimentation Tank Inlet Manifold:
ND_SedManifold = 0.1524 m
L_Diffuser = 0.176174 m
Z_SedManifoldLift = 0.264262 m
D_Diffuser = 0.0381 m
D_SedManifoldPort = 0.036 m
B_SedManifoldPort = 0.1 m
N_SedManifoldPorts = 29
L_SedManifoldPipe = 3.37937 m
S_SedManifoldBetween = 0.009 m
# Exit Channel:
W_ExitChannel = 0.3532 m
H_ExitChannel = 0.355898 m
L_ExitChannel = 5.07 m
H_PltWeir = 0.265898 m  # height of the weir carrying water to the distribution tank
HW_ExitChannel = 0.215898 m  # water height in exit channel from 0
# Lamella:
L_SedPlate = 0.609667 m
N_SedModules = 7
B_SedPlate = 0.0287774 m  # center to center distance between lamella
N_SedModulePlates = 10
S_SedPlate = 0.0267774 m  # spacing between lamella
N_SedPlates = 70  # Number of Sed Plates per Sedimentation Tank Bay.
AN_SedPlate = 1.0472
V_SedC = 0.00011819 m/s
L_SedActive = 2.32605 m
V_SedUp = 0.000791996 m/s
Z_SedLaunder = 1.54353 m
H_SedPlate = 0.527987 m
H_SedAbove = 0.166043 m  # Height of water needed above the lamella
HW_Sed = 1.65242 m
H_Sed = 1.75242 m
Z_Mp = 1.39652 m
H_SedBayDivider = 0.820132 m
# Flocculator: | Look at Flocculator Positioning arrays
H_Floc = 1.92009 m
Z_FlocTank = 0 m
N_FlocValves = 3
W_FlocChannel = 0.54 m
Ti_Floc = 1304 s  # Fill last channel with bafffles from last channel
H_FlocSlope = 0.0301625 m  # Fix port width to be based on energy dissipation in that channel
ED_Floc = 0.006 m^2/s^3
# Adjust spacing after the number of baffles per channel is known.
V_Floc = 0.129602 m/s  # Check the residence time of the flocculator should be at least 20minutes
HW_FlocEnd = 1.65242 m
ND_FlocValve = 0.0508 m
CP_Floc = 100 m^(2/3)
Ti_FlocDrain = 1800 s
CP_FlocTotal = 119.625 m^(2/3)
N_FlocChannels = 5
L_FlocTank = 17.5366 m
HL_Floc = 0.167664 m
HW_FlocStart = 1.82009 m
S_FlocBaffle = [0.171466; 0.171466; 0.171466; 0.171466; 0.176703] m
B_FlocBaffle = [0.173466; 0.173466; 0.173466; 0.173466; 0.178703] m
N_FlocChannelBaffles = [19; 19; 19; 19; 18]
W_FlocPort = [0.171466; 0.171466; 0.171466; 0.171466; 0.182701] m
HL_FlocChannels = [0.0342554; 0.0342554; 0.0342554; 0.0342554; 0.0306422] m
L_FlocBaffleLower = 1.39522 m
L_FlocBaffleUpper = 1.61289 m
H_FlocPort = [0.54; 0.54; 0.54; 0.54; 0.522273] m
Ti_Floc = 1304 s  # residence time of the flocculator
N_FlocBaffles = 94
# Entrance Tank:
Z_Et = 0.55514 m  # elevation of the entrance tank
H_EtTop = 0.2 m  # height of the top part of the entrance tank above the hoppers
H_Et = 1.70186 m
L_Et = 3.74146 m
W_Et = 0.54 m
N_EtHoppers = 2
AN_EtSlope = 1.0472
ND_EtDrain = 0.0762 m
ND_EtOverflow = 0.2032 m
ND_RMPipe = 0.2032 m
H_EtHopper = 1.40186 m
L_EtHopper = 1.82033 m
# Chem Dose Controller:
Z_CoagTank = 2.557 m
D_CdcTubeDesign =  # error
L_CdcFloatArm = 0.41275 m
L_CdcScaleArm = 0.50165 m
# Materials List:
N_Launders = 4
L_LaunderPipeTotal = 9.56109 m
N_LaunderCouplings = 4
N_ValveCouplings = 4
N_SedPlatesTotal = 280
N_SedPlatesPerSheet = 6
N_SedPlateSheets = 47
N_Valves = 4
AC_SedTankA :=
    AC_SedTank if last(AC_SedTank) < 598
    submatrix(AC_SedTank, 0, 598, 0, 0) otherwise
AC_FilterA :=
    AC_Filter if last(AC_Filter) < 598
    submatrix(AC_Filter, 0, 598, 0, 0) otherwise
AC_SedTankB :=
    submatrix(AC_SedTank, 599, last(AC_SedTank), 0, 0) if last(AC_SedTank) < 1197
    submatrix(AC_SedTank, 599, 1197, 0, 0) otherwise
AC_FilterB :=
    submatrix(AC_Filter, 599, last(AC_Filter), 0, 0) if last(AC_Filter) < 1197
    submatrix(AC_Filter, 599, 1197, 0, 0) otherwise
AC_SedTankC :=
    submatrix(AC_SedTank, 1198, last(AC_SedTank), 0, 0) if last(AC_SedTank) < 1796
    submatrix(AC_SedTank, 1198, 1796, 0, 0) otherwise
AC_FilterC :=
    submatrix(AC_Filter, 1198, last(AC_Filter), 0, 0) if last(AC_Filter) < 1796
    submatrix(AC_Filter, 1198, 1796, 0, 0) otherwise
AC_ChemTanksA :=
    AC_ChemTanks if last(AC_ChemTanks) < 598
    submatrix(AC_ChemTanks, 0, 598, 0, 0) otherwise
AC_FlocTankA :=
    AC_FlocTank if last(AC_FlocTank) < 598
    submatrix(AC_FlocTank, 0, 598, 0, 0) otherwise
AC_ChemTanksB :=
    submatrix(AC_ChemTanks, 1198, last(AC_ChemTanks), 0, 0) if last(AC_ChemTanks) < 1197
    submatrix(AC_ChemTanks, 1198, 1796, 0, 0) otherwise
AC_FlocTankB :=
    submatrix(AC_FlocTank, 599, last(AC_Filter), 0, 0) if last(AC_Filter) < 1197
    submatrix(AC_FlocTank, 599, 1197, 0, 0) otherwise
AC_ChemTanksC :=
    submatrix(AC_ChemTanks, 1198, last(AC_ChemTanks), 0, 0) if last(AC_ChemTanks) < 1796
    submatrix(AC_ChemTanks, 1198, 1796, 0, 0) otherwise
AC_FlocTankC :=
    submatrix(AC_FlocTank, 1198, last(AC_FlocTank), 0, 0) if last(AC_FlocTank) < 1796
    submatrix(AC_FlocTank, 1198, 1796, 0, 0) otherwise
AC_DrainChannelA :=
    AC_DrainChannel if last(AC_DrainChannel) < 598
    submatrix(AC_DrainChannel, 0, 598, 0, 0) otherwise
AC_EntranceTankA :=
    AC_EntranceTank if last(AC_EntranceTank) < 598
    submatrix(AC_EntranceTank, 0, 598, 0, 0) otherwise
AC_DrainChannelB :=
    submatrix(AC_DrainChannel, 1198, last(AC_DrainChannel), 0, 0) if last(AC_DrainChannel) < 1197
    submatrix(AC_DrainChannel, 1198, 1796, 0, 0) otherwise
AC_EntranceTankB :=
    submatrix(AC_EntranceTank, 599, last(AC_EntranceTank), 0, 0) if last(AC_EntranceTank) < 1197
    submatrix(AC_EntranceTank, 599, 1197, 0, 0) otherwise
AC_DrainChannelC :=
    submatrix(AC_DrainChannel, 1198, last(AC_DrainChannel), 0, 0) if last(AC_DrainChannel) < 1796
    submatrix(AC_DrainChannel, 1198, 1796, 0, 0) otherwise
AC_EntranceTankC :=
    submatrix(AC_EntranceTank, 1198, last(AC_EntranceTank), 0, 0) if last(AC_EntranceTank) < 1796
    submatrix(AC_EntranceTank, 1198, 1796, 0, 0) otherwise
AC_LayoutA :=
    AC_Layout if last(AC_Layout) < 598
    submatrix(AC_Layout, 0, 598, 0, 0) otherwise
AC_OperatorAccessA :=
    AC_OperatorAccess if last(AC_OperatorAccess) < 598
    submatrix(AC_OperatorAccess, 0, 598, 0, 0) otherwise
AC_OperatorAccessB :=
    submatrix(AC_OperatorAccess, 599, last(AC_OperatorAccess), 0, 0) if last(AC_OperatorAccess) < 1197
    submatrix(AC_OperatorAccess, 599, 1197, 0, 0) otherwise
AC_LayoutB :=
    submatrix(AC_Layout, 1198, last(AC_Layout), 0, 0) if last(AC_Layout) < 1197
    submatrix(AC_Layout, 1198, 1796, 0, 0) otherwise
AC_OperatorAccessC :=
    submatrix(AC_OperatorAccess, 1198, last(AC_OperatorAccess), 0, 0) if last(AC_OperatorAccess) < 1796
    submatrix(AC_OperatorAccess, 1198, 1796, 0, 0) otherwise
AC_LayoutC :=
    submatrix(AC_Layout, 1198, last(AC_Layout), 0, 0) if last(AC_Layout) < 1796
    submatrix(AC_Layout, 1198, 1796, 0, 0) otherwise
AC_EntranceTankA = [
    "-layer m Cdc"; "c t 129,0,129"; "Cdc"; "  "; "-insert CdcLeverArm.dwg"; "-3.61366,10.8328,2.2819 1 1 0"; "-insert CdcLeverArmBracket.dwg"; "-3.58166,10.42005,2.257 1 1 0"; "-insert CdcCht.dwg"; "-4.34386,10.33595,2.3747 1 1 0"
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]
AC_EntranceTankB =  # error
AC_EntranceTankC =  # error
AC_FlocTankA = [
    "-layer m FlocTank"; "c t 132,132,132"; "FlocTank"; "  "; "_-view o t _zoom w 0.16,4.76,0 -3.66731,8.38,1.92009 _box 0,4.92,0 -3.50731,8.22,1.92009 _box 0.15,4.77,-0.15 -3.65731,8.37,1.92009 _subtract 0.15,4.77,-0.15  0,4.92,0 "; "_box -3.65731,5.46,0 0.15,5.61,1.92009"; "-array l  R 4 1 0.69"; "-group c FlocTank y "; "all "; "-layer s 0"
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]
AC_FlocTankB =  # error
AC_FlocTankC =  # error
AC_OperatorAccessA =  # error
AC_OperatorAccessB =  # error
AC_OperatorAccessC =  # error
AC_SedTankA = [
    "_-view o t";
    "-layer m tank";
    "c t 132,132,132";
    "tank";
    "  ";
    "_-view o t _zoom w 0.16,-0.16,0 -3.66731,1.24,1.75242 _box 0,0,0 -3.50731,1.08,1.75242 _box 0.15,-0.15,-0.15 -3.65731,1.23,1.75242 _subtract 0.15,-0.15,-0.15  0,0,0 ";
    "_box -2.95142,0,1.47923 -2.90142,1.08,1.42923";
    "_box 0,0,0.36351 -0.05,1.08,0.31351";
    "_box -3.50731,0,1.39652 -3.10142,1.08,1.24652";
    "_box -3.10142,0,1.24652 -2.95142,1.08,1.75242"
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]
AC_SedTankB = [
    "_cylinder 0.54,1.54353,-0.28097 0.06429 0.00714"; "_union all "; "-group c laundercouplingcap y "; "all "; "-layer s 0"; "  "; "-layer f laundercouplingcap"; "  "; "-layer m launderorificecap"; "c t 0,255,0"
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]
AC_SedTankC =  # error
AC_FilterA =  # error
AC_FilterB =  # error
AC_FilterC =  # error
AC_ChemTanksA =  # error
AC_ChemTanksB =  # error
AC_ChemTanksC =  # error
AC_DrainChannelA = [
    "-layer m DrainChannel"; "c t 214,214,214"; "DrainChannel"; "  "; "3dpoly"; "0.3,-1.125,-0.2024"; "0.3,-1.125,-0.27507"; "0.3,-0.725,-0.49775"; "0.3,-0.325,-0.27507"; "0.3,-0.325,-0.2024"
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]
AC_DrainChannelB =  # error
AC_DrainChannelC =  # error
# AC_LayoutA | AC_LayoutB | AC_LayoutC
