# [reference: ExpertInputs.xmcd]
# [reference: MathFunctions.xmcd]
# [reference: PipeDatabase.xmcd]
# [reference: MaterialsDatabase.xmcd]
# [reference: FluidsFunctions.xmcd]
# [reference: CdcFunctions.xmcd]
# [reference: SedimentationTankjem384.xmcd]
# [reference: Flocculator.xmcd]
# [reference: LFOM.xmcd]
# [reference: EntranceTank.xmcd]
# [reference: StackedRapidSandFilter.xmcd]
# [reference: LinearCdc.xmcd]
# [reference: ChemStorageTanks.xmcd]
# AutoCAD drawing programs:
# Translators:
# These are the codes that take MathCAD outputs and create AutoCAD scripts that are used to draw the plant (formerly Basics)
# [reference: MtoATranslators.xmcd]
# The wrapped MtoA translator contains the functions that the user will want to access. These functions will draw pieces with full functionality - specifying the location, dimension, and orientation of the object. Also, it contains layer control and subtraction capabilities for grouped objects.
# [reference: MtoATranslatorsWrapped.xmcd]
# Drawing functions:
# [reference: ChannelF.xmcd]
# [reference: PlumbingF.xmcd]
# [reference: TankF.xmcd]
# [reference: StairsF.xmcd]
# [reference: DrainChannelF.xmcd]
# AutoCAD Script Files:
# [reference: FlocculatorACLow.xmcd]
# [reference: SedimentationTankACLow_jem384.xmcd]
# [reference: EntranceTankACLow.xmcd]
# [reference: ChemStockTanksAC.xmcd]
# Low Flow Stacked Rapid Sand Filter
L_FiManIntMain := 8.5 in
ND_FiManIntMain := 1 in
ND_FiManIntBranch := .5 in
L_FiManIntBranchSm := 4 in
L_FiManIntBranchLg := 5 in
S_FiManIntBranch := 3 in
L_FiManIntBranchStart := 1.75 in
# Manifold Branches
LayerMan := layer_new("FiManIntPlu", blue3)
FiManIntMain := PipeF([0 m; 0 m; 0 m], L_FiManIntMain, [-90; 0]*deg, ND_FiManIntMain, PS_FiBranch)
FreezeFiManLayer := FreezeLayer("FiManIntPlu")
LayerBranch := layer_new("FiManBranchPlu", blue3)
FiManIntBranch := PipeF([0 m; -L_FiManIntBranchStart; 0 m], L_FiManIntBranchSm, [0; 0]*deg, ND_FiManIntBranch, PS_FiBranch)
MirrorSmBranch := MirrorLast([L_FiManIntBranchStart; 0 m], [L_FiManIntBranchStart + zc; 0 m], "Y")
ArraySmBranch := array_all(2, 1, 2*S_FiManIntBranch)
FreezeFiBranchLayer := FreezeLayer("FiManBranchPlu")
FiManInt := stack(LayerMan, FiManIntMain, FreezeFiManLayer, LayerBranch, FiManIntBranch, MirrorSmBranch, ArraySmBranch, FreezeFiBranchLayer)
# [component: inputs FiManInt]
FiManBranchSlot := BoxF(Fi_origin + [
    outerradius(ND_FiManBranch);
    B_FiManSlot/2;
    outerradius(ND_FiBwManBranch) + H_FiBottomLayer + H_FiManCenterToSlot
], Fi_origin + [
    -outerradius(ND_FiManBranch);
    B_FiManSlot/2 + W_FiManSlots;
    outerradius(ND_FiBwManBranch) + H_FiBottomLayer + outerradius(ND_FiManBranch)
], [0; 0; 0]*deg)
MirrorFiManBranchSlot := MirrorLast([Fi_origin[1] + 0 m; Fi_origin[2] + outerradius(ND_FiBwManBranch) + H_FiBottomLayer], [Fi_origin[1] + zc; Fi_origin[2] + outerradius(ND_FiBwManBranch) + H_FiBottomLayer], "N")
ArrayFiManBranchSlot := array_all(N_FiManSlotsPerRow, 1, B_FiManSlot)
SubtractFiManSlots := SubtractF(["FiManBranchPlu"], "DeleteMe")
SelectFiManBranch := SelectLayer("FiManBranchPlu")
ArrayFiMan := array_all(N_FiLayer, 1, H_FiLayer)
# Do not stack unless you are drawing only the slotted pipes. The slots make the 3D model unmanagable.
FiBranchScriptSlots := stack(LayerMan, FiManBranch, FreezeFiManLayer, FiManBranchSlot, view("r"), MirrorFiManBranchSlot, view("t"), ArrayFiManBranchSlot, GroupDelete, SubtractFiManSlots, SelectFiManBranch, BrepAll, view("f"), ArrayFiMan, view("t"))
FiBranchScript := stack(LayerMan, FiManBranch, view("f"), ArrayFiMan, view("t"))
BwManBranch := PipeF(Fi_origin + [
    -L_FiManFerncoCoupling - B_FiManifoldBranch/2;
    S_FiManAssembly + ConRadius(ND_FiBwBranchHolder) + outerradius(ND_FiBwBranchHolder) - L_FiManBranchExt;
    outerradius(ND_FiBwManBranch)
], L_FiBwManBranch, [-90; 0]*deg, ND_FiBwManBranch, PS_FiBranch)
FiBwManBranchSlot := BoxF(Fi_origin + [
    -L_FiManFerncoCoupling - B_FiManifoldBranch/2 - outerradius(ND_FiBwManBranch);
    S_FiManAssembly + ConRadius(ND_FiBwBranchHolder) + outerradius(ND_FiBwBranchHolder) + B_FiBwManSlot/2;
    outerradius(ND_FiBwManBranch) + H_FiBwManCenterToSlot
], Fi_origin + [
    -L_FiManFerncoCoupling - B_FiManifoldBranch/2 + outerradius(ND_FiBwManBranch);
    S_FiManAssembly + ConRadius(ND_FiBwBranchHolder) + outerradius(ND_FiBwBranchHolder) + B_FiBwManSlot/2 + W_FiManSlots;
    outerdiameter(ND_FiBwManBranch)
], [0; 0; 0]*deg)
ArrayFiBwManBranchSlot := ArrayLast(N_FiBwManSlotsPerRow, 1, B_FiBwManSlot)
MirrorFiManBranches := Mirror3dAll("zx", [Fi_origin[0]; Fi_origin[1] + W_Fi/2], "n")
ArrayManBranches := array_all(1, N_FiManBranch/2, -B_FiManifoldBranch)
# Do not stack unless you are drawing only the slotted pipes. The slots make the 3D model unmanagable.
FiBwBranchScriptSlots := stack(BwManBranch, FreezeFiManLayer, FiBwManBranchSlot, ArrayFiBwManBranchSlot, GroupDelete, SubtractFiManSlots, SelectFiManBranch, BrepAll, ArrayManBranches, MirrorFiManBranches, FreezeFiManLayer)
FiBwBranchScript := stack(BwManBranch, ArrayManBranches, MirrorFiManBranches, FreezeFiManLayer)
FiManBranchScript := stack(FiBranchScript, FiBwBranchScript)
FiManifoldScript := stack(FiManWallScript, FiTrunkReceiverScript, FiManBranchScript)
