# [reference: MasterProgram.xmcd]
# [reference: Stacked Rapid Samd Filtration jcw57.xmcd]
N_Fi := 2
FilterInletTank_origin := [
    Plant_Origin[0];
    Plant_Origin[1] - T_PlantWall - W_ExitChannel;
    Plant_Origin[2] + H_Sed - H_ExitChannel
] = [0; -0.523167; 1.38183] m
FiEntranceBox_dim := [L_FiEntrance; W_FiEntrance; H_FiEntrance]
FiEntranceBox_origin := [
    Plant_Origin[0] - W_ExitChannel - 2*T_PlantWall;
    Plant_Origin[1] - W_FiEntrance - T_PlantWall;
    Z_FiEntranceBottom
]
FiExitBox_dim := [L_FiExit; W_FiExit; H_FiExit]
FiExitBox_origin := [
    Plant_Origin[0] - W_ExitChannel - 4*T_PlantWall - L_FiEntrance;
    Plant_Origin[1] - W_FiExit - T_PlantWall;
    Z_FiExitBottom
]
FiEnclosureTank_origin := [Plant_Origin[0] - W_ExitChannel - 2*T_PlantWall; Plant_Origin[1] - 2*W_Fi; 0]
Dist_Fi := .5 m  # Arbitrary variable of distance between filter boxes
Filterinletchannelscript :=
    layer2 ← layer_new("Filter Inlet Channel", ltgrey)
    channel1 ← ChannelDrawing([Plant_Origin[0] - W_ExitChannel; 0; Plant_Origin[2] + H_Sed - H_ExitChannel], [W_FiEntrance + W_FiExit + Dist_Fi + 4*T_PlantWall; W_ExitChannel; H_ExitChannel], T_ChannelWall)
    rotate1 ← rotate([Plant_Origin[0] - W_ExitChannel; 0; Plant_Origin[2] + H_Sed - H_ExitChannel], 270)
    bigunion ← union_allA
    layerset ← layer_set("0")
    layerfreeze2 ← layer_freeze("Filter Inlet Channel")
    one ← stack(layer2, channel1, rotate1, bigunion, layerset, layerfreeze2)
    return ← one
Fiexitboxscript :=
    layernewfob ← layer_new("SRSF exit boxes", ltgrey)
    tankbw ← Tank(FiExitBox_origin, FiExitBox_dim, T_PlantWall)
    tankbw2 ← Tank([FiExitBox_origin[0]; FiExitBox_origin[1] - W_FiExit - 2*T_PlantWall - Dist_Fi; FiExitBox_origin[2]], FiExitBox_dim, T_PlantWall)
    layerset ← layer_set("0")
    layerfreezefob ← layer_freeze("SRSF exit boxes")
    one ← stack(layernewfob, tankbw, tankbw2, layerset, layerfreezefob)
    return one
Fiinletboxscript :=
    layernewfilt ← layer_new("SRSF inlet boxes", ltgrey)
    tankfilt ← Tank(FiEntranceBox_origin, FiEntranceBox_dim, T_PlantWall)
    tankfilt2 ← Tank([
        FiEntranceBox_origin[0];
        FiEntranceBox_origin[1] - W_FiEntrance - 2*T_PlantWall - Dist_Fi;
        FiEntranceBox_origin[2]
    ], FiEntranceBox_dim, T_PlantWall)
    layerset ← layer_set("0")
    layerfreezefilt ← layer_freeze("SRSF inlet boxes")
    one ← stack(layernewfilt, tankfilt, tankfilt2, layerset, layerfreezefilt)
    return one
Fibackwash :=
    layernewfibw ← layer_new("SRSF backwash", ltgrey)
    tankfibw ← Tank([
        Plant_Origin[0] - 3*W_ExitChannel - 6*T_PlantWall;
        FilterInletTank_origin[1] - W_ExitChannel - 2*T_PlantWall;
        0
    ], [echanneltank_dim[0]; W_ExitChannel; echanneltank_dim[2]], T_PlantWall)
    channel1 ← ChannelDrawing([
        Plant_Origin[0] - 2*W_ExitChannel - 4*T_PlantWall;
        FilterInletTank_origin[1] - W_ExitChannel - 2*T_PlantWall;
        0
    ], [((N_Fi*2*T_PlantWall) + ((N_Fi + 1)*W_ExitChannel)) + 2*T_PlantWall; W_ExitChannel; H_ExitChannel], T_ChannelWall)
    rotate1 ← rotate([Plant_Origin[0] - W_ExitChannel; 0; 0], 180)
    layerset ← layer_set("0")
    layerfreezefibw ← layer_freeze("SRSF backwash")
    one ← stack(layernewfibw, tankfibw, channel1, rotate1, layerset, layerfreezefibw)
    return one
AC_Filter := stack(Filterinletchannelscript, Fiexitboxscript, Fiinletboxscript, Fibackwash)
# [component: inputs AC_Filter]
