# Origin Points
# This can be removed when added to MP
GroupDelete := GroupAll("DeleteMe")
# Entrance Exit Filter
Fi_origin := [
    Plant_Origin[0] - W_SedExitChannelPostWeir - 3*T_PlantWall - T_FiWall - L_FiEntrance - L_FiExit - W_MpWalkway;
    min(Plant_Origin[1] - T_FiWall - W_Fi, Plant_Origin[1] - 2*T_PlantWall - W_FiEntrance - W_FiOverflow/2 + T_FiWall/2);
    Z_FiBottom
]
FiEntranceBox_origin := [
    Plant_Origin[0] - W_SedExitChannelPostWeir - T_PlantWall;
    Fi_origin[1] - T_FiWall/2 + W_FiOverflow/2 + T_PlantWall;
    Z_FiEntranceBottom
]
FiExitBox_origin := [
    Plant_Origin[0] - W_SedExitChannelPostWeir - 2*T_PlantWall - L_FiEntrance;
    Fi_origin[1] - T_FiWall/2 + W_FiOverflow/2 + T_PlantWall;
    Z_FiExitBottom
]
# Manifolds
FiManTee_Origin := Fi_origin + [
    -3/2*B_FiManifoldBranch;
    ConRadius(ND_FiManBranch) + ShortTeeLength(ND_FiManBranch);
    H_FiLayer + ConRadius(ND_FiBwManBranch)
]
BwManTee_Origin := Fi_origin + [
    -3/2*B_FiManifoldBranch;
    ConRadius(ND_FiBwManBranch) + ShortTeeLength(ND_FiBwManBranch);
    ConRadius(ND_FiBwManBranch)
]
# Couplings
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# This will be the pipe layout in the entrance and exit boxes to allow for 2 90 degree elbows in  Pipes 2 and 3 coming from the entrance box (on the right)
FiBwInletCoupling_origin := [
    FiEntranceBox_origin[0] - T_ConcreteMin - ConRadius(ND_FiBwTrunk);
    FiEntranceBox_origin[1] + W_FiEntrance - ConRadius(ND_FiBwTrunk);
    FiEntranceBox_origin[2] - CouplingLength(ND_FiBwTrunk) + SocketDepth(ND_FiBwTrunk)
]
FiInletCoupling1_origin := [
    FiEntranceBox_origin[0] - L_FiEntrance + T_ConcreteMin + ConRadius(ND_FiTrunk);
    FiEntranceBox_origin[1] + W_FiEntrance - ConRadius(ND_FiBwTrunk);
    FiEntranceBox_origin[2] - CouplingLength(ND_FiTrunk) + SocketDepth(ND_FiTrunk)
]
FiInletCoupling2_origin := [
    FiEntranceBox_origin[0] - T_ConcreteMin - ConRadius(ND_FiBwTrunk);
    FiEntranceBox_origin[1] + 2*T_ConcreteMin + 3*ConRadius(ND_FiTrunk);
    FiEntranceBox_origin[2] - CouplingLength(ND_FiTrunk) + SocketDepth(ND_FiTrunk)
]
FiInletCoupling3_origin := [
    FiEntranceBox_origin[0] - L_FiEntrance + T_ConcreteMin + ConRadius(ND_FiTrunk);
    FiEntranceBox_origin[1] + 2*T_ConcreteMin + 3*ConRadius(ND_FiTrunk);
    FiEntranceBox_origin[2] - CouplingLength(ND_FiTrunk) + SocketDepth(ND_FiTrunk)
]
FiExitCoupling0_origin := [
    FiExitBox_origin[0] - T_ConcreteMin - ConRadius(ND_FiTrunk);
    FiExitBox_origin[1] + W_FiExit - ConRadius(ND_FiBwTrunk);
    FiExitBox_origin[2] - CouplingLength(ND_FiTrunk) + SocketDepth(ND_FiTrunk)
]
FiExitCoupling1_origin := [
    (FiExitBox_origin[0] - L_FiExit + T_ConcreteMin) + ConRadius(ND_FiTrunk);
    FiExitBox_origin[1] + W_FiExit - ConRadius(ND_FiBwTrunk);
    FiExitBox_origin[2] - CouplingLength(ND_FiTrunk) + SocketDepth(ND_FiTrunk)
]
FiExitCoupling2_origin := [
    FiExitBox_origin[0] - T_ConcreteMin - ConRadius(ND_FiTrunk);
    FiExitBox_origin[1] + T_ConcreteMin + ConRadius(ND_FiTrunk);
    FiExitBox_origin[2] - CouplingLength(ND_FiTrunk) + SocketDepth(ND_FiTrunk)
]
FiExitCoupling3_origin := [
    (FiExitBox_origin[0] - L_FiExit + T_ConcreteMin) + ConRadius(ND_FiExitWaste);
    FiExitBox_origin[1] + T_ConcreteMin + ConRadius(ND_FiExitWaste);
    FiExitBox_origin[2] - CouplingLength(ND_FiExitWaste) + SocketDepth(ND_FiExitWaste)
]
FiBwDrainCoupling_origin := [
    Fi_origin[0] + T_PlantWall + T_FiWall + L_FiBw + L_FiBwWeirDrain/2;
    Fi_origin[1] - T_FiWall/2;
    Z_FiBwWeirDrainBottom - CouplingLength(ND_FiBwWeirDrain) + SocketDepth(ND_FiBwWeirDrain)
]
FiTankBwCoulping_origin := [
    Fi_origin[0] + CouplingLength(ND_FiBwTrunk) - SocketDepth(ND_FiBwTrunk);
    FiBwInletCoupling_origin[1];
    Fi_origin[2] + ConRadius(ND_FiBwManBranch)
]
FiTankCoulpings_origin := [
    Fi_origin[0] + CouplingLength(ND_FiTrunk) - SocketDepth(ND_FiTrunk);
    FiTankBwCoulping_origin[1];
    FiTankBwCoulping_origin[2] + H_FiLayer
]
# Weirs
FiEntranceWeir_origin := [FiEntranceBox_origin[0] + T_PlantWall; FiEntranceBox_origin[1]; Z_FiEntranceWeir]
# Dimension Points
FiEntranceBox_dim := [L_FiEntrance; W_FiEntrance; H_FiEntrance]
FiExitBox_dim := [L_FiExit; W_FiExit; H_FiExit]
Fi_dim := [L_Fi; W_Fi; H_Fi]
FiEntranceWeir_dim := [-T_PlantWall; W_FiEntrance; Z_SedWeirExit - Z_FiEntranceWeir]
# Script Variables
# Inlet Channel
LayerFiInletChannel := layer_new("FiInletchannelCon", ltgrey)
# The H.Sed-Z.SedWeirExit term can come out once we are not setting the top of the filter at Z=0
FiInletChannel := ChannelDrawing([
    Plant_Origin[0] - W_SedExitChannelPostWeir;
    Plant_Origin[1];
    Plant_Origin[2] + H_Sed - H_SedExitChannel - (H_Sed - Z_SedWeirExit)
], [
    max((W_Fi + T_FiWall)*N_Fi, (2*W_FiEntrance + W_FiOverflow + 4*T_PlantWall)*ceil(N_Fi/2) - T_PlantWall + (W_Fi - W_FiOverflow/2 - T_PlantWall - W_FiEntrance + T_FiWall/2));
    W_SedExitChannelPostWeir;
    H_SedExitChannel
], T_ChannelWall, [270; 0; 0]*deg)
# this length depends how we are going to lay multiple filters out
# Since the channel is open at one end, this adds a wall to the far end of the channel
FiInletChannelCap := BoxF([
    Plant_Origin[0] - W_SedExitChannelPostWeir - T_ChannelWall;
    Plant_Origin[1] - max((W_Fi + T_FiWall)*N_Fi, (2*W_FiEntrance + W_FiOverflow + 4*T_PlantWall)*ceil(N_Fi/2) - T_PlantWall + (W_Fi - W_FiOverflow/2 - T_PlantWall - W_FiEntrance + T_FiWall/2));
    Plant_Origin[2] + H_Sed - H_SedExitChannel - (H_Sed - Z_SedWeirExit) - T_ChannelWall
], [
    Plant_Origin[0] + T_ChannelWall;
    Plant_Origin[1] - max((W_Fi + T_FiWall)*N_Fi, (2*W_FiEntrance + W_FiOverflow + 4*T_PlantWall)*ceil(N_Fi/2) - T_PlantWall + (W_Fi - W_FiOverflow/2 - T_PlantWall - W_FiEntrance + T_FiWall/2)) - T_ChannelWall;
    Plant_Origin[2] + H_Sed - (H_Sed - Z_SedWeirExit)
], [0; 0; 0]*deg)
EndBoxIf1 := BoxF([
    FiEntranceBox_origin[0] + T_PlantWall;
    FiEntranceBox_origin[1] - T_PlantWall - W_FiOverflow/2;
    Plant_Origin[2] + H_Sed - H_SedExitChannel
], [Plant_Origin[0]; FiEntranceBox_origin[1] - T_PlantWall; Plant_Origin[2] + H_Sed], [0; 0; 0]*deg)  # NOT STACKED
EndBoxIf2 := BoxF([
    FiEntranceBox_origin[0] + T_PlantWall;
    FiEntranceBox_origin[1] - 3*T_PlantWall - W_FiOverflow - W_FiEntrance;
    Plant_Origin[2] + H_Sed - H_SedExitChannel
], [
    Plant_Origin[0];
    FiEntranceBox_origin[1] - 2*T_PlantWall - W_FiOverflow - W_FiEntrance;
    Plant_Origin[2] + H_Sed
], [0; 0; 0]*deg)  # NOT STACKED
FreezeFiInletChannel := FreezeLayer("FiInletchannelCon")
FiEntWeir :=
    BoxF(FiEntranceWeir_origin, FiEntranceWeir_origin + FiEntranceWeir_dim, [0; 0; 0]*deg)
    stack(BoxF(FiEntranceWeir_origin, FiEntranceWeir_origin + FiEntranceWeir_dim, [0; 0; 0]*deg), ArrayLast(2, 1, -(FiEntranceWeir_dim[1] + 2*T_PlantWall + W_FiOverflow)))
MirrorWeirs := Mirror3dAll("zx", [0 m; Fi_origin[1] - T_FiWall/2], "n")
ArrayFiWeirs := array_all(N_Fi/2, 1, -max((W_Fi + T_FiWall)*2, 2*W_FiEntrance + W_FiOverflow + 3*T_PlantWall))
SubtractEntWeir := SubtractF(["FiInletchannelCon"], "DeleteMe")
FiInletChannelScript :=
    stack(LayerFiInletChannel, FiInletChannel, FiInletChannelCap, union_allA, FreezeFiInletChannel, FiEntWeir, GroupDelete, SubtractEntWeir) if N_Fi == 1
    stack(LayerFiInletChannel, FiInletChannel, FiInletChannelCap, union_allA, FreezeFiInletChannel, FiEntWeir, MirrorWeirs, GroupDelete, SubtractEntWeir) if N_Fi == 2
    stack(LayerFiInletChannel, FiInletChannel, FiInletChannelCap, union_allA, FreezeFiInletChannel, FiEntWeir, MirrorWeirs, ArrayFiWeirs, GroupDelete, SubtractEntWeir) otherwise
# Filter Auxilary Script
# (Drain Channel, BW Box, BW Overflow, Distribution Box, Overflow Box)
# Tanks
LayerFiBw := layer_new("FiBwtanksCon", ltgrey)
FiBwTank := stack(Tank([Fi_origin[0] + T_FiWall + L_FiBw; Fi_origin[1] - T_FiWall/2 - W_FiBw/2; Z_FiBwBottom], [L_FiBw; W_FiBw; H_FiBw], T_PlantWall), " ")
FiBwDrainTank := stack(Tank([
    Fi_origin[0] + T_PlantWall + T_FiWall + L_FiBw + L_FiBwWeirDrain;
    Fi_origin[1] - T_FiWall/2 - W_FiBwWeirDrain/2;
    Z_FiBwWeirDrainBottom
], [L_FiBwWeirDrain; W_FiBwWeirDrain; H_FiBwWeirDrain], T_PlantWall), " ")
# The slopes are the right/left/top/bottom when viewed from the top
FiBwDrainRightSlope := WedgeF([Fi_origin[0] + T_FiWall + L_FiBw; Fi_origin[1] - T_FiWall/2 - W_FiBw/2; Z_FiBwBottom], [
    Fi_origin[0] + T_FiWall + SocketDepth(ND_FiSiphon) + ShortTeeLength(ND_FiSiphon) + ConRadius(ND_FiBwDrain) + S_Fitting;
    Fi_origin[1] - T_FiWall/2 + W_FiBw/2;
    Z_FiBwBottom + tan(60 deg)*(L_FiBw - SocketDepth(ND_FiSiphon) - ShortTeeLength(ND_FiSiphon) - ConRadius(ND_FiBwDrain) - S_Fitting)
], [0; 0; 0]*deg)
FiBwDrainBottomSlope := WedgeF([Fi_origin[0] + T_FiWall + L_FiBw; Fi_origin[1] - T_FiWall/2 - W_FiBw/2; Z_FiBwBottom], [
    Fi_origin[0] + T_FiWall + W_FiBw/2 - ConRadius(ND_FiBwDrain) - S_Fitting + L_FiBw;
    Fi_origin[1] - T_FiWall/2 - W_FiBw/2 + L_FiBw;
    Z_FiBwBottom + tan(60 deg)*(-ConRadius(ND_FiBwDrain) - S_Fitting + W_FiBw/2)
], [90; 0; 0]*deg)
# I am adding 10cm because that is the distance of the bottom of the siphon
# from the floor
FiBwDrainTopSlope := WedgeF([Fi_origin[0] + T_FiWall + L_FiBw; Fi_origin[1] - T_FiWall/2 + W_FiBw/2; Z_FiBwBottom], [
    Fi_origin[0] + T_FiWall + L_FiBw + W_FiBw/2 - ConRadius(ND_FiBwDrain) - S_Fitting;
    Fi_origin[1] - T_FiWall/2 + W_FiBw/2 - L_FiBw;
    Z_FiBwBottom + 10 cm
], [270; 0; 0]*deg)
FiBwDrainLeftSlope := WedgeF([Fi_origin[0] + T_FiWall; Fi_origin[1] - T_FiWall/2 + W_FiBw/2; Z_FiBwBottom], [
    Fi_origin[0] + T_FiWall + SocketDepth(ND_FiSiphon) + ShortTeeLength(ND_FiSiphon) - ConRadius(ND_FiBwDrain) - S_Fitting;
    Fi_origin[1] - T_FiWall/2 - W_FiBw/2;
    Z_FiBwBottom + tan(60 deg)*(SocketDepth(ND_FiSiphon) + ShortTeeLength(ND_FiSiphon) - ConRadius(ND_FiBwDrain) - S_Fitting)
], [0; 0; 0]*deg)
LayerFiBwFreeze := FreezeLayer("FiBwtanksCon")
LayerFiOverflow := layer_new("FiOverflowCon", ltgrey)
FiOverflowTank := Tank([FiEntranceBox_origin[0]; Fi_origin[1] - T_FiWall/2 - W_FiOverflow/2; Z_FiOverflowBottom], [L_FiOverflow; W_FiOverflow; H_FiOverflow], T_PlantWall)
FiDistTank := Tank([FiExitBox_origin[0]; Fi_origin[1] - T_FiWall/2 - W_FiOverflow/2; Z_FiOverflowBottom], [L_FiOverflow; W_FiOverflow; H_FiExit], T_PlantWall)
LayerFiOverflowFreeze := FreezeLayer("FiOverflowCon")
FiOverflowWeir := BoxF([FiEntranceBox_origin[0]; FiEntranceBox_origin[1] - T_PlantWall - zc; FiEntranceWeir_origin[2]], [
    FiEntranceBox_origin[0] - L_FiWeir;
    FiEntranceBox_origin[1] + zc;
    FiEntranceBox_origin[2] + FiEntranceBox_dim[2]
], [0; 0; 0]*deg)
FiDistWeir := BoxF([FiExitBox_origin[0]; FiEntranceBox_origin[1] - T_PlantWall - zc; Z_FiExitWeir], [
    FiExitBox_origin[0] - L_FiWeir;
    FiEntranceBox_origin[1] + zc;
    FiEntranceBox_origin[2] + FiExitBox_dim[2]
], [0; 0; 0]*deg)
MirrorFiWeirs := Mirror3dAll("zx", [0 m; Fi_origin[1] - T_FiWall/2], "n")
FiSubtractOverDistWeirs := SubtractF(["FiOverflowCon"], "DeleteMe")
LayerFiBwDrain := layer_new("FiBwdrainCon", ltgrey)
FiBwDrainChannel := ChannelDrawing([
    Fi_origin[0] + T_PlantWall + L_FiBw/2 - outerdiameter(ND_DistPipe)/2 - 5 cm;
    Fi_origin[1] - T_FiWall/2 - H_FiBwDrain/2;
    Z_FiBwBottom - H_FiBwDrain - T_PlantWall
], [
    L_FiEntrance + W_SedExitChannelPostWeir + 4*T_PlantWall + L_FiExit + W_MpWalkway - outerdiameter(ND_DistPipe)/2 - 5 cm;
    H_FiBwDrain;
    H_FiBwDrain
], T_ChannelWall, [0; 0; 0]*deg)
FiBwDrainFreeze := FreezeLayer("FiBwdrainCon")
FiBwWeir := BoxF([Fi_origin[0] + T_PlantWall + T_FiWall + L_FiBw; Fi_origin[1] - T_FiWall/2 - W_FiBw/2; Z_FiBwWeir], [Fi_origin[0] + T_FiWall + L_FiBw; Fi_origin[1] - T_FiWall/2 + W_FiBw/2; Z_FiBwBottom + H_FiBw], [0; 0; 0]*deg)
FiSubtractBwWeir := SubtractF(["FiBwtanksCon"], "DeleteMe")
FiAuxTanksScript :=
    stack(LayerFiBw, FiBwTank, FiBwDrainTank, FiBwDrainTopSlope, FiBwDrainRightSlope, FiBwDrainLeftSlope, FiBwDrainBottomSlope, union_allA, LayerFiBwFreeze, LayerFiOverflow, FiOverflowTank, FiDistTank, union_allA, LayerFiOverflowFreeze, FiOverflowWeir, FiDistWeir, GroupDelete, FiSubtractOverDistWeirs, LayerFiBwDrain, FiBwDrainChannel, FiBwDrainFreeze, FiBwWeir, GroupDelete, FiSubtractBwWeir) if N_Fi == 1
    stack(LayerFiBw, FiBwTank, FiBwDrainTank, FiBwDrainTopSlope, FiBwDrainRightSlope, FiBwDrainLeftSlope, FiBwDrainBottomSlope, union_allA, LayerFiBwFreeze, LayerFiOverflow, FiOverflowTank, FiDistTank, union_allA, LayerFiOverflowFreeze, FiOverflowWeir, FiDistWeir, MirrorFiWeirs, GroupDelete, FiSubtractOverDistWeirs, LayerFiBwDrain, FiBwDrainChannel, FiBwDrainFreeze, FiBwWeir, GroupDelete, FiSubtractBwWeir) otherwise
# Couplings
LayerFiCoupling := layer_new("FiCouplingPlumbing", green)
FiOverflowToDistCoupling := CouplingSUBF([
    FiExitBox_origin[0] + (T_PlantWall + CouplingLength(ND_DistPipe))/2 - SocketDepth(ND_DistPipe);
    FiExitBox_origin[1] - T_PlantWall - W_FiOverflow/2;
    Z_FiOverflowBottom - T_ConcreteMin - ConRadius(ND_DistPipe) + H_FiEntrance
], [0; 0]*deg, ND_DistPipe, PS_Default, ["FiOverflowCon"])
FiOverflowCoupling := CouplingSUBF([
    FiEntranceBox_origin[0] - L_FiOverflow/2;
    FiEntranceBox_origin[1] - T_PlantWall - W_FiOverflow/2;
    Z_FiOverflowBottom - CouplingLength(ND_FiEntranceOverflow) + SocketDepth(ND_FiEntranceOverflow)
], [0; 90]*deg, ND_FiEntranceOverflow, PS_Default, ["FiOverflowCon"])
DistCoupling := CouplingSUBF([
    FiExitBox_origin[0] - L_FiExit/2;
    FiExitBox_origin[1] - T_PlantWall - W_FiOverflow/2;
    Z_FiOverflowBottom - CouplingLength(ND_DistPipe) + SocketDepth(ND_DistPipe)
], [0; 90]*deg, ND_DistPipe, PS_Default, ["FiOverflowCon"])
FiBwCoupling := CouplingSUBF([
    Fi_origin[0] + T_FiWall + SocketDepth(ND_FiSiphon) + ShortTeeLength(ND_FiSiphon);
    Fi_origin[1] - T_FiWall/2;
    Z_FiBwBottom - CouplingLength(ND_FiBwDrain) + SocketDepth(ND_FiBwDrain)
], [0; 90]*deg, ND_FiBwDrain, PS_Default, ["FiBwtanksCon"])
FiBwDrainCoupling := CouplingSUBF(FiBwDrainCoupling_origin, [0; 90]*deg, ND_FiBwWeirDrain, PS_Default, ["FiBwtanksCon"])
LayerFiCouplingFreeze := FreezeLayer("FiCouplingPlumbing")
FiAuxCouplingScript := stack(LayerFiCoupling, FiOverflowToDistCoupling, FiOverflowCoupling, DistCoupling, FiBwDrainCoupling, FiBwCoupling, LayerFiCouplingFreeze)
# Piping
# For all pipes, if the coupling does not extend out of the concrete floor, the pipe needs to extend 1 socket depth out of the concrete for the subsequent fitting.  If it does extend out of the concrete, we only want to the pipe length to be 2 socket depths: 1 for the coupling, 1 for the other fitting
LayerFiAuxPiping := layer_new("FiAuxPlumbing", blue)
FiOverflowConnectingPipe := PipeSUBF([
    FiExitBox_origin[0] + (T_PlantWall + CouplingLength(ND_DistPipe))/2 - SocketDepth(ND_DistPipe);
    FiExitBox_origin[1] - T_PlantWall - W_FiOverflow/2;
    Z_FiOverflowBottom - T_ConcreteMin - ConRadius(ND_DistPipe) + H_FiEntrance
], max((T_PlantWall - CouplingLength(ND_DistPipe)) + 2*SocketDepth(ND_DistPipe), 2*SocketDepth(ND_DistPipe)), [0; 0]*deg, ND_DistPipe, PS_Default, ["FiOverflow"])
FiOverflowToDistElbow := ElbowF([
    FiExitBox_origin[0] - SocketDepth(ND_DistPipe);
    FiExitBox_origin[1] - T_PlantWall - W_FiOverflow/2;
    Z_FiOverflowBottom - T_ConcreteMin - ConRadius(ND_DistPipe) + H_FiEntrance
], [90; 0; 90]*deg, ND_DistPipe, PS_Default)
FiOverflowConnectingPipe2 := PipeF([
    FiExitBox_origin[0] - ElbowRadius(ND_DistPipe) - SocketDepth(ND_DistPipe);
    FiExitBox_origin[1] - T_PlantWall - W_FiOverflow/2;
    Z_FiOverflowBottom - T_ConcreteMin - ConRadius(ND_DistPipe) + H_FiEntrance - ElbowRadius(ND_DistPipe)
], H_FiExit + SocketDepth(ND_DistPipe), [0; 270]*deg, ND_DistPipe, PS_Default)
FiDistPipe1 := PipeSUBF([
    FiExitBox_origin[0] - L_FiExit/2;
    FiExitBox_origin[1] - T_PlantWall - W_FiOverflow/2;
    Z_FiOverflowBottom - CouplingLength(ND_DistPipe) + SocketDepth(ND_DistPipe)
], min(-(T_PlantWall - CouplingLength(ND_DistPipe)) - 2*SocketDepth(ND_DistPipe), -2*SocketDepth(ND_DistPipe)), [0; -90]*deg, ND_DistPipe, PS_Default, ["FiOverflowCon"])
FiDistElbow := ElbowF([
    FiExitBox_origin[0] - L_FiExit/2;
    FiExitBox_origin[1] - T_PlantWall - W_FiOverflow/2 - ElbowRadius(ND_DistPipe);
    Z_FiOverflowBottom - CouplingLength(ND_DistPipe) - ElbowRadius(ND_DistPipe) - SocketDepth(ND_DistPipe)
], [0; 90; 0]*deg, ND_DistPipe, PS_Default)
FiDistPipe2 := PipeF([
    FiExitBox_origin[0] - L_FiExit/2;
    FiExitBox_origin[1] - T_PlantWall - W_FiOverflow/2 - ElbowRadius(ND_DistPipe);
    (Z_FiOverflowBottom - CouplingLength(ND_DistPipe)) - SocketDepth(ND_DistPipe) - ElbowRadius(ND_DistPipe)
], 50 cm, [90; 0]*deg, ND_DistPipe, PS_Default)
Z_FiOverflowDrainPipeStart := Z_FiOverflowBottom - CouplingLength(ND_FiEntranceOverflow) + SocketDepth(ND_FiEntranceOverflow)
Z_FiOverflowDrainPipeEnd := Z_FiBwBottom - T_PlantWall - (10 cm + ConRadius(ND_FiEntranceOverflow)) + ElbowRadius(ND_FiEntranceOverflow)
FiOverflowDrainPipe := PipeSUBF([
    FiEntranceBox_origin[0] - L_FiOverflow/2;
    FiEntranceBox_origin[1] - T_PlantWall - W_FiOverflow/2;
    Z_FiOverflowDrainPipeStart
], Z_FiOverflowDrainPipeStart - Z_FiOverflowDrainPipeEnd, [0; 270]*deg, ND_FiEntranceOverflow, PS_Default, ["FiOverflowCon"])
FiOverflowDrainElbow := ElbowF([
    FiEntranceBox_origin[0] - L_FiOverflow/2;
    FiEntranceBox_origin[1] - T_PlantWall - W_FiOverflow/2;
    Z_FiOverflowDrainPipeEnd
], [180; 0; 90]*deg, ND_FiEntranceOverflow, PS_Default)
Z_FiBwOverflowPipeStart := Z_FiBwWeirDrainBottom - CouplingLength(ND_FiBwWeirDrain) + SocketDepth(ND_FiBwWeirDrain)
Z_FiBwOverflowPipeEnd := Z_FiBwBottom - T_PlantWall - (10 cm + ConRadius(ND_FiBwWeirDrain)) + ElbowRadius(ND_FiBwWeirDrain)
FiBwOverflowPipe := PipeSUBF([FiBwDrainCoupling_origin[0]; Fi_origin[1] - T_FiWall/2; Z_FiBwOverflowPipeStart], Z_FiBwOverflowPipeStart - Z_FiBwOverflowPipeEnd, [0; 270]*deg, ND_FiBwWeirDrain, PS_Default, ["FiBwtanksCon"])
FiBwOverflowElbow := ElbowF([FiBwDrainCoupling_origin[0]; Fi_origin[1] - T_FiWall/2; Z_FiBwOverflowPipeEnd], [180; 0; 90]*deg, ND_FiBwWeirDrain, PS_Default)
# This does not require a start/end because the elbow extends deeper than 10 cm and is under the Bw box so splashing shouldn't be a concern
FiBwDrainPipe := PipeSUBF([
    Fi_origin[0] + T_FiWall + SocketDepth(ND_FiSiphon) + ShortTeeLength(ND_FiSiphon);
    Fi_origin[1] - T_FiWall/2;
    Z_FiBwBottom - CouplingLength(ND_FiBwDrain) + SocketDepth(ND_FiBwDrain)
], 2*SocketDepth(ND_FiBwDrain) + max(0 m, T_PlantWall - CouplingLength(ND_FiBwDrain)), [0; 270]*deg, ND_FiBwDrain, PS_Default, ["FiBwtanksCon"])
FiBwDrainPlug := PipeF([
    Fi_origin[0] + T_FiWall + SocketDepth(ND_FiSiphon) + ShortTeeLength(ND_FiSiphon);
    Fi_origin[1] - T_FiWall/2;
    Z_FiBwBottom - SocketDepth(ND_FiBwDrain)
], H_FiBw + SocketDepth(ND_FiBwDrain), [0; 90]*deg, ND_FiBwDrain, PS_Default)
FiBwDrainElbow := ElbowF([
    Fi_origin[0] + T_FiWall + SocketDepth(ND_FiSiphon) + ShortTeeLength(ND_FiSiphon);
    Fi_origin[1] - T_FiWall/2;
    Z_FiBwBottom + min(-T_PlantWall - SocketDepth(ND_FiBwDrain), -CouplingLength(ND_FiBwDrain) - SocketDepth(ND_FiBwDrain))
], [180; 0; 90]*deg, ND_FiBwDrain, PS_Default)
LayerFiPipingFreeze := FreezeLayer("FiAuxPlumbing")
FiAuxPipeScript := stack(LayerFiAuxPiping, FiOverflowConnectingPipe, FiOverflowToDistElbow, FiOverflowConnectingPipe2, FiDistPipe1, FiDistElbow, FiDistPipe2, FiOverflowDrainPipe, FiOverflowDrainElbow, FiBwOverflowPipe, FiBwOverflowElbow, FiBwDrainPipe, FiBwDrainPlug, FiBwDrainElbow, LayerFiPipingFreeze)
FiAuxScript := stack(FiAuxTanksScript, FiAuxCouplingScript, FiAuxPipeScript)
# Filter Script
# Tank
LayerFiTank := layer_new("FiTankCon", ltgrey)
FiTank := Tank(Fi_origin, Fi_dim, T_FiWall)
FiBwManLedge := BoxF([Fi_origin[0]; Fi_origin[1]; Fi_origin[2] + 2*ConRadius(ND_FiBwManBranch)], [Fi_origin[0]; Fi_origin[1]; Fi_origin[2] + ConRadius(ND_FiBwManBranch)] + [-L_Fi; 5 cm; H_FiLayer - ConRadius(ND_FiManBranch)], [0; 0; 0]*deg)
FiManLedge := BoxF([
    Fi_origin[0];
    Fi_origin[1];
    Fi_origin[2] + ConRadius(ND_FiBwManBranch) + H_FiLayer + ConRadius(ND_FiManBranch)
], [
    Fi_origin[0];
    Fi_origin[1];
    Fi_origin[2] + ConRadius(ND_FiBwManBranch) + H_FiLayer + ConRadius(ND_FiManBranch)
] + [-L_Fi; 5 cm; H_FiLayer - 2*ConRadius(ND_FiManBranch)], [0; 0; 0]*deg)
ArrayManLedges := ArrayLast(N_FiLayer, 1, H_FiLayer)
FiSiphonManLedgeL := BoxF([
    Fi_origin[0];
    Fi_origin[1] + T_ConcreteMin + ConRadius(ND_FiSiphon) - 2*S_Fitting;
    Z_FiSiphonInlet - ConRadius(ND_FiSiphon)
], [
    Fi_origin[0] - T_ConcreteMin;
    Fi_origin[1] + T_ConcreteMin + ConRadius(ND_FiSiphon) + 2*S_Fitting;
    Z_FiSiphonInlet - ConRadius(ND_FiSiphon) - T_ConcreteMin
], [0; 0; 0]*deg)
FiSiphonManLedgeR := BoxF([
    Fi_origin[0] - L_Fi;
    Fi_origin[1] + T_ConcreteMin + ConRadius(ND_FiSiphon) - 2*S_Fitting;
    Z_FiSiphonInlet - ConRadius(ND_FiSiphon)
], [
    Fi_origin[0] - L_Fi + T_ConcreteMin;
    Fi_origin[1] + T_ConcreteMin + ConRadius(ND_FiSiphon) + 2*S_Fitting;
    Z_FiSiphonInlet - ConRadius(ND_FiSiphon) - T_ConcreteMin
], [0; 0; 0]*deg)
LayerFiTankFreeze := FreezeLayer("FiTankCon")
FiKeyPipeSlot := BoxF(Fi_origin + [
    (-L_FiBwTrunk - 2*ConRadius(ND_FiKeyPipe) - ConRadius(ND_FiBwTrunk) + outerradius(ND_FiBwTrunk) + SocketDepth(ND_FiBwTrunk)) - ConRadius(ND_FiKeyPipe);
    W_Fi;
    -ConRadius(ND_FiBwTrunk) + ConRadius(ND_FiBwManBranch)
], [
    (-L_FiBwTrunk - ConRadius(ND_FiBwTrunk) + outerradius(ND_FiBwTrunk) + SocketDepth(ND_FiBwTrunk)) - ConRadius(ND_FiKeyPipe);
    W_Fi - 2*ConRadius(ND_FiBwTrunk);
    H_Fi
] + Fi_origin, [0; 0; 0]*deg)
FiBwTrunkSlot := BoxF(Fi_origin + [0 m; -W_Fi; 0 m], [-L_Fi; 0 m; -ConRadius(ND_FiBwTrunk) + ConRadius(ND_FiBwManBranch)] + Fi_origin, [0; 0; 0]*deg)
# GroupDelete
DeleteFiSlots := SubtractF(["FiTankCon"], "DeleteMe")
FiTankScript := stack(LayerFiTank, FiTank, FiBwManLedge, FiManLedge, viewfront1, ArrayManLedges, viewtop1, FiSiphonManLedgeL, FiSiphonManLedgeR, union_allA, LayerFiTankFreeze, FiBwTrunkSlot, FiKeyPipeSlot, GroupDelete, DeleteFiSlots)
# Manifold Key Pipe
FiKeyPipeLayer := layer_new("FiKeypipePlumbing", blue)
DrawFiKeyPipeCap := CapSUBF([
    (-L_FiBwTrunk - ConRadius(ND_FiKeyPipe) - ConRadius(ND_FiBwTrunk) + outerradius(ND_FiBwTrunk) + SocketDepth(ND_FiBwTrunk)) - ConRadius(ND_FiKeyPipe);
    W_Fi - ConRadius(ND_FiBwTrunk);
    -CapHeight(ND_FiKeyPipe) + ConRadius(ND_FiKeyPipe) - outerradius(ND_FiKeyPipe) - ConRadius(ND_FiBwTrunk) + ConRadius(ND_FiBwManBranch)
] + Fi_origin, [0; 90; 0]*deg, ND_FiKeyPipe, ["FiTankCon"])
DrawFiKeyPipeBottom := PipeF([
    (-L_FiBwTrunk - ConRadius(ND_FiKeyPipe) - ConRadius(ND_FiBwTrunk) + outerradius(ND_FiBwTrunk) + SocketDepth(ND_FiBwTrunk)) - ConRadius(ND_FiKeyPipe);
    W_Fi - ConRadius(ND_FiBwTrunk);
    -CapHeight(ND_FiKeyPipe) + ConRadius(ND_FiKeyPipe) - outerradius(ND_FiKeyPipe) - ConRadius(ND_FiBwTrunk) + ConRadius(ND_FiBwManBranch)
] + Fi_origin, ConRadius(ND_FiBwTrunk) - ConRadius(ND_FiBwManBranch) + N_FiLayer*H_FiLayer + ConRadius(ND_FiBwManBranch) + ConRadius(ND_FiTrunk) + CapHeight(ND_FiKeyPipe) + outerradius(ND_FiKeyPipe) - ShortTeeLength(ND_FiKeyPipe), [0; 90]*deg, ND_FiKeyPipe, PS_Default)
DrawFiKeyPipeTee := TeeF([
    (-L_FiBwTrunk - ConRadius(ND_FiKeyPipe) - ConRadius(ND_FiBwTrunk) + outerradius(ND_FiBwTrunk) + SocketDepth(ND_FiBwTrunk) + ShortTeeLength(ND_FiKeyPipe)) - ConRadius(ND_FiKeyPipe);
    W_Fi - ConRadius(ND_FiBwTrunk);
    N_FiLayer*H_FiLayer + ConRadius(ND_FiBwManBranch) + ConRadius(ND_FiTrunk) + ConRadius(ND_FiKeyPipe)
] + Fi_origin, [270; 0; 90]*deg, ND_FiKeyPipe, PS_Default)
DrawFiKeyPipeTop := PipeF([
    (-L_FiBwTrunk - ConRadius(ND_FiKeyPipe) - ConRadius(ND_FiBwTrunk) + outerradius(ND_FiBwTrunk) + SocketDepth(ND_FiBwTrunk)) - ConRadius(ND_FiKeyPipe);
    W_Fi - ConRadius(ND_FiBwTrunk);
    N_FiLayer*H_FiLayer + ConRadius(ND_FiBwManBranch) + ConRadius(ND_FiTrunk) + ConRadius(ND_FiKeyPipe) + ShortTeeLength(ND_FiKeyPipe)
] + Fi_origin, H_Fi - (N_FiLayer*H_FiLayer + ConRadius(ND_FiBwManBranch) + ConRadius(ND_FiTrunk) + ConRadius(ND_FiKeyPipe) + ShortTeeLength(ND_FiKeyPipe)), [0; 90]*deg, ND_FiKeyPipe, PS_Default)
FreezeFiKeyPipe := FreezeLayer("FiKeypipePlumbing")
FiKeyPipeScript := stack(FiKeyPipeLayer, DrawFiKeyPipeCap, DrawFiKeyPipeBottom, DrawFiKeyPipeTee, DrawFiKeyPipeTop, FreezeFiKeyPipe)
# Manifold Spacers
ND_FiSpacerRod := 1.5 in
# http://www.spearsmfg.com/prod_dimensions_spec/40-4-0511_0511_web.pdf
# schedule 40 spacers
# schedule 40 saddles are available in 6x1.5 and 4x1.5
# 6x2 and 4x2 saddles don't fit between the trunk lines
# maybe eventually we will need a database for this
# these are the US dimensions:
L_FiSaddleTopUS := 6.25 in
L_FiSaddleOutletTopUS := 3.75 in - ConRadius(ND_FiTrunk)  # for the 4" pipe
L_FiSaddleBottomUS := (6 + 5/16)*in
L_FiSaddleOutletBottomUS := (4 + 5/16)*in - ConRadius(ND_FiBwTrunk)  # for the 6" pipe
# these are the Honduras dimensions:
L_FiSaddleOutletTop := (20 cm - 13.5 cm)/2
L_FiSaddleTop := 7 cm
L_FiSaddleOutletBottom := L_FiSaddleOutletTop
L_FiSaddleBottom := 9 cm
ManSpacerLayer := layer_new("FiManspacer", yellow)
TopFiSaddleOuterCylinder := CylinderF([
    -L_FiBwTrunk + SocketDepth(ND_FiBwTrunk) + CapHeight(ND_FiBwTrunk) + (L_FiSaddleTop + L_FiSaddleBottom)/2;
    W_Fi - ConRadius(ND_FiBwTrunk);
    N_FiLayer*H_FiLayer + ConRadius(ND_FiBwManBranch)
] + Fi_origin, ConRadius(ND_FiTrunk), L_FiSaddleTop, [0; 0]*deg)
TopFiSaddleOuterCylinderOutlet := CylinderF([
    -L_FiBwTrunk + SocketDepth(ND_FiBwTrunk) + CapHeight(ND_FiBwTrunk) + L_FiSaddleBottom/2;
    W_Fi - ConRadius(ND_FiBwTrunk);
    N_FiLayer*H_FiLayer + ConRadius(ND_FiBwManBranch)
] + Fi_origin, ConRadius(ND_FiSpacerRod), ConRadius(ND_FiTrunk) + L_FiSaddleOutletTop, [0; 270]*deg)
TopFiSaddleInnerCyl := CylinderF([
    -L_FiBwTrunk + SocketDepth(ND_FiBwTrunk) + CapHeight(ND_FiBwTrunk) + (L_FiSaddleTop + L_FiSaddleBottom)/2 + zc;
    W_Fi - ConRadius(ND_FiBwTrunk);
    N_FiLayer*H_FiLayer + ConRadius(ND_FiBwManBranch)
] + Fi_origin, outerradius(ND_FiTrunk), L_FiSaddleTop + 2*zc, [0; 0]*deg)
TopFiSaddleInnerCylinderOutlet := CylinderF([
    -L_FiBwTrunk + SocketDepth(ND_FiBwTrunk) + CapHeight(ND_FiBwTrunk) + L_FiSaddleBottom/2;
    W_Fi - ConRadius(ND_FiBwTrunk);
    N_FiLayer*H_FiLayer + ConRadius(ND_FiBwManBranch)
] + Fi_origin, outerradius(ND_FiSpacerRod), zc + ConRadius(ND_FiTrunk) + L_FiSaddleOutletTop, [0; 270]*deg)
SliceTopFiSaddle := BoxF([
    -L_FiBwTrunk + SocketDepth(ND_FiBwTrunk) + CapHeight(ND_FiBwTrunk) + (L_FiSaddleTop + L_FiSaddleBottom)/2 + zc;
    W_Fi - ConRadius(ND_FiBwTrunk) - ConRadius(ND_FiTrunk) - zc;
    N_FiLayer*H_FiLayer + ConRadius(ND_FiBwManBranch)
] + Fi_origin, [
    -L_FiBwTrunk + SocketDepth(ND_FiBwTrunk) + CapHeight(ND_FiBwTrunk) - zc;
    W_Fi - ConRadius(ND_FiBwTrunk) + ConRadius(ND_FiTrunk) + zc;
    N_FiLayer*H_FiLayer + ConRadius(ND_FiBwManBranch) + ConRadius(ND_FiTrunk) + zc
] + Fi_origin, [0; 0; 0]*deg)
ZoomFiSpacer := zoom_win([
    -L_FiBwTrunk + SocketDepth(ND_FiBwTrunk) + CapHeight(ND_FiBwTrunk) + (L_FiSaddleTop + L_FiSaddleBottom)/2 + 2*zc;
    W_Fi - ConRadius(ND_FiBwTrunk) - ConRadius(ND_FiTrunk) - 2*zc;
    N_FiLayer*H_FiLayer + ConRadius(ND_FiBwManBranch)
] + Fi_origin, [
    -L_FiBwTrunk + SocketDepth(ND_FiBwTrunk) + CapHeight(ND_FiBwTrunk) - 2*zc;
    W_Fi - ConRadius(ND_FiBwTrunk) + ConRadius(ND_FiTrunk) + 2*zc;
    N_FiLayer*H_FiLayer + ConRadius(ND_FiBwManBranch) + ConRadius(ND_FiTrunk) + zc
] + Fi_origin)
SubtractInnerFiSaddleTop := SubtractGeneral([
    [
        -L_FiBwTrunk + SocketDepth(ND_FiBwTrunk) + CapHeight(ND_FiBwTrunk) + (L_FiSaddleTop + L_FiSaddleBottom)/2;
        W_Fi - ConRadius(ND_FiBwTrunk) + ConRadius(ND_FiTrunk);
        N_FiLayer*H_FiLayer + ConRadius(ND_FiBwManBranch)
    ] + Fi_origin;
    [
        -L_FiBwTrunk + SocketDepth(ND_FiBwTrunk) + CapHeight(ND_FiBwTrunk) + L_FiSaddleBottom/2;
        W_Fi - ConRadius(ND_FiBwTrunk) + ConRadius(ND_FiSpacerRod);
        N_FiLayer*H_FiLayer + ConRadius(ND_FiBwManBranch)
    ] + Fi_origin
], [
    [
        -L_FiBwTrunk + SocketDepth(ND_FiBwTrunk) + CapHeight(ND_FiBwTrunk) + (L_FiSaddleTop + L_FiSaddleBottom)/2 + zc;
        W_Fi - ConRadius(ND_FiBwTrunk) - ConRadius(ND_FiTrunk) - zc;
        N_FiLayer*H_FiLayer + ConRadius(ND_FiBwManBranch)
    ] + Fi_origin;
    [
        -L_FiBwTrunk + SocketDepth(ND_FiBwTrunk) + CapHeight(ND_FiBwTrunk) + (L_FiSaddleTop + L_FiSaddleBottom)/2 + zc/2;
        W_Fi - ConRadius(ND_FiBwTrunk) + outerradius(ND_FiTrunk);
        N_FiLayer*H_FiLayer + ConRadius(ND_FiBwManBranch)
    ] + Fi_origin;
    [
        -L_FiBwTrunk + SocketDepth(ND_FiBwTrunk) + CapHeight(ND_FiBwTrunk) + L_FiSaddleBottom/2;
        W_Fi - ConRadius(ND_FiBwTrunk) + outerradius(ND_FiSpacerRod);
        N_FiLayer*H_FiLayer + ConRadius(ND_FiBwManBranch)
    ] + Fi_origin
])
DrawFiSaddles := stack(TopFiSaddleOuterCylinder, TopFiSaddleOuterCylinderOutlet, TopFiSaddleInnerCyl, TopFiSaddleInnerCylinderOutlet, SliceTopFiSaddle, ZoomFiSpacer, SubtractInnerFiSaddleTop)
# viewfront
ArrayFiSaddleDown := ArrayLast(N_FiLayer, 1, -H_FiLayer)
MirrorFiSaddle := MirrorLast([Fi_origin[0] - L_Fi/2; Fi_origin[2] + ConRadius(ND_FiBwManBranch) + H_FiLayer], [Fi_origin[0] - L_Fi/2 + zc; Fi_origin[2] + ConRadius(ND_FiBwManBranch) + H_FiLayer], "n")
ArrayInvertedFiSaddle := ArrayLast(N_FiLayer - 1, 1, H_FiLayer)
# viewtop
FiSpacerPipe := PipeF([
    -L_FiBwTrunk + SocketDepth(ND_FiBwTrunk) + CapHeight(ND_FiBwTrunk) + L_FiSaddleBottom/2;
    W_Fi - ConRadius(ND_FiBwTrunk);
    N_FiLayer*H_FiLayer + ConRadius(ND_FiBwManBranch) - outerradius(ND_FiTrunk)
] + Fi_origin, H_FiLayer - 2*outerradius(ND_FiTrunk), [0; 270]*deg, ND_FiSpacerRod, PS_Default)
# viewfront
ArrayFiSpacerPipe := ArrayLast(N_FiLayer - 1, 1, -H_FiLayer)
# viewtop
BottomFiSaddleOuterCylinder := CylinderF([
    -L_FiBwTrunk + SocketDepth(ND_FiBwTrunk) + CapHeight(ND_FiBwTrunk) + L_FiSaddleBottom;
    W_Fi - ConRadius(ND_FiBwTrunk);
    ConRadius(ND_FiBwManBranch)
] + Fi_origin, ConRadius(ND_FiBwTrunk), L_FiSaddleBottom, [0; 0]*deg)
BottomFiSaddleOuterCylinderOutlet := CylinderF([
    -L_FiBwTrunk + SocketDepth(ND_FiBwTrunk) + CapHeight(ND_FiBwTrunk) + L_FiSaddleBottom/2;
    W_Fi - ConRadius(ND_FiBwTrunk);
    ConRadius(ND_FiBwManBranch)
] + Fi_origin, ConRadius(ND_FiSpacerRod), ConRadius(ND_FiBwTrunk) + L_FiSaddleOutletBottom, [0; 90]*deg)
BottomFiSaddleInnerCyl := CylinderF([
    -L_FiBwTrunk + SocketDepth(ND_FiBwTrunk) + CapHeight(ND_FiBwTrunk) + L_FiSaddleBottom + zc;
    W_Fi - ConRadius(ND_FiBwTrunk);
    ConRadius(ND_FiBwManBranch)
] + Fi_origin, outerradius(ND_FiBwTrunk), L_FiSaddleBottom + 2*zc, [0; 0]*deg)
BottomFiSaddleInnerCylinderOutlet := CylinderF([
    -L_FiBwTrunk + SocketDepth(ND_FiBwTrunk) + CapHeight(ND_FiBwTrunk) + L_FiSaddleBottom/2;
    W_Fi - ConRadius(ND_FiBwTrunk);
    ConRadius(ND_FiBwManBranch)
] + Fi_origin, outerradius(ND_FiSpacerRod), zc + ConRadius(ND_FiBwTrunk) + L_FiSaddleOutletBottom, [0; 90]*deg)
SliceBottomFiSaddle := BoxF([
    -L_FiBwTrunk + SocketDepth(ND_FiBwTrunk) + CapHeight(ND_FiBwTrunk) + L_FiSaddleBottom + zc;
    W_Fi - 2*ConRadius(ND_FiBwTrunk) - zc;
    ConRadius(ND_FiBwManBranch)
] + Fi_origin, [
    -L_FiBwTrunk + SocketDepth(ND_FiBwTrunk) + CapHeight(ND_FiBwTrunk) - zc;
    W_Fi + zc;
    ConRadius(ND_FiBwManBranch) - ConRadius(ND_FiBwTrunk) - zc
] + Fi_origin, [0; 0; 0]*deg)
ZoomFiBottomSpacer := zoom_win([
    -L_FiBwTrunk + SocketDepth(ND_FiBwTrunk) + CapHeight(ND_FiBwTrunk) + L_FiSaddleBottom + 2*zc;
    W_Fi - ConRadius(ND_FiBwTrunk) - ConRadius(ND_FiTrunk) - 2*zc;
    ConRadius(ND_FiBwManBranch) + zc
] + Fi_origin, [
    -L_FiBwTrunk + SocketDepth(ND_FiBwTrunk) + CapHeight(ND_FiBwTrunk) - 2*zc;
    W_Fi - ConRadius(ND_FiBwTrunk) + ConRadius(ND_FiTrunk) + 2*zc;
    -ConRadius(ND_FiBwManBranch) - 2*zc
] + Fi_origin)
SubtractInnerFiSaddleBottom := SubtractGeneral([
    [
        -L_FiBwTrunk + SocketDepth(ND_FiBwTrunk) + CapHeight(ND_FiBwTrunk) + L_FiSaddleBottom;
        W_Fi - ConRadius(ND_FiBwTrunk) + ConRadius(ND_FiTrunk);
        ConRadius(ND_FiBwManBranch)
    ] + Fi_origin;
    [
        -L_FiBwTrunk + SocketDepth(ND_FiBwTrunk) + CapHeight(ND_FiBwTrunk) + L_FiSaddleBottom/2;
        W_Fi - ConRadius(ND_FiBwTrunk) + ConRadius(ND_FiSpacerRod);
        ConRadius(ND_FiBwManBranch)
    ] + Fi_origin
], [
    [
        -L_FiBwTrunk + SocketDepth(ND_FiBwTrunk) + CapHeight(ND_FiBwTrunk) + L_FiSaddleBottom + zc;
        W_Fi - 2*ConRadius(ND_FiBwTrunk) - zc;
        ConRadius(ND_FiBwManBranch)
    ] + Fi_origin;
    [
        -L_FiBwTrunk + SocketDepth(ND_FiBwTrunk) + CapHeight(ND_FiBwTrunk) + L_FiSaddleBottom + zc/2;
        W_Fi - ConRadius(ND_FiBwTrunk) + outerradius(ND_FiBwTrunk);
        ConRadius(ND_FiBwManBranch)
    ] + Fi_origin;
    [
        -L_FiBwTrunk + SocketDepth(ND_FiBwTrunk) + CapHeight(ND_FiBwTrunk) + L_FiSaddleBottom/2;
        W_Fi - ConRadius(ND_FiBwTrunk) + outerradius(ND_FiSpacerRod);
        ConRadius(ND_FiBwManBranch)
    ] + Fi_origin
])
DrawBottomFiSaddle := stack(BottomFiSaddleOuterCylinder, BottomFiSaddleOuterCylinderOutlet, BottomFiSaddleInnerCyl, BottomFiSaddleInnerCylinderOutlet, SliceBottomFiSaddle, ZoomFiBottomSpacer, SubtractInnerFiSaddleBottom)
FiBottomSpacerPipe := PipeF([
    -L_FiBwTrunk + SocketDepth(ND_FiBwTrunk) + CapHeight(ND_FiBwTrunk) + L_FiSaddleBottom/2;
    W_Fi - ConRadius(ND_FiBwTrunk);
    ConRadius(ND_FiBwManBranch) + outerradius(ND_FiBwTrunk)
] + Fi_origin, H_FiLayer - outerradius(ND_FiBwTrunk) - outerradius(ND_FiTrunk), [0; 90]*deg, ND_FiSpacerRod, PS_Default)
FreezeFiManSpacers := FreezeLayer("FiManspacer")
FiManSpacerScript := stack(ManSpacerLayer, DrawFiSaddles, viewfront1, ArrayFiSaddleDown, viewfront1, MirrorFiSaddle, ArrayInvertedFiSaddle, viewtop1, FiSpacerPipe, viewfront1, ArrayFiSpacerPipe, viewtop1, DrawBottomFiSaddle, FiBottomSpacerPipe, FreezeFiManSpacers)
# Ladder
LayerFiTankLadder := layer_new("FiTankladder", dkgrey)
R_FiTankLadderTorus := 3 cm
S_FiLadder := 5 cm
R_FiTankLadderRebar := 1/2*in
W_FiTankLadderRung := 30 cm
FiTankLadderTorus := TorusF(Fi_origin + [
    -S_FiLadder + R_FiTankLadderTorus;
    W_Fi/2 + W_FiTankLadderRung/2 - R_FiTankLadderTorus;
    ConRadius(ND_FiBwManBranch) + H_FiLayer/2
], R_FiTankLadderTorus, R_FiTankLadderRebar, [90; 90]*deg)
LayerFiTankLadderFreeze := FreezeLayer("FiTankladder")
FiTankLadderTorusSubtractBox1 := BoxF(Fi_origin + [
    -S_FiLadder + R_FiTankLadderTorus;
    W_Fi/2 + W_FiTankLadderRung/2 - R_FiTankLadderTorus;
    ConRadius(ND_FiBwManBranch) + H_FiLayer/2
] + [
    R_FiTankLadderTorus + R_FiTankLadderRebar + zc;
    R_FiTankLadderTorus + R_FiTankLadderRebar + zc;
    -R_FiTankLadderRebar - zc
], Fi_origin + [
    -S_FiLadder + R_FiTankLadderTorus;
    W_Fi/2 + W_FiTankLadderRung/2 - R_FiTankLadderTorus;
    ConRadius(ND_FiBwManBranch) + H_FiLayer/2
] - [0 m; R_FiTankLadderTorus + R_FiTankLadderRebar + zc; -R_FiTankLadderRebar - zc], [0; 0; 0]*deg)
FiTankLadderTorusSubtractBox2 := BoxF((Fi_origin + [
    -S_FiLadder + R_FiTankLadderTorus;
    W_Fi/2 + W_FiTankLadderRung/2 - R_FiTankLadderTorus;
    ConRadius(ND_FiBwManBranch) + H_FiLayer/2
]) + [zc; -R_FiTankLadderTorus - R_FiTankLadderRebar - zc; -R_FiTankLadderRebar - zc], Fi_origin + [
    -S_FiLadder + R_FiTankLadderTorus;
    W_Fi/2 + W_FiTankLadderRung/2 - R_FiTankLadderTorus;
    ConRadius(ND_FiBwManBranch) + H_FiLayer/2
] - [R_FiTankLadderTorus + R_FiTankLadderRebar + zc; 0 m; -R_FiTankLadderRebar - zc], [0; 0; 0]*deg)
FiTankLadderTorusSubtract := SubtractF(["FiTankladder"], "DeleteMe")
LayerFiTankLadderSelect := SelectLayer("FiTankladder")
FiTankLadderCylinder1 := CylinderF(Fi_origin + [0.5*T_PlantWall; W_Fi/2 + W_FiTankLadderRung/2; ConRadius(ND_FiBwManBranch) + H_FiLayer/2], R_FiTankLadderRebar, 0.5*T_PlantWall + S_FiLadder - R_FiTankLadderTorus, [0; 0]*deg)
FiTankLadderCylinder2 := CylinderF(Fi_origin + [
    -S_FiLadder;
    W_Fi/2 + W_FiTankLadderRung/2 - R_FiTankLadderTorus;
    ConRadius(ND_FiBwManBranch) + H_FiLayer/2
], R_FiTankLadderRebar, W_FiTankLadderRung/2 - R_FiTankLadderTorus, [90; 0]*deg)
FiTankLadderRungMirror := Mirror3dAll("zx", Fi_origin + [0; W_Fi/2; ConRadius(ND_FiBwManBranch) + H_FiLayer/2], "n")
FiTankLadderMirror := Mirror3dAll("yz", Fi_origin + [-L_Fi/2; -W_Fi/2; ConRadius(ND_FiBwManBranch) + H_FiLayer/2], "n")
FiTankLadderArray := array_all(N_FiLadderRungs, 1, H_FiLayer)
FiTankLadderScript := stack(LayerFiTankLadder, FiTankLadderTorus, LayerFiTankLadderFreeze, FiTankLadderTorusSubtractBox1, FiTankLadderTorusSubtractBox2, GroupDelete, FiTankLadderTorusSubtract, LayerFiTankLadderSelect, FiTankLadderCylinder1, FiTankLadderCylinder2, FiTankLadderRungMirror, union_allA, FiTankLadderMirror, viewfront1, FiTankLadderArray, viewtop1, LayerFiTankLadderFreeze)
# Manifold Supports
# We probably can't use this!!!!
R_FiManSupport := 1/2*in
FiManSupportLayer := layer_new("FiMansupport", grey)
BottomFiManSupport := CylinderF([
    -2/3*L_Fi;
    W_Fi + T_ConcreteMin;
    H_FiLayer + ConRadius(ND_FiBwManBranch) - outerradius(ND_FiTrunk) - R_FiManSupport
] + Fi_origin, R_FiManSupport, 1.2*ConRadius(ND_FiBwTrunk) + T_ConcreteMin, [90; 0]*deg)
# viewfront
ArrayBottomFiManSupport := array_all(N_FiLayer, 1, H_FiLayer)
ArrayTopFiManSupport := array_all(2, 1, 2*(outerradius(ND_FiTrunk) + R_FiManSupport))
# viewtop
BwFiManSupport := CylinderF([
    -2/3*L_Fi;
    W_Fi + T_ConcreteMin;
    outerradius(ND_FiBwTrunk) + R_FiManSupport + ConRadius(ND_FiBwManBranch)
] + Fi_origin, R_FiManSupport, 1.2*ConRadius(ND_FiBwTrunk) + T_ConcreteMin, [90; 0]*deg)
FreezeFiManSupports := FreezeLayer("FiMansupport")
FiManSupportScript := stack(FiManSupportLayer, BottomFiManSupport, viewfront1, ArrayBottomFiManSupport, ArrayTopFiManSupport, viewtop1, BwFiManSupport, FreezeFiManSupports)
# Couplings
LayerFiCouplings := layer_new("FiCouplingsPlumbing", green)
FiTankBwCoupling := CouplingSUBF(FiTankBwCoulping_origin, [0; 0]*deg, ND_FiBwTrunk, PS_Default, ["FiTankCon"])
FiTankCoupling1 := CouplingSUBF(FiTankCoulpings_origin, [0; 0]*deg, ND_FiTrunk, PS_Default, ["FiTankCon"])
FiTankCoupling2 := CouplingSUBF([FiTankCoulpings_origin[0]; FiTankCoulpings_origin[1]; FiTankCoulpings_origin[2] + H_FiLayer], [0; 0]*deg, ND_FiTrunk, PS_Default, ["FiTankCon"])
FiTankCoupling3 := CouplingSUBF([FiTankCoulpings_origin[0]; FiTankCoulpings_origin[1]; FiTankCoulpings_origin[2] + 2*H_FiLayer], [0; 0]*deg, ND_FiTrunk, PS_Default, ["FiTankCon"])
FiTankCoupling4 := CouplingSUBF([FiTankCoulpings_origin[0]; FiTankCoulpings_origin[1]; FiTankCoulpings_origin[2] + 3*H_FiLayer], [0; 0]*deg, ND_FiTrunk, PS_Default, ["FiTankCon"])
FiTankCoupling5 := CouplingSUBF([FiTankCoulpings_origin[0]; FiTankCoulpings_origin[1]; FiTankCoulpings_origin[2] + 4*H_FiLayer], [0; 0]*deg, ND_FiTrunk, PS_Default, ["FiTankCon"])
FiTankCoupling6 := CouplingSUBF([FiTankCoulpings_origin[0]; FiTankCoulpings_origin[1]; FiTankCoulpings_origin[2] + 5*H_FiLayer], [0; 0]*deg, ND_FiTrunk, PS_Default, ["FiTankCon"])
LayerFiCouplingsFreeze := FreezeLayer("FiCouplingsPlumbing")
mirror1 := Mirror3dGroup("filtercouplings", "y", [Fi_origin[0]; Fi_origin[1] - T_PlantWall; Fi_origin[2]], "n")
FiTankCouplingScript := stack(LayerFiCouplings, FiTankBwCoupling, FiTankCoupling1, FiTankCoupling2, FiTankCoupling3, FiTankCoupling4, FiTankCoupling5, FiTankCoupling6, LayerFiCouplingsFreeze)
# Filter manifold
# Trunks
LayerTrunks := layer_new("FiTrunks", blue)
L_FiTrunk := L_FiBwTrunk
FiTrunk := PipeF([
    Fi_origin[0] + ConRadius(ND_FiKeyPipe);
    FiBwInletCoupling_origin[1];
    Fi_origin[2] + H_FiLayer + ConRadius(ND_FiBwManBranch)
], L_FiTrunk, [0; 0]*deg, ND_FiTrunk, PS_Default)
FiTrunkCap := CapF([
    Fi_origin[0] - (L_Fi - 5 cm + outerradius(ND_FiBwManBranch));
    FiBwInletCoupling_origin[1];
    Fi_origin[2] + H_FiLayer + ConRadius(ND_FiBwManBranch)
], [180; 0]*deg, ND_FiTrunk)
FreezeFiTrunkLayer := FreezeLayer("FiTrunks")
FiTrunkOrifice := CylinderF([
    Fi_origin[0] - B_FiManifoldBranch/2;
    FiBwInletCoupling_origin[1];
    Fi_origin[2] + H_FiLayer + ConRadius(ND_FiBwManBranch)
], outerradius(ND_FiManBranch), ND_FiTrunk, [90; 0]*deg)
ArrayFiTrunkOrifice := ArrayLast(1, N_FiManBranch, -B_FiManifoldBranch)
# GroupAll
SubtractFiTrunkOrifices := SubtractF(["FiTrunks"], "DeleteMe")
SelectFiTrunk := SelectLayer("FiTrunks")
ArrayFiTrunks := array_all(N_FiLayer, 1, H_FiLayer)
# FreezeFiTrunkLayer
LayerBwTrunk := layer_new("FiBwtrunk", blue)
BwTrunk := PipeF([
    Fi_origin[0] + ConRadius(ND_FiKeyPipe);
    FiBwInletCoupling_origin[1];
    Fi_origin[2] + ConRadius(ND_FiBwManBranch)
], L_FiBwTrunk, [0; 0]*deg, ND_FiBwTrunk, PS_Default)
FiBwTrunkCap := CapF([
    Fi_origin[0] - (L_Fi - 5 cm + outerradius(ND_FiBwManBranch));
    FiBwInletCoupling_origin[1];
    Fi_origin[2] + ConRadius(ND_FiBwManBranch)
], [180; 0]*deg, ND_FiBwTrunk)
FreezeBwTrunkLayer := FreezeLayer("FiBwtrunk")
FiBwTrunkOrifice := CylinderF([
    Fi_origin[0] - B_FiManifoldBranch/2;
    FiBwInletCoupling_origin[1];
    Fi_origin[2] + ConRadius(ND_FiBwManBranch)
], outerradius(ND_FiBwManBranch), ND_FiTrunk, [90; 0]*deg)
ArrayFiBwTrunkOrifice := ArrayLast(1, N_FiManBranch, -B_FiManifoldBranch)
# GroupAll
SubtractFiBwTrunkOrifices := SubtractF(["FiBwtrunk"], "DeleteMe")
FiTrunks := stack(LayerTrunks, FiTrunk, FiTrunkCap, FreezeFiTrunkLayer, FiTrunkOrifice, ArrayFiTrunkOrifice, GroupDelete, SubtractFiTrunkOrifices, SelectFiTrunk, viewfront1, ArrayFiTrunks, viewtop1, FreezeFiTrunkLayer)
FiBwTrunk := stack(LayerBwTrunk, BwTrunk, FiBwTrunkCap, FreezeBwTrunkLayer, FiBwTrunkOrifice, ArrayFiBwTrunkOrifice, GroupDelete, SubtractFiBwTrunkOrifices)
FiTrunkScript := stack(FiTrunks, FiBwTrunk)
# Filter Branches
LayerMan := layer_new("FiMan", red)
FiManBranch := PipeF(FiManTee_Origin, L_FiManBranch, [-90; 0]*deg, ND_FiManBranch, PS_FiBranch)
FiManTee := TeeF(FiManTee_Origin, [0; 0; 0]*deg, ND_FiManBranch, PS_FiBranch)
ArrayManBranches := array_all(1, N_FiManBranch - 2, -B_FiManifoldBranch)
FiManBranchRight := PipeF(FiManTee_Origin + [B_FiManifoldBranch; ElbowRadius(ND_FiManBranch) - ShortTeeLength(ND_FiManBranch); 0 m], L_FiManBranch, [-90; 0]*deg, ND_FiManBranch, PS_FiBranch)
FiManBranchLeft := PipeF(FiManTee_Origin + [-L_Fi + 2*B_FiManifoldBranch; ElbowRadius(ND_FiManBranch) - ShortTeeLength(ND_FiManBranch); 0 m], L_FiManBranch, [-90; 0]*deg, ND_FiManBranch, PS_FiBranch)
FiManBranchRightElbow := ElbowF(FiManTee_Origin + [B_FiManifoldBranch; ElbowRadius(ND_FiManBranch) - ShortTeeLength(ND_FiManBranch); 0 m], [0; 0; 180]*deg, ND_FiManBranch, PS_FiBranch)
FiManBranchLeftElbow := ElbowF(FiManTee_Origin + [-L_Fi + 2*B_FiManifoldBranch; ElbowRadius(ND_FiManBranch) - ShortTeeLength(ND_FiManBranch); 0 m], [180; 0; 0]*deg, ND_FiManBranch, PS_FiBranch)
ArrayFiMan := array_all(N_FiLayer, 1, H_FiLayer)
FiManScript := stack(LayerMan, FiManBranch, FiManTee, ArrayManBranches, FiManBranchRight, FiManBranchLeft, FiManBranchRightElbow, FiManBranchLeftElbow, viewfront1, ArrayFiMan, viewtop1)
# Backwash branches
BwManBranch := PipeF(BwManTee_Origin, L_FiBwManBranch, [-90; 0]*deg, ND_FiBwManBranch, PS_FiBranch)
ArrayBwManBranches := ArrayLast(1, N_FiManBranch - 2, -B_FiManifoldBranch)
BwManTee := TeeF(BwManTee_Origin, [0; 0; 0]*deg, ND_FiBwManBranch, PS_FiBranch)
BwManBranchRight := PipeF(BwManTee_Origin + [B_FiManifoldBranch; ElbowRadius(ND_FiBwManBranch) - ShortTeeLength(ND_FiBwManBranch); 0 m], L_FiBwManBranch, [-90; 0]*deg, ND_FiBwManBranch, PS_FiBranch)
BwManBranchLeft := PipeF(BwManTee_Origin + [-L_Fi + 2*B_FiManifoldBranch; ElbowRadius(ND_FiManBranch) - ShortTeeLength(ND_FiManBranch); 0 m], L_FiBwManBranch, [-90; 0]*deg, ND_FiBwManBranch, PS_FiBranch)
BwManBranchRightElbow := ElbowF(BwManTee_Origin + [B_FiManifoldBranch; ElbowRadius(ND_FiManBranch) - ShortTeeLength(ND_FiManBranch); 0 m], [0; 0; 180]*deg, ND_FiBwManBranch, PS_FiBranch)
BwManBranchLeftElbow := ElbowF(BwManTee_Origin + [-L_Fi + 2*B_FiManifoldBranch; ElbowRadius(ND_FiManBranch) - ShortTeeLength(ND_FiManBranch); 0 m], [180; 0; 0]*deg, ND_FiBwManBranch, PS_FiBranch)
FreezeFiManLayer := FreezeLayer("FiMan")
BwManScript := stack(BwManBranch, ArrayBwManBranches, BwManTee, ArrayBwManBranches, BwManBranchRight, BwManBranchLeft, BwManBranchRightElbow, BwManBranchLeftElbow, FreezeFiManLayer)
FiManifoldScript := stack(FiTrunkScript, FiManScript, BwManScript)
mirror2 := Mirror3dGroup("filter manifolds", "y", [Fi_origin[0]; Fi_origin[1] - T_PlantWall; Fi_origin[2]], "n")
mirrormanbranch := Mirror3dGroup("manifold branches", "y", [Fi_origin[0]; Fi_origin[1] - T_PlantWall; Fi_origin[2]], "n")
# Siphon
# Coupling
LayerFiCoulingsThaw := SelectLayer("FiCouplingsPlumbing")
FiSiphonCoupling := CouplingSUBF([
    Fi_origin[0] + T_FiWall - SocketDepth(ND_FiSiphon);
    Fi_origin[1] + T_ConcreteMin + ConRadius(ND_FiSiphon);
    Z_FiSiphonCoupling
], [0; 0]*deg, ND_FiSiphon, PS_Default, ["FiTankCon"])
# Pipes
LayerFiSiphon := layer_new("FiSiphon", blue)
# Starting from the coupling going into the filter
X_FiSiphonPipe1End := Fi_origin[0] + T_FiWall - CouplingLength(ND_FiSiphon) + SocketDepth(ND_FiSiphon) - max((T_FiWall - CouplingLength(ND_FiSiphon)) + 2*SocketDepth(ND_FiSiphon), 2*SocketDepth(ND_FiSiphon))
FiSiphonPipe1 := PipeSUBF([
    Fi_origin[0] + T_FiWall - CouplingLength(ND_FiSiphon) + SocketDepth(ND_FiSiphon);
    Fi_origin[1] + T_ConcreteMin + ConRadius(ND_FiSiphon);
    Z_FiSiphonCoupling
], L_Fi/2 - ElbowRadius(ND_FiSiphon) + T_FiWall - CouplingLength(ND_FiSiphon) + SocketDepth(ND_FiSiphon), [0; 0]*deg, ND_FiSiphon, PS_Default, ["FiTankCon"])
FiSiphonElbow1 := ElbowF([
    Fi_origin[0] - L_Fi/2 + ElbowRadius(ND_FiSiphon);
    Fi_origin[1] + T_ConcreteMin + ConRadius(ND_FiSiphon);
    Z_FiSiphonCoupling
], [90; 0; 90]*deg, ND_FiSiphon, PS_Default)
FiSiphonPipe2 := PipeF([
    Fi_origin[0] - L_Fi/2;
    Fi_origin[1] + T_ConcreteMin + ConRadius(ND_FiSiphon);
    Z_FiSiphonCoupling - ElbowRadius(ND_FiSiphon)
], Z_FiSiphonCoupling - ElbowRadius(ND_FiSiphon) - (Z_FiSiphonInlet + ShortTeeLength(ND_FiSiphon)), [0; -90]*deg, ND_FiSiphon, PS_Default)
FiSiphonTee := TeeF([
    Fi_origin[0] - L_Fi/2;
    Fi_origin[1] + T_ConcreteMin + ConRadius(ND_FiSiphon);
    Z_FiSiphonInlet + ShortTeeLength(ND_FiSiphon)
], [0; 0; 90]*deg, ND_FiSiphon, PS_Default)
X_FiSiphonManifoldStart := X_FiSiphonPipe1End - ElbowRadius(ND_FiSiphon) - ShortTeeLength(ND_FiSiphon)
X_FiSiphonManifoldEnd := Fi_origin[0] - L_Fi
FiSiphonManifold1 := PipeF([
    Fi_origin[0] - L_Fi/2 - ShortTeeLength(ND_FiSiphon);
    Fi_origin[1] + T_ConcreteMin + ConRadius(ND_FiSiphon);
    Z_FiSiphonInlet
], L_Fi/2 - ShortTeeLength(ND_FiSiphon) - ConRadius(ND_FiSiphon) + outerradius(ND_FiSiphon), [0; 0]*deg, ND_FiSiphon, PS_Default)
FiSiphonManifold2 := PipeF([
    Fi_origin[0] - ConRadius(ND_FiSiphon) + outerradius(ND_FiSiphon);
    Fi_origin[1] + T_ConcreteMin + ConRadius(ND_FiSiphon);
    Z_FiSiphonInlet
], L_Fi/2 - ShortTeeLength(ND_FiSiphon) - ConRadius(ND_FiSiphon) + outerradius(ND_FiSiphon), [0; 0]*deg, ND_FiSiphon, PS_Default)
FiSiphonManifoldCap1 := CapF([
    X_FiSiphonManifoldEnd + ConRadius(ND_FiSiphon) - outerradius(ND_FiSiphon);
    Fi_origin[1] + T_ConcreteMin + ConRadius(ND_FiSiphon);
    Z_FiSiphonInlet
], [180; 0]*deg, ND_FiSiphon)
FiSiphonManifoldCap2 := CapF([
    Fi_origin[0] - ConRadius(ND_FiSiphon) + outerradius(ND_FiSiphon);
    Fi_origin[1] + T_ConcreteMin + ConRadius(ND_FiSiphon);
    Z_FiSiphonInlet
], [0; 0]*deg, ND_FiSiphon)
FreezeFiSiphon := FreezeLayer("FiSiphon")
FirstFiSiphonManOrifice := CylinderF([
    Fi_origin[0] - B_FiSiphonManOrifices/2 - ConRadius(ND_FiSiphon) + outerradius(ND_FiSiphon);
    Fi_origin[1] + T_ConcreteMin + ConRadius(ND_FiSiphon);
    Z_FiSiphonInlet
], D_FiSiphonManOrifices/2, 1.2*ConRadius(ND_FiSiphon), [0; 90]*deg)
ArrayFiSiphonManOrifices := array_all(1, N_FiSiphonManOrifices/2, -B_FiSiphonManOrifices)
MirrorFiSiphonManOrifices := Mirror3dAll("yz", [Fi_origin[0] - L_Fi/2; 0 m], "n")
FiSiphonOrifices := stack(FirstFiSiphonManOrifice, ArrayFiSiphonManOrifices, MirrorFiSiphonManOrifices)
# GroupAll
SubtractFiSiphonManOrifices := SubtractF(["FiSiphon"], "DeleteMe")
SelectFiSiphon := SelectLayer("FiSiphon")
# Starting from the coupling going out of the filter
FiSiphonPipe3 := PipeF([
    Fi_origin[0] + T_FiWall - SocketDepth(ND_FiSiphon);
    Fi_origin[1] + T_ConcreteMin + ConRadius(ND_FiSiphon);
    Z_FiSiphonCoupling
], 2*SocketDepth(ND_FiSiphon), [180; 0]*deg, ND_FiSiphon, PS_Default)
FiSiphonTee2 := TeeF([
    Fi_origin[0] + T_FiWall + SocketDepth(ND_FiSiphon);
    Fi_origin[1] + T_ConcreteMin + ConRadius(ND_FiSiphon);
    Z_FiSiphonCoupling
], [90; 0; 90]*deg, ND_FiSiphon, PS_Default)
Z_FiSiphonPipe4End := Z_FiBwBottom + 10 cm
FiSiphonPipe4 := PipeF([
    Fi_origin[0] + T_FiWall + SocketDepth(ND_FiSiphon) + ShortTeeLength(ND_FiSiphon);
    Fi_origin[1] + T_ConcreteMin + ConRadius(ND_FiSiphon);
    Z_FiSiphonCoupling - ShortTeeLength(ND_FiSiphon)
], Z_FiSiphonCoupling - ElbowRadius(ND_FiSiphon) - Z_FiSiphonPipe4End, [0; -90]*deg, ND_FiSiphon, PS_Default)
# Siphon Air Valve
FiSiphonReducerCyl1 := CylinderF([
    Fi_origin[0] + T_FiWall + SocketDepth(ND_FiSiphon) + ShortTeeLength(ND_FiSiphon);
    Fi_origin[1] + T_ConcreteMin + ConRadius(ND_FiSiphon);
    Z_FiSiphonCoupling + ShortTeeLength(ND_FiSiphon)
], outerradius(ND_FiSiphon), SocketDepth(ND_FiSiphon), [0; 90]*deg)
LayerFiSiphonFreeze := FreezeLayer("FiSiphon")
FiSiphonReducerCyl2 := CylinderF([
    Fi_origin[0] + T_FiWall + SocketDepth(ND_FiSiphon) + ShortTeeLength(ND_FiSiphon);
    Fi_origin[1] + T_ConcreteMin + ConRadius(ND_FiSiphon);
    Z_FiSiphonCoupling + ShortTeeLength(ND_FiSiphon)
], outerradius(ND_FiSiphonAirValve), SocketDepth(ND_FiSiphon), [0; 90]*deg)
FiSiphonReducerGroup := GroupLast("DeleteMe")
FiSiphonReducerSubtract := SubtractF(["FiSiphon"], "DeleteMe")
# maybe don't need this pipe?
FiSiphonAirPipe1 := PipeF([
    Fi_origin[0] + T_FiWall + SocketDepth(ND_FiSiphon) + ShortTeeLength(ND_FiSiphon);
    Fi_origin[1] + T_ConcreteMin + ConRadius(ND_FiSiphon);
    Z_FiSiphonCoupling + ShortTeeLength(ND_FiSiphon)
], Fi_origin[2] + H_Fi - (Z_FiSiphonCoupling + ShortTeeLength(ND_FiSiphon)), [0; 90]*deg, ND_FiSiphonAirValve, PS_Default)
FiSiphonAirValve := insertdwg("BallValve", [
    Fi_origin[0] + T_FiWall + SocketDepth(ND_FiSiphon) + ShortTeeLength(ND_FiSiphon);
    Fi_origin[1] + T_ConcreteMin + ConRadius(ND_FiSiphon);
    Z_FiSiphonCoupling + ShortTeeLength(ND_FiSiphon) + SocketDepth(ND_FiSiphon)
], 2*outerradius(ND_FiSiphonAirValve)*1/(125 in), 2*outerradius(ND_FiSiphonAirValve)*1/(125 in), 0 deg)
FiSiphonSelectLayer := SelectLayer("FiSiphon")
FiSiphonAirValveReducer := stack(FiSiphonReducerCyl1, LayerFiSiphonFreeze, FiSiphonReducerCyl2, FiSiphonReducerGroup, FiSiphonReducerSubtract, FiSiphonSelectLayer, FiSiphonAirValve)
FiSiphonScript := stack(LayerFiCoulingsThaw, FiSiphonCoupling, LayerFiCouplingsFreeze, LayerFiSiphon, FiSiphonManifold1, FiSiphonManifold2, FiSiphonManifoldCap1, FiSiphonManifoldCap2, FiSiphonTee, FreezeFiSiphon, FiSiphonOrifices, GroupDelete, SubtractFiSiphonManOrifices, SelectFiSiphon, FirstFiSiphonManOrifice, GroupDelete, SubtractFiSiphonManOrifices, SelectFiSiphon, FiSiphonPipe1, FiSiphonElbow1, FiSiphonPipe2, FiSiphonPipe3, FiSiphonTee2, FiSiphonPipe4, FiSiphonAirValveReducer, LayerFiSiphonFreeze)
mirror3 := Mirror3dGroup("pipes", "y", [Fi_origin[0]; Fi_origin[1] - T_PlantWall; Fi_origin[2]], "n")
mirror4 := Mirror3dGroup("SRSF filters", "y", [Fi_origin[0]; Fi_origin[1] - T_PlantWall; Fi_origin[2]], "n")
FiScript := stack(FiTankScript, FiKeyPipeScript, FiManSpacerScript, FiTankLadderScript, FiTankCouplingScript, FiManifoldScript, FiSiphonScript)
# Entrance and Exit Box Script
# Tanks
FiLayerFiEntExBoxes := layer_new("FiEntexitboxesCon", ltgrey)
FiExitBox := Tank(FiExitBox_origin + [0 m; 0 m; H_FiExit - FiExitBox_dim[2]], FiExitBox_dim, T_PlantWall)
FiEntBox := Tank(FiEntranceBox_origin + [0 m; 0 m; H_FiEntrance - FiEntranceBox_dim[2]], FiEntranceBox_dim, T_PlantWall)
FiWalkway :=
    if N_Fi == 1
        BoxF([
            FiExitBox_origin[0] - L_FiExit - T_PlantWall;
            Fi_origin[1] - T_FiWall/2 - W_FiBw/2 - T_PlantWall;
            FiExitBox_origin[2] - T_PlantWall
        ], [
            FiExitBox_origin[0] - L_FiExit - T_PlantWall;
            Fi_origin[1] - T_FiWall/2 - W_FiBw/2 - T_PlantWall;
            FiExitBox_origin[2] - T_PlantWall
        ] + [-W_MpWalkway; W_Fi; T_PlantWall], [0; 0; 0]*deg)
    otherwise
        BoxF([
            FiExitBox_origin[0] - L_FiExit - T_PlantWall;
            Fi_origin[1] - T_FiWall/2;
            FiExitBox_origin[2] - T_PlantWall
        ], [
            FiExitBox_origin[0] - L_FiExit - T_PlantWall;
            Fi_origin[1] - T_FiWall/2;
            FiExitBox_origin[2] - T_PlantWall
        ] + [-W_MpWalkway; W_Fi; T_PlantWall], [0; 0; 0]*deg)  # This is only for the case of N.Fi=1
FiLayerFiEntExBoxesFreeze := FreezeLayer("FiEntexitboxesCon")
FiSiphonHole := BoxF([
    Fi_origin[0] + T_FiWall + SocketDepth(ND_FiSiphon) + ShortTeeLength(ND_FiSiphon) + ConRadius(ND_FiSiphon) + 5 cm;
    Fi_origin[1];
    FiExitBox_origin[2] - T_PlantWall
], [
    Fi_origin[0] + T_FiWall - zc;
    Fi_origin[1] + T_ConcreteMin + 2*ConRadius(ND_FiSiphon) + 5 cm;
    FiExitBox_origin[2]
], [0; 0; 0]*deg)
FiSubtractEntExWeirs := SubtractF(["FiEntexitboxesCon"], "DeleteMe")
FiEntExTankScript := stack(FiLayerFiEntExBoxes, FiEntBox, FiExitBox, FiWalkway, union_allA, FiLayerFiEntExBoxesFreeze, FiSiphonHole, FiOverflowWeir, FiDistWeir, FiEntWeir, GroupDelete, FiSubtractEntExWeirs)
# Couplings
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# This will be the pipe layout in the entrance and exit boxes to allow for 2 90 degree elbows in  Pipes 2 and 3 coming from the entrance box (on the right)
FiLayerEntExCoupling := layer_new("FiEntexitcouplingsPlumbing", green)
FiExCoupling0 := CouplingSUBF(FiExitCoupling0_origin, [0; 90]*deg, ND_FiTrunk, PS_Default, ["FiEntexitboxesCon"])
FiExCoupling1 := CouplingSUBF(FiExitCoupling1_origin, [0; 90]*deg, ND_FiTrunk, PS_Default, ["FiEntexitboxesCon"])
FiExCoupling2 := CouplingSUBF(FiExitCoupling2_origin, [0; 90]*deg, ND_FiTrunk, PS_Default, ["FiEntexitboxesCon"])
FiExCoupling3 := CouplingSUBF(FiExitCoupling3_origin, [0; 90]*deg, ND_FiExitWaste, PS_Default, ["FiEntexitboxesCon"])
FiEntCoupling0 := CouplingSUBF(FiBwInletCoupling_origin, [0; 90]*deg, ND_FiBwTrunk, PS_Default, ["FiEntexitboxesCon"])
FiEntCoupling1 := CouplingSUBF(FiInletCoupling1_origin, [0; 90]*deg, ND_FiTrunk, PS_Default, ["FiEntexitboxesCon"])
FiEntCoupling2 := CouplingSUBF(FiInletCoupling2_origin, [0; 90]*deg, ND_FiTrunk, PS_Default, ["FiEntexitboxesCon"])
FiEntCoupling3 := CouplingSUBF(FiInletCoupling3_origin, [0; 90]*deg, ND_FiTrunk, PS_Default, ["FiEntexitboxesCon"])
FiLayerFreezeEntExCouplings := FreezeLayer("FiEntexitcouplingsPlumbing")
mirror5 := Mirror3dGroup("controlcouplings", "y", [Fi_origin[0]; Fi_origin[1] - T_PlantWall; Fi_origin[2]], "n")  # Needs to be checked for N.Fi=2
FiEntExCouplingScript := stack(FiLayerEntExCoupling, FiExCoupling0, FiExCoupling1, FiExCoupling2, FiExCoupling3, FiEntCoupling0, FiEntCoupling1, FiEntCoupling2, FiEntCoupling3, FiLayerFreezeEntExCouplings)
# Pipes
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FiLayerFiPlumbing := layer_new("FiPlumbing", blue)
# This is all of the piping between filter box, entrance and exit
# In means the pipe goes IN TO THE FILTER
# Out means it comes OUT OF THE FILTER
Z_FiInPipe0aStart := FiEntranceBox_origin[2] - CouplingLength(ND_FiBwTrunk) + SocketDepth(ND_FiBwTrunk)
Z_FiInPipe0aEnd := Fi_origin[2] + ConRadius(ND_FiBwManBranch) + ShortTeeLength(ND_FiBwTrunk)
FiInPipe0a := PipeSUBF(FiBwInletCoupling_origin, FiBwInletCoupling_origin[2] - Z_FiInPipe0aEnd, [0; 270]*deg, ND_FiBwTrunk, PS_Default, ["FiEntexitboxesCon"])
FiInTee0a := TeeF([FiBwInletCoupling_origin[0]; FiBwInletCoupling_origin[1]; Z_FiInPipe0aEnd], [0; 0; 90]*deg, ND_FiBwTrunk, PS_Default)
X_FiBwTrunkPipeEnd := Fi_origin[0] + CouplingLength(ND_FiBwTrunk) - SocketDepth(ND_FiBwTrunk)
FiInPipe0b := PipeSUBF([
    FiBwInletCoupling_origin[0] - ShortTeeLength(ND_FiBwTrunk);
    FiBwInletCoupling_origin[1];
    Z_FiInPipe0aEnd - ShortTeeLength(ND_FiBwTrunk)
], FiBwInletCoupling_origin[0] - ShortTeeLength(ND_FiBwTrunk) - X_FiBwTrunkPipeEnd, [0; 0]*deg, ND_FiBwTrunk, PS_Default, ["FiTankCon"])
FiInReducerLarge := CylinderF([
    FiBwInletCoupling_origin[0] + ShortTeeLength(ND_FiBwTrunk) + 10 cm;
    FiBwInletCoupling_origin[1];
    Z_FiInPipe0aEnd - ShortTeeLength(ND_FiBwTrunk)
], innerdiameter(ND_FiBwTrunk, PS_Default)/2, 10 cm, [0; 0]*deg)
FiInReducerSmall := CylinderF([
    FiBwInletCoupling_origin[0] + ShortTeeLength(ND_FiBwTrunk) + 2*10*cm;
    FiBwInletCoupling_origin[1];
    Z_FiInPipe0aEnd - ShortTeeLength(ND_FiBwTrunk)
], innerdiameter(3 in, PS_Default)/2, 10 cm, [0; 0]*deg)
FiInValve := insertdwg("VAL-Scaled-Gate-Valve-Threaded", [
    FiBwInletCoupling_origin[0] + ShortTeeLength(ND_FiBwTrunk) + 2*10*cm + 0.6*ValveLength(3 in);
    FiBwInletCoupling_origin[1];
    Z_FiInPipe0aEnd - ShortTeeLength(ND_FiBwTrunk)
], 3 in/(1.16 m), 3 in/(1.16 m), 0 deg)
# The valve length and socket functions are not returning the correct numbers, so for now, I am arbitrarily setting the valve over by 60% of its length as returned by the function
FiIn0Script := stack(FiInPipe0a, FiInTee0a, FiInPipe0b, FiInReducerLarge, FiInReducerSmall, FiInReducerLarge, FiInReducerSmall, FiInValve)
Z_FiInPipe1aEnd := Fi_origin[2] + ConRadius(ND_FiBwManBranch) + ElbowRadius(ND_FiTrunk) + 2*H_FiLayer
FiInPipe1a := PipeSUBF(FiInletCoupling1_origin, FiInletCoupling1_origin[2] - Z_FiInPipe1aEnd, [0; 270]*deg, ND_FiTrunk, PS_Default, ["FiEntexitboxesCon"])
FiInElbow1a := ElbowF([FiInletCoupling1_origin[0]; FiInletCoupling1_origin[1]; Z_FiInPipe1aEnd], [0; 0; -90]*deg, ND_FiTrunk, PS_Default)
X_FiTrunkPipeEnd := Fi_origin[0] + CouplingLength(ND_FiTrunk) - SocketDepth(ND_FiTrunk)
FiInPipe1b := PipeSUBF([
    FiInletCoupling1_origin[0] - ElbowRadius(ND_FiTrunk);
    FiBwInletCoupling_origin[1];
    Z_FiInPipe1aEnd - ElbowRadius(ND_FiTrunk)
], FiInletCoupling1_origin[0] - ElbowRadius(ND_FiTrunk) - X_FiTrunkPipeEnd, [0; 0]*deg, ND_FiTrunk, PS_Default, ["FiTankCon"])
FiIn1Script := stack(FiInPipe1a, FiInElbow1a, FiInPipe1b)
Z_FiInPipe2aEnd := Z_FiInPipe1aEnd + 2*H_FiLayer
FiInPipe2a := PipeSUBF(FiInletCoupling2_origin, FiInletCoupling2_origin[2] - Z_FiInPipe2aEnd, [0; 270]*deg, ND_FiTrunk, PS_Default, ["FiEntexitboxesCon"])
FiInElbow2a := ElbowF([FiInletCoupling2_origin[0]; FiInletCoupling2_origin[1]; Z_FiInPipe2aEnd], [0; 0; -90]*deg, ND_FiTrunk, PS_Default)
X_FiInPipe2bEnd := FiExitCoupling1_origin[0] - ConRadius(ND_FiTrunk) - T_ConcreteMin  # Gives 5 cm of clearance plus the elbow radius
FiInPipe2b := PipeF([
    FiInletCoupling2_origin[0] - ElbowRadius(ND_FiTrunk);
    FiInletCoupling2_origin[1];
    Z_FiInPipe2aEnd - ElbowRadius(ND_FiTrunk)
], FiInletCoupling2_origin[0] - ElbowRadius(ND_FiTrunk) - X_FiInPipe2bEnd, [0; 0]*deg, ND_FiTrunk, PS_Default)
FiInElbow2b := ElbowF([X_FiInPipe2bEnd; FiInletCoupling2_origin[1]; Z_FiInPipe2aEnd - ElbowRadius(ND_FiTrunk)], [-90; 180; 0]*deg, ND_FiTrunk, PS_Default)
Y_FiInPipe2cEnd := Fi_origin[1] + W_Fi - ConRadius(ND_FiBwTrunk) - ElbowRadius(ND_FiTrunk)  # This is BwTrunk because the Fi Trunks line up with that one
FiInPipe2c := PipeF([
    X_FiInPipe2bEnd - ElbowRadius(ND_FiTrunk);
    FiInletCoupling2_origin[1] + ElbowRadius(ND_FiTrunk);
    Z_FiInPipe2aEnd - ElbowRadius(ND_FiTrunk)
], Y_FiInPipe2cEnd - (FiInletCoupling2_origin[1] + ElbowRadius(ND_FiTrunk)), [-90; 0]*deg, ND_FiTrunk, PS_Default)
FiInElbow2c := ElbowF([
    X_FiInPipe2bEnd - ElbowRadius(ND_FiTrunk);
    Y_FiInPipe2cEnd;
    Z_FiInPipe2aEnd - ElbowRadius(ND_FiTrunk)
], [0; 0; 0]*deg, ND_FiTrunk, PS_Default)
FiInPipe2d := PipeSUBF([
    X_FiInPipe2bEnd - 2*ElbowRadius(ND_FiTrunk);
    Y_FiInPipe2cEnd + ElbowRadius(ND_FiTrunk);
    Z_FiInPipe2aEnd - ElbowRadius(ND_FiTrunk)
], X_FiInPipe2bEnd - 2*ElbowRadius(ND_FiTrunk) - X_FiTrunkPipeEnd, [0; 0]*deg, ND_FiTrunk, PS_Default, ["FiTankCon"])
FiIn2Script := stack(FiInPipe2a, FiInElbow2a, FiInPipe2b, FiInElbow2b, FiInPipe2c, FiInElbow2c, FiInPipe2d)
Z_FiInPipe3aEnd := Z_FiInPipe2aEnd + 2*H_FiLayer
FiInPipe3a := PipeSUBF(FiInletCoupling3_origin, FiInletCoupling3_origin[2] - Z_FiInPipe3aEnd, [0; 270]*deg, ND_FiTrunk, PS_Default, ["FiEntexitboxesCon"])
FiInElbow3a := ElbowF([FiInletCoupling3_origin[0]; FiInletCoupling3_origin[1]; Z_FiInPipe3aEnd], [0; 0; -90]*deg, ND_FiTrunk, PS_Default)
X_FiInPipe3bEnd := X_FiInPipe2bEnd
FiInPipe3b := PipeF([
    FiInletCoupling3_origin[0] - ElbowRadius(ND_FiTrunk);
    FiInletCoupling3_origin[1];
    Z_FiInPipe3aEnd - ElbowRadius(ND_FiTrunk)
], FiInletCoupling3_origin[0] - ElbowRadius(ND_FiTrunk) - X_FiInPipe3bEnd, [0; 0]*deg, ND_FiTrunk, PS_Default)
FiInElbow3b := ElbowF([X_FiInPipe3bEnd; FiInletCoupling3_origin[1]; Z_FiInPipe3aEnd - ElbowRadius(ND_FiTrunk)], [-90; 180; 0]*deg, ND_FiTrunk, PS_Default)
Y_FiInPipe3cEnd := Y_FiInPipe2cEnd
FiInPipe3c := PipeF([
    X_FiInPipe3bEnd - ElbowRadius(ND_FiTrunk);
    FiInletCoupling3_origin[1] + ElbowRadius(ND_FiTrunk);
    Z_FiInPipe3aEnd - ElbowRadius(ND_FiTrunk)
], Y_FiInPipe3cEnd - (FiInletCoupling3_origin[1] + ElbowRadius(ND_FiTrunk)), [-90; 0]*deg, ND_FiTrunk, PS_Default)
FiInElbow3c := ElbowF([
    X_FiInPipe3bEnd - ElbowRadius(ND_FiTrunk);
    Y_FiInPipe3cEnd;
    Z_FiInPipe3aEnd - ElbowRadius(ND_FiTrunk)
], [0; 0; 0]*deg, ND_FiTrunk, PS_Default)
FiInPipe3d := PipeSUBF([
    X_FiInPipe3bEnd - 2*ElbowRadius(ND_FiTrunk);
    Y_FiInPipe3cEnd + ElbowRadius(ND_FiTrunk);
    Z_FiInPipe3aEnd - ElbowRadius(ND_FiTrunk)
], X_FiInPipe3bEnd - 2*ElbowRadius(ND_FiTrunk) - X_FiTrunkPipeEnd, [0; 0]*deg, ND_FiTrunk, PS_Default, ["FiTankCon"])
FiIn3Script := stack(FiInPipe3a, FiInElbow3a, FiInPipe3b, FiInElbow3b, FiInPipe3c, FiInElbow3c, FiInPipe3d)
Z_FiOutPipe0aEnd := Z_FiInPipe1aEnd + H_FiLayer
FiOutPipe0a := PipeSUBF(FiExitCoupling0_origin, FiExitCoupling0_origin[2] - Z_FiOutPipe0aEnd, [0; -90]*deg, ND_FiTrunk, PS_Default, ["FiEntexitboxesCon"])
FiOutElbow0a := ElbowF([FiExitCoupling0_origin[0]; FiExitCoupling0_origin[1]; Z_FiOutPipe0aEnd], [0; 0; -90]*deg, ND_FiTrunk, PS_Default)
FiOutPipe0b := PipeSUBF([
    FiExitCoupling0_origin[0] - ElbowRadius(ND_FiTrunk);
    FiExitCoupling0_origin[1];
    Z_FiOutPipe0aEnd - ElbowRadius(ND_FiTrunk)
], FiExitCoupling0_origin[0] - ElbowRadius(ND_FiTrunk) - X_FiTrunkPipeEnd, [0; 0]*deg, ND_FiTrunk, PS_Default, ["FiTankCon"])
FiOut0Script := stack(FiOutPipe0a, FiOutElbow0a, FiOutPipe0b)
Z_FiOutPipe1aEnd := Z_FiOutPipe0aEnd + 2*H_FiLayer
FiOutPipe1a := PipeSUBF(FiExitCoupling1_origin, FiExitCoupling1_origin[2] - Z_FiOutPipe1aEnd, [0; -90]*deg, ND_FiTrunk, PS_Default, ["FiEntexitboxesCon"])
FiOutElbow1a := ElbowF([FiExitCoupling1_origin[0]; FiExitCoupling1_origin[1]; Z_FiOutPipe1aEnd], [0; 0; -90]*deg, ND_FiTrunk, PS_Default)
FiOutPipe1b := PipeSUBF([
    FiExitCoupling1_origin[0] - ElbowRadius(ND_FiTrunk);
    FiExitCoupling1_origin[1];
    Z_FiOutPipe1aEnd - ElbowRadius(ND_FiTrunk)
], FiExitCoupling1_origin[0] - ElbowRadius(ND_FiTrunk) - X_FiTrunkPipeEnd, [0; 0]*deg, ND_FiTrunk, PS_Default, ["FiTankCon"])
FiOut1Script := stack(FiOutPipe1a, FiOutElbow1a, FiOutPipe1b)
Z_FiOutPipe2aEnd := Z_FiOutPipe0aEnd - 2*H_FiLayer
FiOutPipe2a := PipeSUBF(FiExitCoupling2_origin, FiExitCoupling2_origin[2] - Z_FiOutPipe2aEnd, [0; -90]*deg, ND_FiTrunk, PS_Default, ["FiEntexitboxesCon"])
FiOutElbow2a := ElbowF([FiExitCoupling2_origin[0]; FiExitCoupling2_origin[1]; Z_FiOutPipe2aEnd], [-90; 90; 0]*deg, ND_FiTrunk, PS_Default)
Y_FiOutPipe2cEnd := Y_FiInPipe2cEnd
FiOutPipe2b := PipeF([
    FiExitCoupling2_origin[0];
    FiExitCoupling2_origin[1] + ElbowRadius(ND_FiTrunk);
    Z_FiOutPipe2aEnd - ElbowRadius(ND_FiTrunk)
], Y_FiOutPipe2cEnd - (FiExitCoupling2_origin[1] + ElbowRadius(ND_FiTrunk)), [-90; 0]*deg, ND_FiTrunk, PS_Default)
FiOutElbow2b := ElbowF([FiExitCoupling2_origin[0]; Y_FiOutPipe2cEnd; Z_FiOutPipe2aEnd - ElbowRadius(ND_FiTrunk)], [0; 0; 0]*deg, ND_FiTrunk, PS_Default)
FiOutPipe2c := PipeSUBF([
    FiExitCoupling2_origin[0] - ElbowRadius(ND_FiTrunk);
    Y_FiOutPipe2cEnd + ElbowRadius(ND_FiTrunk);
    Z_FiOutPipe2aEnd - ElbowRadius(ND_FiTrunk)
], FiExitCoupling2_origin[0] - ElbowRadius(ND_FiTrunk) - X_FiTrunkPipeEnd, [0; 0]*deg, ND_FiTrunk, PS_Default, ["FiTankCon"])
FiOut2Script := stack(FiOutPipe2a, FiOutElbow2a, FiOutPipe2b, FiOutElbow2b, FiOutPipe2c)
Z_FiOutPipe3aEnd := FiExitCoupling3_origin[2] - max((T_PlantWall - CouplingLength(ND_FiBwDrain)) + 2*SocketDepth(ND_FiBwDrain), 2*SocketDepth(ND_FiBwDrain))
FiOutPipe3a := PipeSUBF(FiExitCoupling3_origin, FiExitCoupling3_origin[2] - Z_FiOutPipe3aEnd, [0; -90]*deg, ND_FiExitWaste, PS_Default, ["FiEntexitboxesCon"])
FiOut3RotAng := atan((FiBwDrainCoupling_origin[1] + (W_FiBwWeirDrain/4) - FiExitCoupling3_origin[1])/(FiBwDrainCoupling_origin[0] - FiExitCoupling3_origin[0]))
X_FiOutPipe3bStart := FiExitCoupling3_origin[0] - ElbowRadius(ND_FiExitWaste)*cos(FiOut3RotAng)
Y_FiOutPipe3bStart := FiExitCoupling3_origin[1] - ElbowRadius(ND_FiExitWaste)*sin(FiOut3RotAng)
X_FiOutPipe3bEnd := FiBwDrainCoupling_origin[0] + ElbowRadius(ND_FiExitWaste)*cos(FiOut3RotAng)
Y_FiOutPipe3bEnd := FiBwDrainCoupling_origin[1] + (W_FiBwWeirDrain/4) + ElbowRadius(ND_FiExitWaste)*sin(FiOut3RotAng)
FiOutElbow3a := ElbowF([FiExitCoupling3_origin[0]; FiExitCoupling3_origin[1]; Z_FiOutPipe3aEnd], [180; 180 + FiOut3RotAng/deg; 90]*deg, ND_FiExitWaste, PS_Default)
L_FiOutPipe3b := sqrt((X_FiOutPipe3bEnd - X_FiOutPipe3bStart)^2 + (Y_FiOutPipe3bEnd - Y_FiOutPipe3bStart)^2)
FiOutPipe3b := PipeF([X_FiOutPipe3bStart; Y_FiOutPipe3bStart; Z_FiOutPipe3aEnd - ElbowRadius(ND_FiExitWaste)], L_FiOutPipe3b, [FiOut3RotAng/deg; 0]*deg, ND_FiExitWaste, PS_Default)
FiOutElbow3b := ElbowF([X_FiOutPipe3bEnd; Y_FiOutPipe3bEnd; Z_FiOutPipe3aEnd - ElbowRadius(ND_FiExitWaste)], [90; FiOut3RotAng/deg; 90]*deg, ND_FiExitWaste, PS_Default)
Z_FiOutPipe3cEnd := Z_FiBwWeirDrainBottom + H_FiBwWeirDrain - 10 cm
FiOutPipe3c := PipeF([
    X_FiOutPipe3bEnd - ElbowRadius(ND_FiExitWaste)*cos(FiOut3RotAng);
    Y_FiOutPipe3bEnd - ElbowRadius(ND_FiExitWaste)*sin(FiOut3RotAng);
    Z_FiOutPipe3aEnd - 2*ElbowRadius(ND_FiExitWaste)
], Z_FiOutPipe3aEnd - 2*ElbowRadius(ND_FiExitWaste) - Z_FiOutPipe3cEnd, [0; -90]*deg, ND_FiExitWaste, PS_Default)
FiOut3Script := stack(FiOutPipe3a, FiOutElbow3a, FiOutPipe3b, FiOutElbow3b, FiOutPipe3c)
FiLayerFreezeFiPlumbing := FreezeLayer("FiPlumbing")
FiEntExitPipingScript := stack(FiLayerFiPlumbing, FiIn0Script, FiIn1Script, FiIn2Script, FiIn3Script, FiOut0Script, FiOut1Script, FiOut2Script, FiOut3Script, FiLayerFreezeFiPlumbing)
mirror6 := Mirror3dGroup("controlpipes", "y", [Fi_origin[0]; Fi_origin[1] - T_PlantWall; Fi_origin[2]], "n")
mirror7 := Mirror3dGroup("SRSF controlboxes", "y", [Fi_origin[0]; Fi_origin[1] - T_PlantWall; Fi_origin[2]], "n")
FiEntExitScript := stack(FiEntExTankScript, FiEntExCouplingScript, FiEntExitPipingScript)
# Sand Drain
# this all needs to be updated to a wye at some point
FiSandDrainPipe_Origin := Fi_origin + [
    -L_Fi + B_FiManifoldBranch;
    ElbowRadius(ND_FiBwManBranch) + SocketDepth(ND_FiBwManBranch) + S_Fitting + ND_FiSandOutlet;
    2*ConRadius(ND_FiBwManBranch)
]
L_FiSandDrainPipeVert := H_FiSandOutlet + CapHeight(ND_FiSandOutlet) + B_FiManifoldBranch + T_PlantWall + 2*ValveLength(ND_FiSandOutlet)
FiSandDrainPipeLayer := layer_new("FiSandDrain", blue)
DrawFiSandDrainPipeVert := PipeF(FiSandDrainPipe_Origin, L_FiSandDrainPipeVert, [0; 90]*deg, ND_FiSandOutlet, PS_Default)
L_FiSandDrainPipeAngled := sqrt(2)*(2*outerradius(ND_FiSandOutlet) + B_FiManifoldBranch + T_PlantWall + 2*ValveLength(ND_FiSandOutlet) - (ValveLength(ND_FiSandOutlet) + ValveSocket(ND_FiSandOutlet))/sqrt(2))
DrawFiSandDrainPipeAngled := PipeSUBF([
    FiSandDrainPipe_Origin[0] - (B_FiManifoldBranch + T_PlantWall + 2*ValveLength(ND_FiSandOutlet));
    FiSandDrainPipe_Origin[1];
    Fi_origin[2] + H_FiSandOutlet - (ValveLength(ND_FiSandOutlet) + ValveSocket(ND_FiSandOutlet))/sqrt(2) + 2*outerradius(ND_FiManBranch)
], L_FiSandDrainPipeAngled, [0; 135]*deg, ND_FiSandOutlet, PS_Default, ["FiTank"])
DrawFiOutletCap := CapF([0; 0; L_FiSandDrainPipeVert] + FiSandDrainPipe_Origin, [0; 270]*deg, ND_FiSandOutlet)
DrawFiSandOutletValve := insertdwg("VAL-Scaled-Gate-Valve-Threaded", [
    FiSandDrainPipe_Origin[0] - (B_FiManifoldBranch + T_PlantWall + 2*ValveLength(ND_FiSandOutlet));
    FiSandDrainPipe_Origin[1];
    Fi_origin[2] + H_FiSandOutlet - (ValveLength(ND_FiSandOutlet) + ValveSocket(ND_FiSandOutlet))/sqrt(2) + 2*outerradius(ND_FiManBranch)
], 2*outerradius(ND_FiSandOutlet)/(1.16 m), 2*outerradius(ND_FiSandOutlet)/(1.16 m), 0 deg)
RotateFiSandOutletValve := Rotate3DLast([
    FiSandDrainPipe_Origin[0] - (B_FiManifoldBranch + T_PlantWall + 2*ValveLength(ND_FiSandOutlet));
    FiSandDrainPipe_Origin[1];
    Fi_origin[2] + H_FiSandOutlet - (ValveLength(ND_FiSandOutlet) + ValveSocket(ND_FiSandOutlet))/sqrt(2) + 2*outerradius(ND_FiManBranch)
], "y", -45 deg)
FreezeFiSandDrain := FreezeLayer("FiSandDrain")
FiSandDrainScript := stack(FiSandDrainPipeLayer, DrawFiSandDrainPipeVert, DrawFiSandDrainPipeAngled, DrawFiOutletCap, DrawFiSandOutletValve, RotateFiSandOutletValve, FreezeFiSandDrain)
# Secondary Sand Drain
ND_FiSandOutletSec := 1.5 in
FiSandSecLayer := layer_new("FiSanddrainsecondary", blue)
FiSandSecCoupling := CouplingSUBF([
    -L_Fi - SocketDepth(ND_FiSandOutletSec);
    S_Fitting + ConRadius(ND_FiSandOutletSec);
    S_Fitting + ConRadius(ND_FiSandOutletSec)
] + Fi_origin, [0; 0]*deg, ND_FiSandOutletSec, PS_Default, ["FiTankCon"])
L_FiSandSecPipe := max(T_FiWall - CouplingLength(ND_FiSandOutletSec), 0 m) + SocketDepth(ND_FiSandOutletSec) + ValveSocket(ND_FiSandOutletSec) + 2*S_Fitting
FiSandSecPipe := PipeSUBF([
    -L_Fi - CouplingLength(ND_FiSandOutletSec) + SocketDepth(ND_FiSandOutletSec);
    S_Fitting + ConRadius(ND_FiSandOutletSec);
    S_Fitting + ConRadius(ND_FiSandOutletSec)
] + Fi_origin, L_FiSandSecPipe, [0; 0]*deg, ND_FiSandOutletSec, PS_Default, ["FiTankCon"])
FiSandSecValve := insertdwg("VAL-Scaled-Gate-Valve-Threaded", [
    -L_Fi - CouplingLength(ND_FiSandOutletSec) + SocketDepth(ND_FiSandOutletSec) - L_FiSandSecPipe + ValveLength(ND_FiSandOutletSec) - ValveSocket(ND_FiSandOutlet);
    S_Fitting + ConRadius(ND_FiSandOutletSec);
    S_Fitting + ConRadius(ND_FiSandOutletSec)
] + Fi_origin, 2*outerradius(ND_FiSandOutletSec)/(1.16 m), 2*outerradius(ND_FiSandOutletSec)/(1.16 m), 0 deg)
FreezeFiSandSec := FreezeLayer("FiSanddrainsecondary")
FiSandDrainSecondaryScript := stack(FiSandSecLayer, FiSandSecCoupling, FiSandSecPipe, FiSandSecValve, FreezeFiSandSec)
# Mirror and Array the Filter
ThawFilter := layer_thaw("Fi*")
FreezeFiPieces := FreezeMultiple(["FiAuxPlumbing"; "FiCouplingPlumbing"; "FiBw*"; "FiOverflowCon"; "FiInletchannelCon"])
MirrorFilter := Mirror3dAll("zx", [0 m; Fi_origin[1] - T_FiWall/2], "n")
# ThawFilter
FreezeFiInletChannel := FreezeLayer("FiInletChannelCon")
ArrayFilter := array_all(N_Fi/2, 1, -max((W_Fi + T_FiWall)*2, 2*W_FiEntrance + W_FiOverflow + 3*T_PlantWall))
FreezeRestFi := layer_freeze("Fi*")
FiMirrorScript := stack(ThawFilter, FreezeFiPieces, MirrorFilter)
AC_Filter :=
    stack(FiInletChannelScript, FiAuxScript, FiScript, FiEntExitScript, FiSandDrainScript, FiSandDrainSecondaryScript) if N_Fi == 1
    stack(FiInletChannelScript, FiAuxScript, FiScript, FiEntExitScript, FiSandDrainScript, FiSandDrainSecondaryScript, FiMirrorScript, FreezeRestFi) if N_Fi == 2
    stack(FiInletChannelScript, FiAuxScript, FiScript, FiEntExitScript, FiSandDrainScript, FiSandDrainSecondaryScript, FiMirrorScript, ThawFilter, FreezeFiInletChannel, ArrayFilter, FreezeRestFi) otherwise
