# [reference: MasterProgram.xmcd]
Q_FcmAlum := Q_Plant*C_FcmDoseMax/C_FcmAlum = 3.75e-5 m^3/s
Q_FcmAlum = 3.75e-5 m^3/s
H_Alumtank(Q_FcmAlum, Kvc, D_FcmValveOrifice, g) := (Q_FcmAlum/(Kvc*(.5*D_FcmValveOrifice)^2*π))^2/(2*g)
V_Alumtank(Q_FcmAlum, Ti_StockMin) := Ti_StockMin*Q_FcmAlum
D_Alumtank(V_Alumtank, H_Alumtank) := 2*(V_Alumtank/H_Alumtank)^.5/π^.5
Qalummax(Kvc, Area, g, h) := Kvc*Areaorificefloatvalve*(g*2*htank)^.5  # error: This variable is undefined.
Qalummax(2*m^3/s, .001*g/L, 1*g/L) =  # error: This variable is undefined.
Qalummax(2*m^3/s, .001*g/L, 1*g/L) =  # error
