# Linear Chemical Dose Controller
# References
# Design Inputs
Q_Plant = L/s
D_CdcAvailable1 := [0.0625; 0.0937; 0.125; 0.1562; 0.1875; 0.25]*in
D_CdcBarb1 := [0.047 in; 0.07 in; 0.075 in; 2.5 mm; 3 mm; 0.201 in]
C_CoagStock = gm/L  # The user input for coagulant stock concentration.
C_CoagDoseMax = mg/L  # The maximum concentration of coagulant in the plant.
Q_CdcMax := Q_Plant*C_CoagDoseMax/C_CoagStock
Q_CdcMax =  # error: This variable is undefined.
D_CdcAvailable := [2; 3.175; 4; 5; 6; 6.5]*mm
D_CdcBarb := [0.047 in; 0.075 in; 2.5 mm; 3 mm; 4 mm; 0.201 in]
HL_Cdc =  # error
L_CdcDtMin := 80 cm
# The length of the dosing tube has to be at least as great as the maximum head loss with some additional length to be able to reach the ports
L_CdcDtMax := 2 m  # The maximum length of tubing that we are willing to use for the dosing tube.
E_Tube := 0 mm
Nu_Water =  # error  # Assume that the kinematic viscosity of coagulant is similar to that of water.
K_CdcTube := 5  # Minor loss coefficient estimated from CDC research team data. Will be different after CDC research team changes their set-up.
# Estimating the minor loss coefficient
# **Estimating the minor loss coefficients from the barbed fitting and the dosing tube
# An attempt was made to quantify the minor losses in the system. The values obtained were different then those found in the lab. Thus, the minor loss coefficient used in this file was an average of those found by the CDC research team. This value (K.CdcTube) will need to be changed with further research.
D_CdcDt := 0.124 in
# The minor loss coefficient can be estimated by quantifying the entrance, expansion, and exit losses. In the CDC setup, there are two barbed fittings which introduce head loss. One barbed fitting connects the constant head tank to the dosing tubes and the other one connects the dosing tube to the drop tube. There are also minor losses because of changes in flow direction.
D_CdcBarb := 0.118 in
D_CdcBarb2 := 0.117 in
# 1. Entrance losses in the barbed fitting.
# For a 90 degree turn, the entrance minor loss coefficient is 0.5. This loss is in the barbed fitting that connects the constant head tank to the dosing tubes. This loss must be translated into a loss in the dosing tube so all the minor loss coefficients can be directly summed.
#
# Using a mass balance on the flow rate,  so Qin = Qout => VinAin =  VoutAou (‘in’ denotes the barbed fitting and ‘out’ denotes the dosing tubes). Rearranging in terms of Vin,  Vin = VoutAout/Ain. Vin is then substitutd into the minor loss equation for losses in the barbed fitting,  Thus, the minor loss coefficient can be represented in terms out V.out (in the dosing tube).
K_Entrance := 0.5
K_EntranceDt(D_CdcDt, D_CdcBarb) := K_Entrance*(A_circle(D_CdcDt)/A_circle(D_CdcBarb))^2
# 2. Expansion losses into the dosing tube from the barbed fitting.
# The losses from the flow expansion from the barbed fitting into the dosing tubes are described by the following equation: h = (Vin -Vout)^2/2g. Performing a mass balance on the flow as before, this equation then becomes: h = Vout^2 (Aout/Ain -1)^2/ 2g. The minor loss coefficient is thus,  (Aout/Ain -1)^2/ 2g.
K_Expansion(D_CdcDt, D_CdcBarb) := (A_circle(D_CdcDt)/A_circle(D_CdcBarb) - 1)^2
# 3. Exit losses from the dosing tube.
K_Exit := 2
# The exit losses from the dosing tube are assumed to be 2 because the centerline velocity in the tube is double the average velocity.
# 4. Contraction losses from tube into the barbed fitting
# There are losses as the flow travels from the dosing tube into the barbed fitting on the drop tube. The losses are from the expansion after the contraction from the barbed fitting. The losses are dependednt on a contraction coefficient. The contraction coefficient is described by the ratio between the barbed fitting area and the dosing tube area. The figure below describes this relationship.
ARatio(D_CdcDt, D_CdcBarb2) := A_circle(D_CdcBarb2)/A_circle(D_CdcDt)
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ARatio(D_CdcDt, D_CdcBarb2) =  # error
C_c := 0.9  # Estimate the contraction coefficient using the area ratio and the graph on the right.
K_Expansion2(C_c, D_CdcDt, D_CdcBarb2) := (1/C_c - 1)^2*(A_circle(D_CdcDt)/A_circle(D_CdcBarb2))^2
# From: Monroe Weber-Shirk Lecture Notes
# 5.Total minor loss coefficient
K_Total(D_CdcDt, D_CdcBarb, D_CdcBarb2) := K_EntranceDt(D_CdcDt, D_CdcBarb) + K_Expansion(D_CdcDt, D_CdcBarb) + K_Exit + K_Expansion2(C_c, D_CdcDt, D_CdcBarb2)
# The total minor loss coefficient is the summation of the coefficients above because they are all in terms of the velocity in the dosing tube.
K_Total(D_CdcDt, D_CdcBarb, D_CdcBarb2) =  # error
# Tube Diameter
# 1. Determine the minimum diameter required.
# One approach to designing the system is to first determine the tubing diameter size and then calculate the other parameters such as length from that. The tubing size is determined by calculating the minimum diameter sizes required to satisfy the different constraints such as mantaining laminar flow and achieving the desired head loss. This method is described below. The required tubing diameter size to maintain all the constraints can be large, which leads to excessively long tubing lengths to acheive the necessary head loss through the system. This is especially a problem when attempting to limit the minor loss through the system. Thus, a reasonable diameter is used and then the other parameters are calculated from that.
# a) Minimum diameter based on laminar flow contraint.
# Minimum diameter required to get laminar flow at max flow based on Reynolds number for transition to turbulence
D_MinLaminar(Q_max, ν) := 4*Q_max/(π*ν*Re_PipeTransition)
# The coagulant flow rate in the dosing tubes must remain laminar even at the highest coagulant flow rate to maintain a linear relationship between head loss and flow rate. The minimum diameter size to maintain laminar flow is calculated using the Reynolds number equation with the Reynolds number as 2100, the number for the transition from laminar to turbulent flow.
# Minimum diameter for the particular coagulant flow to maintain laminar flow.
D_MinLaminar(Q_CdcMax, Nu_Water) =  # error
# Maximum diameter the system will require while keeping the tubing length reasonable
# The maximum coagulant flow rate that will maintain laminar flow in the dosing tubes is determined using the Hagen-Poiseuille equation and the Reynolds number constraint for laminar flow in order to remove diameter from the equation. This maximum flow is constrained by the maximum tubing length set above so the design doesn't produce excessively long tubes.For higher flows multiple parallel tubes could be used. However, the maximum flow rate that can be handled by the float valve needs to be considered.
Q_CdcMaxLaminar(L_max, h_fmax, ν) := (L_max*Re_PipeTransition^4*π^3*ν^5/(2*g*h_fmax))^(1/3)
Q_CdcMaxLaminar(L_CdcDtMax, HL_Cdc, Nu_Water) =  # error
# Diameter of tubing required to accomodate the largest flow that a flow control module can deliver without requiring an excessively long tube
# The largest tubing diameter that would be required to accommodate this maximum coagulant flow (see above) through a tube is calculated using the minimum diameter to maintain laminar flow function.
D_MinLaminar(Q_CdcMaxLaminar(L_CdcDtMax, HL_Cdc, Nu_Water), Nu_Water) =  # error
# b) Minimum diameter based on head loss constraint.
# Calculate the minimum diameter required to produce the desired head loss at the maximum
# flow using the minimum length of tubing. Based on the Hagen-Poiseuille equation.
# The minimum diameter required to achieve the maximum head loss at the maximum coagulant flow rate is calculated using the Hagen-Poiseuille equation. The minimum length of tubing is used to ensure there is enough head loss even at a shorter tubing length. Q.CdcCoagulantMax is the maximum coagulant flow for the design.
D_Hagen(Q, h_f, L, ν) := (128*ν*Q*L/(g*h_f*π))^(1/4)
D_MinHeadLoss(Q_max, L_min, h_fmax, ν) := D_Hagen(Q_max, h_fmax, L_min, ν)
D_MinHeadLoss(Q_CdcMax, L_CdcDtMin, HL_Cdc, Nu_Water) =  # error
# c) Minimum diameter to ensure minor losses are small compared to the total head loss.
# Set the minor loss to be at most 15% of the total head loss available.
# The linear dosing system requires major head losses rather than minor losses to dominate because major head losses have a linear relationship between head loss and flow rate. Because minor losses cannot be completely elimated, the tubing diameter can be designed to constrain them to be certain percentage of the total hydraulic head available. The minimum dosing tube diameter required to keep the minor head loss below the desired maximum minor head loss is calculated using the D.PipeMinor function in the fluids function file, which is just the minor loss equation.
Pi_CdcQerror := 0.15
HL_MinorMax := Pi_CdcQerror*HL_Cdc
D_MinMinorLoss := D_PipeMinor(Q_CdcMax, HL_MinorMax, K_CdcTube) = 7.46148 mm
# d) Minimum diameter than satisfies laminar flow, head loss, and the minor loss constraints.
# The minimum diameter required would be the one that maintains laminar flow at the max length of tubing and produces the necessary head loss at the minimum length of tubing. Thus, the minimum diameter chosen in the one that is the maximum of the two previous diameters calculated. The diameters can be larger than the one calculated, but they cannot be smaller.
D_CdcMin(Q_max, L_min, h_fmax, ν, h_emax, K) := max(D_MinLaminar(Q_max, ν), D_MinHeadLoss(Q_max, L_min, h_fmax, ν), D_PipeMinor(Q_max, h_emax, K))
D_CdcMin(Q_CdcMax, L_CdcDtMin, HL_Cdc, Nu_Water, HL_MinorMax, K_CdcTube) =  # error
# e) Tube diameter constraint
# There is also a constraint of the available tube diameters. First we write a function that will round up to the up to the next available tube size.
forceround(x, xarray, direction) :=
    xarray ← sort(xarray)
    i ← 0
    while x > xarray[i]
        i ← i + 1
    return xarray[i - 1 + direction]  # direction is for rounding up (1) or rounding down (0).
D_CdcAvailable = [2; 3.175; 4; 5; 6; 6.5] mm
# Now we use the forceround function to find the design tube diameter based on the minimum tube diameter and the available tube diameters.
D_CdcDtDesignf(Q_max, L_min, h_fmax, ν, h_emax, K) := forceround(D_CdcMin(Q_max, L_min, h_fmax, ν, h_emax, K), D_CdcAvailable, 1)
D_DtDesign := D_CdcDtDesignf(Q_CdcMax, L_CdcDtMin, HL_Cdc, Nu_Water, HL_MinorMax, K_CdcTube)
D_DtDesign =  # error
# This is the min diameter of tube that meets laminar flow, head loss, and minor  loss constraints.
# A diameter of 0.125 in (measured to be 0.124in in the lab) will be used because it provides reasonable lengths of tubing rather than using the method above. The diameter sizes calculated using the constraint method can produce large diameters that will in turn necessitate extremely long tubing lengths to achieve the desired head loss.
D_CdcDtDesign := 0.124 in
# Maximum coagulant flow per tube (limiting minor losses)
HL_MinorMax =  # error
D_CdcDtDesign = 0.124 in
Q_MaxMinor := Q_pipeminor(D_CdcDtDesign, HL_MinorMax, K_CdcTube)
# The maximum flow rate through the dosing tube will have an upper limit that relates to the upper limit on the minor head loss through the system. The minor loss equation was used to determine this maximum flow rate.
Q_MaxMinor =  # error
# Design calculations: Number of tubes, tubing length, total maximum doser flow rate
# If you set the max tubing length such that a small region meets that criteria it can cause a noncontinuous solution with a gap that has too high a tubing length.
# Number of tubes:
Q_MaxMinor =  # error
# The maximum flow rate you can get out of the dosing tube with the optimal diameter, keeping minor losses below a certain percentage of the total head loss available.
# A reducer is required if the number of tubes is greater than 3. The reducer can have have at most 9 dosing tubes.
N_TubesMax := 9
N_Tubef(Q_Coag, Q_CoagMaxDesign) := ceil(Q_Coag/Q_CoagMaxDesign)
# The number of tubes required for the system is determined using the maximum coagulant flow calculated above and the maximum coagulant flow rate required for the particular design. The number of tubes is rounded up to the nearest integer.
N_Tube := N_Tubef(Q_CdcMax, Q_MaxMinor)
N_Tube =  # error
# Coagulant flow rate per tube:
# The actual coagulant flow rate per tube is calculated using the maximum coagulant flow rate for the design and the number of tubes required.
Q_Tube(Q_Coag, Q_CoagMaxDesign) := Q_Coag/N_Tubef(Q_Coag, Q_CoagMaxDesign)
Q_TubeDesign := Q_Tube(Q_CdcMax, Q_MaxMinor)
Q_TubeDesign =  # error
# Tubing length:
L_CdcDtDesignf(Q, D, h_l, ν, K) := (h_l - h_e(Q, D, K))*g*π*D^4/(128*ν*Q)
# The length of the dosing tubes is the length required to acheive the maximum major head loss at the maximum coagulant flow rate per dosing tube. The major head loss equation is used to calculate this.
L_CdcDtDesign := L_CdcDtDesignf(Q_TubeDesign, D_CdcDtDesign, HL_Cdc, Nu_Water, K_CdcTube)
L_CdcDtDesign =  # error
# Minimum tubing length:
Q_MaxMinor =  # error
# The minimum tubing length would occur when the coagulant flow rate per tube is the maximum allowable flow rate.
L_CdcDtDesignMinor(Q, D, h_l, ν, K) := (h_l - h_e(Q, D, K))*g*π*D^4/(128*ν*Q)
L_CdcDtDesignMin := L_CdcDtDesignf(Q_MaxMinor, D_CdcDtDesign, HL_Cdc, Nu_Water, K_CdcTube)
L_CdcDtDesignMin =  # error
# The maximum coagulant flow rate for the CDC
# The maximum coagulant flow rate that the linear cdc can have depends on the maximum number of tubes and the maximum coagulant flow rate per tube.
Q_TotalMaxMinor := N_TubesMax*Q_MaxMinor
Q_TotalMaxMinor =  # error
# Range of flow rates for graphing
Q_MaxMinor =  # error
Q_range := 0.1*mL/s, 0.2*mL/s .. Q_MaxMinor
# To graph the changes in tubing length with coagulant flow rate, a range of flow rates is defined from 0.1 mL/s to the maximum coagulant flow rate per tube.
# Tubing Diameter and Length vs. Coagulant Flow Rate Graphs
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# When considering minor losses, the limiting constraints are the minimum head loss constraint and the minor head loss constraint. A tubing diameter of 0.125 in (3 mm), could be used for a coagulant flow rate between 1.2 mL/s and 2.5 mL/s. For this tubing diameter, minor loss is the limiting constraint. If the coagulant flow rate per tube is limited to this range, it is possible to have just one tubing diameter size for the design.
D_CdcDtDesign = 3.1496 mm
Q_range2 := 1*mL/s, 1.01*mL/s .. Q_TotalMaxMinor
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# The graph on the right shows the tubing length per dosing tube for different coagulant flow rates. Each spike in the graph is when another dosing tube was added to the design.
# Entrance Region Effects
# Entrance Region Length
L_entrance(Q) := 0.06*4*Q/(π*Nu_Water)
L_Ent :=
    for i ∈ 0 .. 5
        Q[i] ← i*mL/s
        L[i] ← 0.06*4*Q[i]/(π*Nu_Water)
    return L
L_Ent =  # error
# Float Valve Selection
# Calculating the CHT float valve sizes required to supply the maximum coagulant flow rate.
CdcChtFloatValve := [0.093 in, .25 in, "Barb"; 0.187 in, 0.5 in, "NPT"; 0.25 in, 0.5 in, "NPT"; 0.312 in, 0.5 in, "NPT"]
CdcChtFloatValve = [2.3622, 6.35, "Barb"; 4.7498, 12.7, "NPT"; 6.35, 12.7, "NPT"; 7.9248, 12.7, "NPT"] mm
i := 0 .. rows(CdcChtFloatValve) - 1
D_CdcFloatValveOrifice[i] := CdcChtFloatValve[i, 0]
H_CoagTankAboveHeadTank =  # error  # Max head loss between stock tanks and constant head tank.
# Below are the coagulant flow rates that can be obtained from the float valve sizes above.
Q_CdcChtFloatValveMax := Q_orifice(D_CdcFloatValveOrifice, H_CoagTankAboveHeadTank, Pi_VenaContractaOrifice)
Q_CdcChtFloatValveMax =  # error
Q_PlantMax := Q_CdcChtFloatValveMax[last(Q_CdcChtFloatValveMax)]*C_CoagStock/C_CoagDoseMax
# Even at a low coagulant stock concentration, at the maximum dose of 80 mg/L, the largest float valve corresponds to a plant flow rate of greater than 140 L/s. Thus, these float valves can cover the range of flows we need.
Q_PlantMax = L/s
# Choose constant head tank float valve size depending on highest coagulant flow needed.
# The float valve size required to supply the maximum coagulant flow rate is determined by rounding up the orifice diameter that would be required to supply the maximum coagulant flow rate to the nearest float valve orifice size available.
# Find the float that will be able to supply the maximum coagulant flow.
D_FloatMin := D_circle(A_orifice(H_CoagTankAboveHeadTank, Pi_VenaContractaOrifice, Q_CdcMax))
D_FloatMin =  # error
D_CdcChtFloatValve := CeilNearest(D_FloatMin, D_CdcFloatValveOrifice)
D_CdcChtFloatValve =  # error
# Lever Arm Scale
HL_Cdc =  # error  # Difference between the min and max water levels in the entrance tank. Maximum head loss through the LFOM.
L_LeverArmTotal := 36 in  # Set to be this length.
L_SliderEffective := 3.5 in  # Distance between the end of the slider and the pivot point of the freefall PVC tube.
L_LeverArmEffective := L_LeverArmTotal - L_SliderEffective
H_Max := 20 cm  # The maximum elevation the doser tube will drop when the slider is at the end of the bar at max plant flow.
# To find the length of the side of the arm with the scale and the side of the arm with the float attached, solve two equations for two unknowns. One equation is similar triangles at maximum flow. The other is that the two sides of the bar must add up to the total.
L_ScaleArmEffective := L_LeverArmEffective/(1 + HL_Cdc/H_Max) = 16.25 in
1.75*2.54 = 4.445
L_CdcScaleArm := L_ScaleArmEffective + L_SliderEffective
L_CdcScaleArm =  # error
L_CdcFloatArm := L_LeverArmTotal - L_CdcScaleArm
L_CdcFloatArm =  # error
Angle_LeverArmMax := asin(HL_Cdc/L_CdcFloatArm) = 28.9833 deg  # Not necessarily important.
L_SliderEffective := 3 in
# This is the distance between the end of the slider and the point where the freefall PVC is hung. (it's not drawn at exactly 3", but we'll change that. the drawing was arbitrary initially).
L_WallClearance := L_HalfWall + L_Slider - L_SliderEffective + L_Extra
# This is the minumum distance the first tick mark can be from the lever arm pivot point in order for the PVC assembly to have enough clearance from the entrance tank wall.
# This is the elevation difference between the point where the freefall PVC assembly is hung and the point where the end of the tube rests. The horizontal PVC has an outer radius of .525" and the tool hangar likely adds another .5".
#
# This is only significant in zeroing the CHT. It shouldn't effect the lever arm scale because it's a constant.
H_PVCAssembly := 1 in
L_CdcDtDesign =  # error
H_MinDoseMaxFlow := 128*Nu_Water*L_CdcDtDesign*Q_CdcCoagulantMinMax/(g*π*ID_CdcTube^4)
# This is the minumum tube head loss when the lever arm is at max angle (max plant flow) and the dose is at a minumum, which corresponds to the first point on the scale.
L_FirstPoint := H_MinDoseMaxFlow/sin(Angle_LeverArmMax) + L_SliderEffective
# This is the distance between the first tick mark and the pivot point along the lever arm. It must be greater than L.WallClearance in order for the PVC assembly to be far enough from the tank wall.
# Maximum error in design for calibration
# Determine what elevation has the maximum error in flow rate.
# Calculating the maximum error:
fraction := 1  # The fraction is used to fit point for calibration that minimizes maximum error.
# The equation below uses the fraction. Not using this right now.
L_CdcDtDesign1 := L_CdcDtDesignf(Q_TubeDesign, D_CdcDtDesign, HL_Cdc*fraction, Nu_Water, K_CdcTube)
# ***** NEED TO FIX THIS
# The fluids function, Q.pipetotal, was used to estimate what the flow rate would be at different elevations given a total head loss and minor loss coefficient.
# With a HL.Cdc = 15cm, the greatest error is at 7.2cm.
# With a HL.Cdc = 20cm, the greatest error is at 9.6 cm
h := 0 cm, 0.1 cm .. HL_Cdc
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D_CdcDtDesign = 0.124 in
i := 1, 2 .. HL_Cdc/mm
L_CdcDtDesign =  # error
h[i] := i*mm
Error[i] := (Q_pipetotal(D_CdcDtDesign, h[i], L_CdcDtDesign, Nu_Water, E_Tube, K_CdcTube) - Q_pipetotal(D_CdcDtDesign, h[i], L_CdcDtDesign, Nu_Water, E_Tube, K_CdcTube)*h[i]/HL_Cdc)
MaxError := max(Error)
MaxError =  # error
indexError := index(MaxError, Error)
indexError =  # error
H_maxerror := h[indexError]
H_maxerror =  # error
Error =  # error
Error[indexError] =  # error
# Graph without minor loss
# want to find the maximum flow that we can get from our largest diameter tube. We need to use the laminar flow constraint because that dominates for high flows.
Q_CdcMaxDesign := π*D_CdcDtDesign*Re_PipeTransition*Nu_Water/4 = 5.19475 mL/s
D == 4*Q_max/(π*ν*Re_max)
# At very low flows the design will fail given a finite set of tube diameters. Thus calculate the minimum design flow that can be produced based on the Hagen-Poiseuille equation.
Q_min(L_max, h_fmax, D_min, ν) := h_fmax*g*π*D_min^4/(128*ν*L_max)
Q_min(L_CdcDtMax, HL_Cdc, D_CdcAvailable[0], Nu_Water) =  # error
# Redefine the flow rate to only include the feasible range given the constraints. Note that the minimum flow plotted is the minimum design flow. The design flow is the maximum flow for a flow control module.
Q_range := Q_min(L_CdcDtMax, HL_Cdc, D_CdcAvailable[0], Nu_Water), Q_min(L_CdcDtMax, HL_Cdc, D_CdcAvailable[0], Nu_Water) + 1*mL/min .. Q_CdcMaxLaminar(L_CdcDtMax, HL_Cdc, Nu_Water)
D_Min(Q_max, L_min, h_fmax, ν) := max(D_MinLaminar(Q_max, ν), D_MinHeadLoss(Q_max, L_min, h_fmax, ν))
D_Min(Q_CdcMax, L_CdcDtMin, HL_Cdc, Nu_Water) =  # error
D_DtDesignf(Q_max, L_min, h_fmax, ν) := forceround(D_Min(Q_max, L_min, h_fmax, ν), D_CdcAvailable, 1)
D_DtDesign := D_DtDesignf(Q_CdcMax, L_CdcDtMin, HL_Cdc, Nu_Water)
D_DtDesign =  # error
L_CdcDtMin = 0.8 m
D_CdcDtDesign = 3.1496 mm
D_CdcDtDesign = 0.124 in
L_CdcDtDesign1 =  # error
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Q_MaxDesign := π*D_DtDesign*Re_PipeTransition*Nu_Water/4
Q_MaxDesign =  # error
N_TubesMax := 9
N_Tubef(Q_Coag) := ceil(Q_Coag/Q_MaxDesign)
N_Tube := N_Tubef(Q_CdcMax) = 1
Q_Tube(Q_Coag) := Q_Coag/N_Tubef(Q_Coag)
Q_CoagMaxLinear := N_TubesMax*Q_MaxDesign
D_tube := D_DtDesignf(Q_Tube(Q_CdcMax), L_CdcDtMin, HL_Cdc, Nu_Water) = 4 mm
L_tube(Q_max, D, h_fmax, ν) := h_fmax*g*π*D^4/(128*ν*Q_max)
L_design := L_tube(Q_Tube(Q_CdcMax), D_tube, HL_Cdc, Nu_Water) = 2.0539 m
Q_CoagRange := 1*mL/s, 2.1*mL/s .. Q_CoagMaxLinear
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# Cdc Dimensions for AutoCAD
L_LeverArmTotal = 0.9144 m
H_LeverHole =  # error
W_LeverArm := 0.0032 m
D_LATeetoLAOrigin := 0.0079 m
H_CdcFloat := 0.2032 m
H_CdcFloatAttachment := 0.0419 m + 0.0165 m  # from the top of the float to the top of the attachment
D_FloatActual := .1683 m
ND_EtFloat =  # error
FloatScale := ND_EtFloat/D_FloatActual  # To scale the float so it is the desired size.
D_CdcCht := 6 in
Z_Float := ZW_Et - HL_Flowmeasure - 1/2*H_CdcFloat  # The elevation of the float with the center of the float being at the bottom row of orifices of the LFOM.
Z_FloatBottom := ZW_Et - HL_Flowmeasure - 1/2*H_CdcFloat
Z_FloatTop := Z_FloatBottom + H_CdcFloat + H_CdcFloatAttachment
D_LeverOrigintoArm := 0.0336 m  # Distance from the lever arm origin (which is on the tee holding the lever arm up) to the lever arm
H_LeverHole := 0.0312 m - 0.0095/2*m
# Distance from the top of the entrance tank to the to the middle of the lever arm hole for the cable - (minus the) radius of the hole
D_Cable := 0.1 in
L_Cable := Z_EtTop + H_LeverHole - Z_FloatTop
D_LABracketOrigintoEndBracket := 0.0079 m
# This is the distance from the lever arm bracket origin (at the center of the hole of the bracket holding up the lever arm) to the end of the bracket
D_LeverHole := 0.0063 m  # Distance from the float end of the lever arm to the middle of the hole where the float cable will be attached.
D_LABOrigintoLAOriginX := 0.032 m
D_LABOrigintoLAOriginZ := 0.0249 m
T_CdcDt := 0.003 m  # Thickness of the drop tube
L_LAOriginToDtX := 0.0290 m  # Distance from the lever arm origin to the center of the drop tube in the x direction
L_LAOriginToDtX2 := 0.0396 m
L_LAOriginToDtY2 := 0.7919 m
L_LAOriginToDtY := 0.7812 m  # Distance from the lever arm origin to the outside center of the top part of the drop tube in the y direction
L_LAOriginToDtZ := 0.0429 m  # Distance from the lever arm origin to the drop tube in the z direction
L_LAOriginToDtCenterX := 0.0290 m  # Distance from the lever arm origin to the center of the drop tube in the x direction
T_CdcReducer := 0.0095 m  # Measured from CDC research team's apparatus
L_LAOriginToReducerX2 := 0.0893 m
L_LAOriginToReducerX := 0.0290 m  # Distance from the lever arm origin to the center of the reducer in the x direction
L_LAOriginToReducerY := 0.7315 m  # Distance from the lever arm origin to the outside center of the top part of the reducer in the y direction
L_LAOriginToReducerY2 := 0.7919 m
L_LAOriginToReducerZ := 0.1094 m  # Distance from the lever arm origin to the center of the large part of the reducer in the z direction
L_LAOriginToReducerCenterX := 0.0290 m  # Distance from the lever arm origin to the center of the reducer in the x direction
L_LAOriginToReducerCenterY := 0.7919 m  # Distance from the lever arm origin to the center of the reducer in the y direction
# Questions
# max flow for small float valve (where design flips to larger valve)
# Min diameter of supply flexible tubing to CHT at MAX flow of linear dose controller.
# Evaluate whether it is reasonable to always uses this large diameter of supply tubing.
# Determine appropriate diameters for calibration columns
# Is the calibration column fixed or movable?
#
# Is all of our logic correct in this sheet? simplify and beautify and document better than Monroe did!
#
# What is the min length of tube for the diameter that you are using to maintain laminar flow? This should be reported in the design documentation as a warning to not cut the tube shorter than this length.
