T
# AguaClara Water Treatment Plants
# Automated Design
# Add variable descriptions next to every varible so it is easy to interpret what this all means.
AguaClaraDesignToolVersion := 10  # This is used by LabVIEW to confirm that a valid design tool program is open
# User Inputs:
HW_Sed := 2 m  # This must be a calculated value.
# AutoCAD References
# Design References
# [reference: BasicInputs.xmcd]
# Use BasicClientInputs and ExpertClientInputs when this is run by LabVIEW.
# Use BasicInputs and ExpertInputs to use the program in MathCAD
# Change the reference by
# - right clicking
# - select properties
# - reference tab
# - type in the correct file name
# [reference: ExpertInputs.xmcd]
# [reference: DesignAssumptions.xmcd]
# [reference: MathFunctions.xmcd]
# [reference: PipeDatabase.xmcd]
# [reference: MinorLossCoefficients.xmcd]
# [reference: FluidsFunctions.xmcd]
# Sed Tanks and Slopes:
HW_Sed = 2 m
# [reference: Influent Sed Manifold.xmcd]
N_SedTanks = 3
B_SedPort = 5.85864 cm  # Height of the narrowest part of the manifold ports
W_SedPort = 5.85864 cm
H_SedBetween = 7.62 cm  # Distance from the top of the inlet manifold to the bottom of the ledge supporting the lamella frame
N_SedPorts = 21  # per bay
L_Sed = 6.49228 m
N_SedBays = 1  # Number of bays of inlet manifolds in each sed tank
A_SedPort = 34.3237 cm^2  # Port Area
L_SedPort = 6.76498 cm  # Length of the port through which water exits the inlet manifold
W_SedSludgeFlat = 5 cm  # Distance between tips of manifold plates (space alloted for the drain holes
W_SedSlopePlate = 30 cm  # Width of ferrous cement plates in whice one manifold port is cut
AN_SedTopInlet = 60 deg  # Angle of the top of the inlet manifold
Q_SedBay = 5.67812 L/s
42.5
AN_SedBottom = 10 deg  # Angle of the bottom of inlet manifold
L_SedSlopeManifold = 0.942897 m
W_SedSlopePlateRemaining = 0.192283 m  # This is the extra distance between the last slope and the wall
# Sedimentation Tank Sludge Drain:
(W_Sed/2 - T_ChannelWall/2)/2 = 0.232375 m
# [reference: SludgeDrain.xmcd]
# We need to make the Drain plate width separate from the drain width
N_SedSludgeOrifices = 43  # per cell
W_SedSludge = 15.8904 cm  # Width of the sludge channel
Ti_SludgeDrain = 20 min  # Tank Drain time
H_SedSludge = 7.94522 cm  # Depth of the sludge channel
B_SedSludgeOrifices = 15 cm  # Distance center to center between drain orifices
T_SedSludge = 9.33013 cm
# Thickness of the plate topping the sludge channel
# through which drain holes are formed
D_SedSludgeOrifice = 0.015875 m  # Diameter of drain orifices
T_SedSludge = 9.33013 cm
N_SedSludgeOrifices = 43
W_SedDrainCover = 21.547 cm
ND_SedSludgeValve = 4 in
# Sedimentation Tank Dimensions:
# [reference: Sedimentation Dimensions.xmcd]
T_SedInletSlope = 0.05 m
Z_SedSludge = 17.2753 cm  # Height from 0 of the top of the sludge drain
H_SedBottomSlope = 0.0831291 m  # Height of the bottom slope
H_SedTopSlope = 0.816573 m  # Height of the top of the inlet manifold
Z_SedSlopes = 1.08933 m  # Height from 0 of the top of the inlet manifold
T_SedSludge + H_SedSludge = 0.172753 m
H_Sed = 2.1 m  # Total tank wall height
T_SedInletSlope*cos(AN_SedTopInlet) = 2.5 cm
W_Sed = 1.0795 m  # Total tank width
L_Sed = 6.49228 m  # Total tank length
T_SedInletSlope*sin(90 - AN_SedTopInlet) + T_SedInletSlope*cos(AN_SedTopInlet) = 0.0667521 m
# Inlet Channel:
2*(T_SedInletSlope*sin(90 - AN_SedTopInlet) + T_SedInletSlope*cos(AN_SedTopInlet)) + W_SedSludgeFlat + 5 cm = 0.233504 m
# [reference: Inlet Channel.xmcd]
W_InletChannel = 0.305146 m
HW_Sed - HW_InletChannel - T_ChannelWall = 1.16553 m
L_Channel = 3.6885 m
HW_Sed - HW_InletChannel - T_ChannelWall - (0.3633 m - T_ChannelWall) = 0.952227 m
W_SedManifoldEntrance = 0.114037 m  # Width of the drop chimneys connecting channel to sed inlet manifolds
L_SedManifoldEntrance = 0.471449 m  # length of drop chimmneys
N_SedInletPipes = 2  # per sed bay
H_InletChannel = 0.784473 m
# Sedimentation Tank Effluent Launder:
# [reference: Launder.xmcd]
N_SedLaunderOrifices = 114  # Number of orifices per launder
# How many launders per cell?
# What is the spacing of the orfices?
# How many rows of orifices per launder?
Q_SedLaunderOrifices = 1.49424 L/min
B_SedLaunderOrifices = 0.1 m  # Center to center launder spacing
# Exit Channel:
# [reference: Exit Channel.xmcd]
W_ExitChannel = 0.305146 m
ND_SedLaunder = 6 in
H_ExitChannel = 0.784473 m
L_SedLaunder = 5.73199 m
L_ExitChannel = 3.6885 m
H_PltWeir = 0.584149 m  # height of the weir carrying water to the distribution tank
D_SedLaunderOrifice = 0.3125 in
HW_ExitChannel = 0.644473 m
Z_SedLaunder = 1.87586 m  # height from 0 of the launder
ZW_ExitChannel = 1.96 m  # water height in exit channel from 0
# Lamella:
# [reference: Lamella.xmcd]
L_SedPlate = 0.723072 m
42.5 in = 1.0795 m
B_SedPlate = 4.02446 cm  # center to center distance between lamella
S_SedPlate = 3.72446 cm  # spacing between lamella
N_SedPlates = 114  # Number of Sed Plates per Sedimentation Tank Bay.
AN_SedPlate = 60 deg
V_SedC = 10.0119 m/day
L_SedActive = 4.82555 m
W_Sed = 1.0795 m
V_SedUp = 70 m/day
H_SedPlate = 0.626198 m
H_SedAbove = 0.208275 m  # Height of water needed above the lamella
# Sedimentation Tank Floc Hopper:
# [reference: Floc Hopper.xmcd]
A_FlocHopper = 1.76612 m^2
L_FlocHopper = 1.63606 m  # Length of the hopper cement plate
L_FlocHopperOffset = 0.361536 m  # distance from the edge of the channel to the bottom of the first lamella (collection distance)
W_FlocHopper = 1.0795 m  # width of the hopper set within each bay
# Flow Controller:
# [reference: FCM.xmcd]
N_Fcm = 2
ID_FcmTube = 4.318 mm
ID_FcmTube = 0.17 in
L_FcmTube = 252.001 cm
Q_FcmTubeMax = 383.273 mL/min
HL_FcmValve = 27.292 cm
# Flocculator: | Look at Flocculator Positioning arrays
# [reference: Flocculation Energy Dissapation.xmcd]
W_FlocChannel = 0.45 m
L_Sed = 6.49228 m  # Fill last channel with bafffles from last channel
# Fix port width to be based on energy dissipation in that channel
L_FlocTank/N_FlocChannels = 6.49228 m  # Adjust spacing after the number of baffles per channel is known.
ED_Floc = [6.4; 0.4] mW/kg
# Check the residence time of the flocculator should be at least 20minutes
HW_FlocEnd = 2 m
X_FlocBaffles = [
    0.211242, 0.286614, 0.504357, 0.504357;
    0.462483, 0.613228, 1.04871, 1.04871;
    0.713725, 0.939843, 1.59307, 1.59307;
    0.964967, 1.26646, 2.13743, 2.13743;
    1.21621, 1.59307, 2.68178, 2.68178;
    1.46745, 1.91969, 3.22614, 3.22614;
    1.71869, 2.2463, 3.7705, 3.7705;
    1.96993, 2.57291, 4.31486, 4.31486;
    2.22118, 2.89953, 4.85921, 4.85921;
    2.47242, 3.22614, 5.40357, 5.40357;
    2.72366, 3.55276, 5.94793, 5.94793;
    2.9749, 3.87937, 0, 0;
    3.22614, 4.20598, 0, 0;
    3.47738, 4.5326, 0, 0;
    3.72863, 4.85921, 0, 0;
    3.97987, 5.18583, 0, 0;
    4.23111, 5.51244, 0, 0;
    4.48235, 5.83906, 0, 0;
    4.73359, 6.16567, 0, 0;
    4.98483, 0, 0, 0;
    5.23608, 0, 0, 0;
    5.48732, 0, 0, 0;
    5.73856, 0, 0, 0;
    5.9898, 0, 0, 0;
    6.24104, 0, 0, 0
] m
L_FlocBaffles = [
    2.15775, 2.08238, 1.86464, 1.86464;
    1.78876, 1.71339, 1.49564, 1.49564;
    2.15775, 2.08238, 1.86464, 1.86464;
    1.78876, 1.71339, 1.49564, 1.49564;
    2.15775, 2.08238, 1.86464, 1.86464;
    1.78876, 1.71339, 1.49564, 1.49564;
    2.15775, 2.08238, 1.86464, 1.86464;
    1.78876, 1.71339, 1.49564, 1.49564;
    2.15775, 2.08238, 1.86464, 1.86464;
    1.78876, 1.71339, 1.49564, 1.49564;
    2.15775, 2.08238, 1.86464, 1.86464;
    1.78876, 1.71339, 0, 0;
    2.15775, 2.08238, 0, 0;
    1.78876, 1.71339, 0, 0;
    2.15775, 2.08238, 0, 0;
    1.78876, 1.71339, 0, 0;
    2.15775, 2.08238, 0, 0;
    1.78876, 1.71339, 0, 0;
    2.15775, 2.08238, 0, 0;
    1.78876, 0, 0, 0;
    2.15775, 0, 0, 0;
    1.78876, 0, 0, 0;
    2.15775, 0, 0, 0;
    1.78876, 0, 0, 0;
    2.15775, 0, 0, 0
] m
Z_FlocBaffles = [
    0.211242, 0.286614, 0.504357, 0.504357;
    0, 0, 0, 0;
    0.211242, 0.286614, 0.504357, 0.504357;
    0, 0, 0, 0;
    0.211242, 0.286614, 0.504357, 0.504357;
    0, 0, 0, 0;
    0.211242, 0.286614, 0.504357, 0.504357;
    0, 0, 0, 0;
    0.211242, 0.286614, 0.504357, 0.504357;
    0, 0, 0, 0;
    0.211242, 0.286614, 0.504357, 0.504357;
    0, 0, 0, 0;
    0.211242, 0.286614, 0, 0;
    0, 0, 0, 0;
    0.211242, 0.286614, 0, 0;
    0, 0, 0, 0;
    0.211242, 0.286614, 0, 0;
    0, 0, 0, 0;
    0.211242, 0.286614, 0, 0;
    0, 0, 0, 0;
    0.211242, 0, 0, 0;
    0, 0, 0, 0;
    0.211242, 0, 0, 0;
    0, 0, 0, 0;
    0.211242, 0, 0, 0
] m
N_FlocChannels = 4
L_FlocTank = 25.9691 m
HL_Floc = 26.8996 cm
HW_FlocStart = 2.269 m
S_FlocBaffle = [21.1242; 28.6614; 50.4357; 50.4357] cm
B_FlocBaffle = [25.1242; 32.6614; 54.4357; 54.4357] cm
N_FlocChannelBaffles = [25; 19; 11; 11]
W_FlocPort = [0.161242; 0.236614; 0.454357; 0.454357] m
HL_FlocChannels = [17.0275; 7.11492; 1.37861; 1.37861] cm
L_FlocBaffleLower = [1.78876; 1.71339; 1.49564; 1.49564] m
L_FlocBaffleUpper = [2.15775; 2.08238; 1.86464; 1.86464] m
H_FlocPort = [0.589542; 0.545092; 0.499521; 0.499521] m
Ti_Floc = 22.8677 min  # residence time of the flocculator
N_FlocBaffles = 66
# Entrance Tank:
# [reference: EntranceTankDim.xmcd]
L_Et = 6.49228 m  # length of the entrance tank
W_Et = 0.45 m  # width of the entrance tank
HW_EtMin = [
    0.0005; 0.001; 0.0015; 0.002; 0.0025; 0.003; 0.0035; 0.004; 0.0045; 0.005
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] m
HW_EtMax = [
    0.2005; 0.201; 0.2015; 0.202; 0.2025; 0.203; 0.2035; 0.204; 0.2045; 0.205
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] m
H_Et = 2.669 m  # height of the entrance tank
ZW_Et = 2.569 m
# Any additional needed elevations should be calculated in the files above.
# Elevations:
ZW_ExitChannel = 1.96 m  # Water Level at the end of the plant in the exit channel and exit channel box
HW_Sed = 2 m
HW_FlocStart = 2.269 m  # Water level at the beginning of the floc tank
HL_Floc = 26.8996 cm  # just for ref. the head loss throught the floc tank
ZW_Et = 2.569 m  # the height of the water in the entrance tank.
# Rapid Mix:
# [reference: RapidMixer.xmcd]
# Assumptions: To be moved to basic inputs file
W_EtOrifice[30] = 0.031 m  # Height of Entrance Tank Orifice
# Calculations
L_trueET[30] = 0.440386 m  # Length of Entrance Tank Orifice
Pi_EtFlow[30] = 0.278388  # Ratio of the minimum flow divided by the maximum flow through the plant.
L_FlocEntryOrifice = 45 cm  # Length of orifice entering into flocculator from Rapid Mix Unit
W_FlocEntryOrifice = 7.71102 cm  # Height of orifice entering into flocculator
ED_Diffusion = 0.732512 m^2/s^3  # Minimum Energy Dissipation needed
HL_FlocEntryOrifice = 5.24895 cm  # Head loss caused by entering flocculation tank.
A_FlocEntry = 0.0346996 m^2  # Area required of entry port to flocculator
A_EtOrifice = 136.52 cm^2  # Area of Entrance Tank Orifice
HW_Total = 2.68242 m  # Total Height of water at beginning of rapid mix unit
HW_Channel2 = 10.4251 cm  # Height of water at the back of the entrance tank channel (from channel bottom)
HW_EtChannel = 5.6681 cm  # Height of Waterfall into flocculator
W_EtChannel = 21.1242 cm  # Widt of entrance tank channel
L_Et = 1.45001 m  # Length of square entrance tank
Vol_Stock = 1379.78 L  # Volume of chemical stock tanks
# [reference: AutoCADMasterProgram.xmcd]
# AutoCAD References
FlocTank = [
    "-layer m floctank"; "c t 91,91,91"; "floctank"; "  "; "_-view o t _zoom w 0.16,3.5285,0 -6.65228,6.0985,2.369 _box 0,3.6885,0 -6.49228,5.9385,2.369 _box 0.15,3.5385,-0.15 -6.64228,6.0885,2.369 _subtract 0.15,3.5385,-0.15  0,3.6885,0 "; "-layer s 0"; "  "; "-layer f floctank"; "  "; "-layer m floctankwall"
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]
