# Automated Materials List
N_SedPlatesTotal := N_SedPlates*N_SedBays*N_SedTanks
N_SedPlatesPerSheet := floor(L_SedPlateSheet/L_SedPlate)
N_SedPlateSheets := ceil(N_SedPlatesTotal/N_SedPlatesPerSheet) = 93  # Total number of corrugated sheets needed to construct lamella/plate settlers
# Channel and Tank Walls
Vol_FlocTank := 2*(L_Sed + T_PlantWall)*T_PlantWall*H_Floc + 2*(W_FlocChannel*N_FlocChannels + N_FlocChannels*T_PlantWall)*T_PlantWall*H_Floc + (N_FlocChannels - 1)*T_PlantWall*L_Sed*H_Floc = 15.2295 m^3
Vol_InletChannel := (W_InletChannel*H_InletChannel*T_SedManifoldEntrance) + (W_InletChannel + 2*T_ChannelWall)*T_PlantWall*L_Channel + 2*(L_Channel*T_ChannelWall*H_InletChannel) - (A_SedManifoldEntrance*T_SedManifoldEntrance*N_SedInletPipes) = 0.870341 m^3
# **Includes Sedimentation Manifold Entrance**
Vol_ExitChannel := (W_ExitChannel + 2*T_PlantWall)*T_PlantWall*H_ExitChannel + 2*(L_ExitChannel*T_ChannelWall*H_ExitChannel) = 0.512997 m^3
# **Does not include inlet from sed tank and exit to storage tank**
Vol_SedTank := 2*((L_Sed + T_PltWall)*T_PlantWall*H_Sed) + 2*(W_Sed*N_SedTanks + N_SedTanks*T_PltWall)*T_PlantWall*H_Sed - (A_SedSludge*L_Sed) = 5.94328 m^3
Vol_EntranceTank := 2*(W_Et*T_EtWall*H_Et) + 2*(L_Et*T_EtWall*H_Et) - (T_EtWall*W_EtChannel*W_EtChannel) = 2.18335 m^3  # **basic dimensions - no grit chamber**
Vol_StockTank := Q_AlumStockMax*Ti_StockMin = 1.62 m^3
Vol_ExitChannelTank := (2*(S_Elbow + 3*ND_PltWeir + T_ChannelWall) + 2*(4*ND_PltWeir + 3*S_Elbow + T_ChannelWall))*H_Sed*T_ChannelWall = 0.950229 m^3
Vol_InletChannelTank := (2*(S_Elbow + 3*ND_PltWeir + T_ChannelWall) + 2*(2*ND_PltWeir + 2*S_Elbow + T_ChannelWall))*H_Sed*T_ChannelWall = 0.724634 m^3
N_SedInletChimneys := N_SedInletPipes*N_SedBays*N_SedTanks = 6
Vol_SedChimneyPipe := π*(.5*D_SedChimneyPipe)^2*(H_Sed - H_InletChannel - T_ChannelWall - H_SedSludge - T_SedSludge) = 0.0283412 m^3
Vol_SedInletChimneys := N_SedInletChimneys*(W_SedInletBottom*(W_InletChannel + T_ChannelWall)*(H_Sed - H_InletChannel - T_ChannelWall - H_SedSludge - T_SedSludge) - Vol_SedChimneyPipe) = 1.04659 m^3
Vol_TotalWalls := Vol_EntranceTank + Vol_FlocTank + Vol_InletChannel + Vol_SedTank + Vol_ExitChannel + Vol_StockTank + Vol_ExitChannelTank + Vol_InletChannelTank + Vol_SedInletChimneys = 29.0809 m^3
# Ferrous Cement
Vol_DistributionTunnelCovers := T_SedSlopePlate*L_SedSlopeManifold*W_SedSlopePlate*N_SedPorts = 0.269041 m^3
Vol_FlocBafflesTotal := W_FlocChannel*T_FlocBaffle*(L_FlocBaffleLower*ceil(N_FlocChannelBaffles/2) + L_FlocBaffleUpper*floor(N_FlocChannelBaffles/2)) = 2.58599 m^3
# Pipes and Valves
N_PipeSedPlateFrame := W_Sed/B_SedPipe - 1 + L_Sed/B_SedPipe - 1 = 30.8803
L_PipeSedPlateFrameTotal := N_SedTanks*((W_Sed/B_SedPipe - 1)*L_Sed + (L_Sed/B_SedPipe - 1)*W_Sed) = 134.979 m
# Length of pipe needed for Sedimentation Tank Plate Frame at ND.SedPlateFrame
L_Weir := 2*H_PltWeir = 0.507835 m  # Total length of Weir pipe in Inlet and Exit Channel Tanks at ND.PltWeir
N_Launders := N_SedTanks*N_SedBays*N_SedLaunders
L_LaunderPipeTotal := L_SedLaunder*N_Launders = 47.4516 m  # Total length of launder pipe at ND.SedLaunder
N_LaunderCouplings := N_Launders  # Number of couplings for launder pipe going through concrete wall
N_Valves := N_SedBays*N_SedTanks  # Valves and valve couplings to drain sedimentation tanks
N_ValveCouplings := N_Valves
