# design at half flow rate for plants which are "double train" i.e. over 100Lps. this applies to the sed tank, flocculator and lfom files, in the entrance tank file this returns to the design flow and then goes back to half for the srsf.
# Sedimentation Tank
# Inlet manifold diffuser design for energy dissipation rate
W_Sed := W_SedPlate
W_SedDiffuserInnerMin := ((Pi_JetPlane*W_Sed*V_SedUpBod)^3/ED_SedInletMax)^(1/4)
W_SedDiffuserInner := max(Ceil(W_SedDiffuserInnerMin, 1/16*in), 1/16*in)
ED_SedInlet := (Pi_JetPlane*V_SedUpBod*W_Sed)^3/W_SedDiffuserInner^4
T_SedDiffuserPvc := (outerdiameter(ND_SedDiffuser) - innerdiameter(ND_SedDiffuser, PS_Default))/(2*Pi_PvcStretch)
Circ_SedDiffuserInner := Pi_PvcStretch*π*innerdiameter(ND_SedDiffuser, PS_Default)
L_SedDiffuserInner := (Circ_SedDiffuserInner - 2*W_SedDiffuserInner)/2
B_SedDiffuser := L_SedDiffuserInner + 2*T_SedDiffuserPvc
B_SedDiffuser := 6 cm
V_SedDiffuser := V_SedUpBod*W_Sed*B_SedDiffuser/(W_SedDiffuserInner*(B_SedDiffuser - 2*T_SedDiffuserPvc))
HL_SedDiffuser := V_SedDiffuser^2/(2*g)
# Number of sed tanks
# Max manifold flow rate
Q_SedManifoldMaxED := Q_PipeED(ED_SedInletMax, innerdiameter(ND_SedManifoldMax, PS_Default), Pi_VenaContractaOrifice, Pi_JetRound)
V_SedManifoldMaxFlowDist := sqrt(((1 - Pi_QSedInlet^2)/(Pi_QSedInlet^2 + 1))*4*g*HL_SedDiffuser)
Q_SedManifoldMaxFlowDist := π*(innerdiameter(ND_SedManifoldMax, PS_Default)/2)^2*V_SedManifoldMaxFlowDist
Q_SedManifoldMax := min(Q_SedManifoldMaxED, Q_SedManifoldMaxFlowDist)
# Max flow rate for convenient pipe lengths
Q_SedMaxUpflowLength := V_SedUpBod*W_Sed*L_SedUpflowMax
# Max sed tank flow rate
Q_SedMax := Floor(min(Q_SedMaxUpflowLength, Q_SedManifoldMax), 1*L/s)
N_SedTanksMinFit := 3
N_SedTanksMinQ := ceil(Q_Train/Q_SedMax)
N_SedTanks := max(N_SedTanksMinFit, N_SedTanksMinQ)
Q_Sed := Q_Train/N_SedTanks
L_SedActiveEst :=
    Q_Sed/(W_Sed*V_SedUpBod) - L_SedPlateEst*cos(AN_SedPlate) if Q_Train > Q_PlantMaxLF
    Q_Sed/(W_Sed*V_SedUpBod) otherwise
ND_SedManifold := NominalDiameter((4/π*Q_Sed/V_SedManifoldMaxFlowDist)^(1/2), PS_Default)
ND_SedLaunder := ND_Manifold(Q_Sed, HL_SedLaunderBod, L_SedActiveEst, Pi_QLaunderOrifices, PS_Default, Nu_Water, E_Pvc, K_PipeExit, floor(L_SedActiveEst/B_SedLaunderOrificesEst))
# Inlet manifold and launder diameters
# Inlet channel
L_SedChannel := N_SedTanks*(W_Sed + T_PlantWall)  # Length of the inlet channel, which runs along the entire width of the sed tanks.
HL_SedWeirExit := Headloss_weir(Q_Train, L_SedChannel)
Pi_QSedTanks := 0.95
HL_SedInletChannelMax := (HL_SedLaunderBod + HL_SedDiffuser)*(1 - Pi_QSedTanks^2)
HW_SedInletChannelMax := 35 cm
HW_SedInletChannelMinPlumbing := HL_SedLaunderBod + HL_SedDiffuser + 2*ConRadius(ND_SedLaunder) + S_Fitting + HL_SedWeirExit
W_SedInletChannelPreWeirMinPlumbing := 2*ConRadius(ND_SedManifold) + 2*S_Fitting
W_SedInletChannelPreWeirMinHL := W_HorizChannel(Q_Plant, HW_SedInletChannelMax, HL_SedInletChannelMax, L_SedChannel, Nu_Water, E_Pvc, 0)
W_SedInletChannelPreWeir := max(W_SedInletChannelPreWeirMinPlumbing, W_SedInletChannelPreWeirMinHL)
HW_SedInletChannelHL := H_HorizChannel(Q_Train, W_SedInletChannelPreWeir, HL_SedInletChannelMax, L_SedChannel, Nu_Water, E_Concrete, 0)
HW_SedInletChannel := max(HW_SedInletChannelMinPlumbing, HW_SedInletChannelHL)
H_SedInletChannel := HW_SedInletChannel + H_PlantFreeboard
W_SedWeirInlet := L_SedChannel
HL_SedWeirInlet := Headloss_weir(Q_Train, W_SedWeirInlet)
H_SedWeirInlet := HW_SedInletChannel + H_SedInletWeirFreeboard  # The weir height should be set to not overflow during normal operation.
W_SedInletChannelPostWeir := max(W_ChannelMin, W_HorizChannel(Q_Train, H_SedWeirInlet, HL_ChannelMax, L_SedChannel, Nu_Water, E_Concrete, 1))
W_SedInletChannel := W_SedInletChannelPreWeir + T_SedWeir + W_SedInletChannelPostWeir
V_SedInletChannel := Q_Train/(W_SedInletChannelPreWeir*HW_SedInletChannel)  # This is the velocity in the part of the channel that delivers the flocs
ND_SedInletChannelDrain := NominalDiameter(D_PipeTotal(Q_Train, HW_SedEst, HW_SedEst + W_SedInletChannel, Nu_Water, E_Pvc, K_PipeEnt + K_PipeExit + K_El90), PS_Default)
W_SedInletChannelDrainBox := max(2*S_Fitting + 2*ConRadius(ND_SedInletChannelDrain), W_SedInletChannelPostWeir)
L_SedToFiPipeEst := W_DCWalkway + W_SedInletChannel + 1 m
# The extra 1 meter is for the vertical section where the pipe drops down from the sed tank exit channel.
ND_SedToFiPipeMax := 8 in
Q_SedToFiPipeMax := Q_pipetotal(innerdiameter(ND_SedToFiPipeMax, PS_Default), HL_SedToFiPipeMax, L_SedToFiPipeEst, Nu_Water, E_Pvc, K_El90 + K_PipeEnt + K_PipeExit)
N_SedToFiPipes := ceil(Q_Train/Q_SedToFiPipeMax)
Q_SedToFiPipe := Q_Train/N_SedToFiPipes
ND_SedToFiPipe := D_pipeschedule(Q_SedToFiPipe, PS_Default, HL_SedToFiPipeMax, L_SedToFiPipeEst, Nu_Water, E_Pvc, K_El90 + K_PipeEnt + K_PipeExit)
HL_FiEntrancePipe := h_l(Q_SedToFiPipe, innerdiameter(ND_SedToFiPipe, PS_Default), L_SedToFiPipeEst, K_El90 + K_PipeEnt + K_PipeExit, Nu_Water, E_Pvc)
# Outlet pipe to filter
# Exit channel
ND_SedExitChannelDrain := NominalDiameter(D_PipeTotal(Q_Train, HW_SedEst, HW_SedEst, Nu_Water, E_Pvc, K_PipeEnt + K_PipeExit + K_El90), PS_Default)
H_SedExitChannel := H_SedInletChannel
HW_SedExitChannel := HW_SedInletChannel - HL_SedLaunderBod - HL_SedDiffuser
W_SedExitChannelPreWeir := W_ChannelMin
H_SedWeirExit := HW_SedExitChannel - HL_SedWeirExit
W_SedExitChannelPostWeir := max(S_Fitting + 2*ConRadius(ND_SedToFiPipe), S_Fitting + 2*ConRadius(ND_SedExitChannelDrain), W_ChannelMin, W_HorizChannel(Q_Train, H_SedWeirExit, HL_ChannelMax, L_SedChannel, Nu_Water, E_Concrete, 1))
W_SedExitChannel := W_SedExitChannelPreWeir + T_SedWeir + W_SedExitChannelPostWeir
W_SedExitChannelDrainBox := max(S_Fitting + 2*ConRadius(ND_SedExitChannelDrain), W_SedExitChannelPostWeir)
# Hopper length
L_SedHopper :=
    W_SedExitChannel + T_SedWeir + W_SedInletChannel + T_ChannelWall - T_SedWeir if Q_Train > Q_PlantMaxLF
    max(L_SedHopperMin, L_SedPlateEst*cos(AN_SedPlate) - T_SedWeir) otherwise
# Plate settlers and total tank length
L_SedPlate := Ceil((S_SedPlate*(V_SedUpBod/V_SedCBod - 1) + T_SedPlate*V_SedUpBod/V_SedCBod)/(sin(AN_SedPlate)*cos(AN_SedPlate)), 10 cm)
N_SedPlates :=
    CeilNearest((L_SedActiveEst*sin(AN_SedPlate) - T_SedPlate)/(S_SedPlate + T_SedPlate), PlateIndex) if Q_Train > Q_PlantMaxLF
    CeilNearest(((L_SedActiveEst + T_SedWeir + L_SedHopper - L_SedPlate*cos(AN_SedPlate))*sin(AN_SedPlate) - T_SedPlate)/(S_SedPlate + T_SedPlate), PlateIndex) otherwise
N_SedModPlates :=
    N ← 8
    while mod(N_SedPlates, N) ≠ 0
        N ← N + 1
    return N
N_SedModPlates =  # error: This variable is undefined.
N_SedModules := N_SedPlates/N_SedModPlates
L_SedLF := L_SedPlate*cos(AN_SedPlate) + (N_SedPlates - 1)*B_SedPlate/sin(AN_SedPlate) + T_SedPlate/sin(AN_SedPlate)
L_SedUpflow :=
    L_SedPlate*cos(AN_SedPlate) + (N_SedPlates - 1)*B_SedPlate/sin(AN_SedPlate) + T_SedPlate/sin(AN_SedPlate) if Q_Train > Q_PlantMaxLF
    L_SedLF - T_SedWeir - L_SedHopper otherwise
L_Sed := L_SedHopper + T_SedWeir + L_SedUpflow
V_SedUp := Q_Sed/(L_SedUpflow*W_Sed)
# Inlet manifold
L_SedManifoldOffset := innerdiameter(ND_SedJetReverser, PS_Default)/2 - W_SedDiffuserInner/2
L_FlocWeirToDiffuserGap := L_SedManConnectionStub + L_SedManFirstDiffuserGap - (B_SedDiffuser/2 - outerradius(ND_SedDiffuser))
L_WallToDiffuserGapMin := 3 cm
N_SedManifoldPorts := floor((L_SedUpflow - L_FlocWeirToDiffuserGap - L_WallToDiffuserGapMin)/B_SedDiffuser)
L_SedManifoldPipe := L_SedUpflow - L_SedManConnectionStub - L_SedManifoldPipeFromTankEnd - CapThickness(ND_SedManifold)
Q_SedManifoldPort := Q_Sed/N_SedManifoldPorts
# Exit launder
L_SedLaunder :=
    L_SedUpflow - CapThickness(ND_SedLaunder) - max(0 m, 2*CouplingLength(ND_SedLaunder) - T_ChannelWall) if T_ChannelWall > CouplingLength(ND_SedLaunder) and Q_Train > Q_PlantMaxLF
    L_Sed - CapThickness(ND_SedLaunder) - S_Fitting - ElbowRadius(ND_SedLaunder) - ConRadius(ND_SedLaunder) - SocketDepth(ND_SedLaunder) if Q_Train ≤ Q_PlantMaxLF
    L_SedUpflow + T_ChannelWall - CouplingLength(ND_SedLaunder) - CapThickness(ND_SedLaunder) otherwise
N_SedLaunderOrificesEst := floor((L_SedUpflow - SocketDepth(ND_SedLaunder) - CapThickness(ND_SedLaunder))/B_SedLaunderOrificesEst)
Q_SedLaunderOrificeEst := Q_Sed/N_SedLaunderOrificesEst
# This the HL due to major & minor losses loses through the manifold.
D_SedLaunderOrifice := RoundNearest(D_circle(A_orifice(HL_SedLaunderBod, Pi_VenaContractaOrifice, Q_SedLaunderOrificeEst)), D_Drill)
Q_SedLaunderOrificeTarget := Q_orifice(D_SedLaunderOrifice, HL_SedLaunderBod, Pi_VenaContractaOrifice)
B_SedLaunderOrifice := (L_SedUpflow - SocketDepth(ND_SedLaunder) - CapThickness(ND_SedLaunder) - D_SedLaunderOrifice)/(Q_Sed/Q_SedLaunderOrificeTarget - 1)
N_SedLaunderOrifices := floor((L_SedUpflow - SocketDepth(ND_SedLaunder) - CapThickness(ND_SedLaunder) - D_SedLaunderOrifice)/B_SedLaunderOrifice) + 1
L_SedLaunderEndToOrifice := (L_SedUpflow - SocketDepth(ND_SedLaunder) - CapThickness(ND_SedLaunder) - B_SedLaunderOrifice*(N_SedLaunderOrifices - 1))/2
HL_SedLaunderMajor := HL_Manifold(Q_Sed, innerdiameter(ND_SedLaunder, PS_Default), L_SedLaunder, 0, Nu_Water, E_Pvc, N_SedLaunderOrifices)
HL_SedLaunderOrifice := h_orifice(D_SedLaunderOrifice, Pi_VenaContractaOrifice, Q_Sed/N_SedLaunderOrifices)
HL_SedLaunder := HL_SedLaunderOrifice + HL_SedLaunderMajor
# Side slopes
W_SedSideSlopes := (W_Sed - innerdiameter(ND_SedJetReverser, PS_Default))/2
H_SedSideSlopes := tan(AN_SedSlope)*W_SedSideSlopes
# Inlet channel slopes
H_SedIChanLastCoupling := H_SedWeirExit - 2 cm
H_SedIChanStep := H_SedIChanLastCoupling/(N_SedTanks - 1)
L_SedIChanSlopes := W_Sed + T_PlantWall - 2*ConRadius(ND_SedManifold) - S_Fitting
# Elevations
# [area: Elevations]
Z_SedSludgeDrain := Plant_Origin[2] - outerradius(ND_SedJetReverser)
Z_SedManifoldPipe := Z_SedSludgeDrain + H_JetReverserToDiffusers + L_SedManifoldDiffuser + innerdiameter(ND_SedManifold, PS_Default)/2
Z_SedSideSlopes := Z_SedSludgeDrain + H_SedSideSlopes
Z_SedFlocWeir := max(Z_SedManifoldPipe + outerradius(ND_SedManifold) + T_ConcreteMin, Z_SedSideSlopes + H_SedSlopesToFlocWeirMin)
Z_SedLamellaBottom := Z_SedFlocWeir + H_FlocWeirToPlateFrame + outerdiameter(ND_SedPlateFrame)
Z_SedLamellaSupportLedge := Z_SedLamellaBottom - outerradius(ND_SedPlateFrame) - ConRadius(ND_SedPlateFrame)
Z_SedLaunder := Z_SedLamellaBottom + L_SedPlate*sin(AN_SedPlate) + T_SedPlate*cos(AN_SedPlate) + H_LamellaToLaunder + outerradius(ND_SedLaunder)
Z_SedChannelBottom := Z_SedLaunder + outerradius(ND_SedLaunder) - H_SedWeirExit
Z_SedWeirExit := Z_SedChannelBottom + H_SedWeirExit
Z_SedHopperSideSlope := Z_SedFlocWeir
D_SedFlocWeirCornerToManifoldCenter := sqrt(((Plant_Origin[1] + W_Sed) - (Plant_Origin[1] + (W_Sed/2) + L_SedManifoldOffset))^2 + (Z_SedFlocWeir - Z_SedManifoldPipe)^2)
AN_ManifoldCenterFlocWeirCornerManifoldTangent := asin(ConRadius(ND_SedManifold)/D_SedFlocWeirCornerToManifoldCenter)
AN_FlocWeirCornerManifoldCenterFlocWeir := atan((Z_SedFlocWeir - Z_SedManifoldPipe)/((Plant_Origin[1] + W_Sed) - (Plant_Origin[1] + (W_Sed/2) + L_SedManifoldOffset)))
AN_SedHopperLeftSlope := AN_FlocWeirCornerManifoldCenterFlocWeir - AN_ManifoldCenterFlocWeirCornerManifoldTangent
Z_SedHopperBottom :=
    Z_SedFlocWeir - ((Plant_Origin[1] + W_Sed) - (2*S_Fitting + 2*ConRadius(ND_SedExitChannelDrain) + S_Fitting + 2*outerradius(ND_SedHopperDrain)))*tan(AN_SedHopperLeftSlope) + 2 cm if Q_Train > Q_PlantMaxLF
    Z_SedManifoldPipe + ConRadius(ND_SedManifold) + S_Fitting/2 otherwise
AN_SedFlocHopperRightSlope := atan((Z_SedFlocWeir - Z_SedHopperBottom)/(((Plant_Origin[1] + W_Sed) - (T_PlantWall + 2*S_Fitting + 2*ConRadius(ND_SedExitChannelDrain) + S_Fitting + 2*ConRadius(ND_SedHopperDrain))) - 2*ConRadius(ND_SedHopperDrain)))
H_SedHopperFrontSlope := Z_SedFlocWeir - Z_SedHopperBottom
H_SedHopperBackSlope := H_SedHopperFrontSlope
Z_SedHopperBackSlope := Z_SedHopperBottom + H_SedHopperBackSlope
AN_SedHopperBackSlope := atan(H_SedHopperBackSlope/(L_SedHopper/2))
AN_SedHopperFrontSlope := atan(H_SedHopperFrontSlope/(L_SedHopper/2))
X_SedHopperBottom := -L_Sed + L_SedHopper/2
Z_SedTop :=
    Z_SedChannelBottom + H_SedInletChannel if Q_Train > Q_PlantMaxLF
    Z_SedLaunder + outerradius(ND_SedLaunder) + HL_SedLaunderBod + H_PlantFreeboard otherwise
H_Sed := Z_SedTop - Z_SedSludgeDrain  # Height of sed tank from the lip of the jet reverser
ZW_SedInletChannel := Z_SedChannelBottom + HW_SedInletChannel
ZW_Sed :=
    ZW_SedInletChannel - HL_SedDiffuser if Q_Train > Q_PlantMaxLF
    Z_SedLaunder + outerradius(ND_SedLaunder) + HL_SedLaunderBod otherwise
HW_Sed := ZW_Sed - Z_SedSludgeDrain
Z_Walkway :=
    Z_SedChannelBottom if Q_Train > Q_PlantMaxLF
    Z_SedTop - 50 cm otherwise
# Hopper drain
L_SedHopperDrainPipe := H_SedHopperBackSlope/tan(AN_SedHopperBackSlope) + T_PlantWall + SocketDepth(ND_SedHopperDrain)
# Plate settler modules
# This part of the code serves to draw the module pipe for the plate settlers. In order to understand the meaning of each value please refer to the autocad drawing Lamina.Explanation
# This is the part of the pipe sticking out that the cap is fitted on. The cap will serve as a resting spot for the next module. The modules are identical so they can be interchangeable.
L_SedModulePipeIncrement := B_SedPlate - T_SedPlate - (CapDiameter(NominalPipeSize(ND_SedModulePipeSpacer))/2 - outerradius(NominalPipeSize(ND_SedModulePipeSpacer)))
# This is the actual spacing between the pipes.
L_SedModulePipe := N_SedModPlates*B_SedPlate - (B_SedPlate - T_SedPlate) + 2*L_SedModulePipeIncrement  # This is the length of a sed module pipe.
# The cap should be as long as the spacing between the two modules. If it is longer, we will need to cut it accordingly.
S_SedModulePipes := max(L_SedPlate - 2*outerdiameter(ND_SedModulePipe) - 2*S_SedPlateModuleMin - (N_SedModPlates*(T_SedPlate + (B_SedPlate - T_SedPlate)) - (B_SedPlate - T_SedPlate))/tan(AN_SedPlate), (L_SedModulePipe - L_SedModulePipeIncrement)*tan(90 deg - AN_SedPlate) + CapDiameter(NominalPipeSize(ND_SedModulePipeSpacer)))
.
L_SedModulePipeCap := min(B_SedPlate - T_SedPlate, CapHeight(NominalPipeSize(ND_SedModulePipeSpacer)) - (CapDiameter(NominalPipeSize(ND_SedModulePipeSpacer))/2 - outerradius(NominalPipeSize(ND_SedModulePipeSpacer))))
# This is the new spacing between the bottom of the first plate settler in a module and the first pipe.
S_SedPlateModule := (L_SedPlate - S_SedModulePipes - (L_SedModulePipe - 2*L_SedModulePipeIncrement)/tan(AN_SedPlate))/2
.
# Plate settler support frame
N_SedFrameCrossPipe := max(round((L_SedUpflow - L_SedPlate*cos(AN_SedPlate) + outerradius(ND_SedPlateFrame) - ConRadius(ND_SedPlateFrame))/B_SedPlateFrameCrossEst), 3)
B_SedPlateFrameCross := (L_SedUpflow - L_SedPlate*cos(AN_SedPlate) + outerradius(ND_SedPlateFrame) - ConRadius(ND_SedPlateFrame))/(N_SedFrameCrossPipe - 1)
# Residence time estimate
Vol_SedActiveEst := W_Sed*L_SedUpflow*HW_Sed - W_SedSideSlopes*H_SedSideSlopes*L_SedUpflow
Ti_Sed := Vol_SedActiveEst/Q_Sed
# Inlet manifold air vent
# Addition of the small holes on the top of the inlet manifold to allow air escape. Calcs by dfg42 3/18/15
A_SedAroundPipe := L_SedManifoldPipeActive*20*cm  # Conservatively assuming 10 cm around each side of pipe
V_SedUpPipeMid := Q_SedBay/A_SedAroundPipe  # Velocity of water rising around the pipe
Q_SedAirMin := V_SedUpPipeMid*L_SedManifoldPipeActive*innerdiameter(ND_SedManifold, PS_Default)
# Minimum flow rate of air out the vents
Δh_SedManifold := Z_SedLaunder - Z_SedManifoldPipe
# Pressure expressed as feet of air
D_SedAirVentEst := sqrt(4*Q_SedAirMin/(π*Pi_VenaContractaOrifice*sqrt(2*g*Δh_SedManifold)))
# Orifice equation to estimate vent size
N_SedAirVents :=
    N ← 1
    while D_SedAirVentEst^2/N > D_SedAirVentMax^2
        N ← N + 1
    return N
# Number of air vents
D_AirVentHoles := CeilNearest(D_SedAirVentEst/N_SedAirVents, D_Drill)  # Actual diamter of holes rounded to 16th of an inch (is an 8th better?)
Q_AirVent := Pi_VenaContractaOrifice*π*D_AirVentHoles^2/4*sqrt(2*g*Δh_SedManifold)  # Actual air flow out each vent
V_AirVent := Q_AirVent/(π*D_AirVentHoles^2/4)  # Actual velocity out of the air vent
