# Unit Processes Design
# References
# Fluids Functions
# [reference: FluidsFunctions.xmcd]
# Sedimentation Tank Design
R.h(b, w) := vectorize(w*b/(2*(w + b)))
max_v(ν, k_b, f, w, b, G_max) := vectorize(G_max^(2/3)*(2*ν*b/(k_b + f*b/(4*R.h(w, b))))^(1/3))
Reynolds(v, R_h, ν) := vectorize(v*4*R_h/ν)
friction(R_h, epsilon, Re_max, ReTransition) :=
    for i ∈ 0 .. last(Re_max)
        f[i] ← 1.325/vectorize(ln(epsilon/(4*R_h[i]*3.7) + 5.74/Re_max[i]^0.9))^2 if Re_max[i] ≥ ReTransition
        f[i] ← 64/Re_max[i] otherwise
    f
SedTankDesign(Q_plant, SedTank_width) :=
    n_sedtanks ← 2
    α ← 60 deg
    lamella_spacing ← 5 cm
    L_tank ← 1 m
    v_c ← 15*m/day
    L_lamella ← 2 m
    Q_tank ← Q_plant/n_sedtanks
    L_active ← L_tank - lamella_spacing*cos(α)
    v_up ← v_c*(1 + L_lamella/lamella_spacing*cos(α)*sin(α))
    N_lamella ← L_active/(lamella_spacing/sin(α))
    Length_wall ← L_tank + vectorize(n_sedtanks*L_tank) + 2*SedTank_width*n_sedtanks
    sedtank_dim ← [L_tank; SedTank_width; L_lamella]
    return [sedtank_dim/m, n_sedtanks, lamella_spacing/m]
# Flocculator Design
flocculator(Q_plant, FlocTank_width) :=
    b_old ← [.1; .1; .1]*m
    depth ← 2 m
    G_max ← [15; 45; 75]*1/s
    Gθ_mintot ← 2000
    ν ← 10^-6*m^2/s
    k_b ← 3
    Flow_ratio ← .5
    epsilon ← 1 mm
    ReTransition ← 3000
    b ← [200; 200; 200]*m
    v_max ← Q_plant/(b*FlocTank_width)
    while max(|vectorize((b_old - b)/b)|) > .01
        b_old ← b
        R_h ← R.h(b_old, FlocTank_width)
        Re_max ← Reynolds(v_max, R_h, ν)
        f ← friction(R_h, epsilon, Re_max, ReTransition)
        v_max ← max_v(ν, k_b, f, FlocTank_width, b, G_max)
        area ← Q_plant/v_max
        b ← area/FlocTank_width
    gap ← 1.5*b
    v_min ← Flow_ratio*v_max
    Re_min ← Reynolds(v_min, R_h, ν)
    f_min ← friction(R_h, epsilon, Re_max, ReTransition)
    G_min ← G_max*Flow_ratio^(3/2)
    Gθ_min ← Gθ_mintot*G_min/sum(G_min)
    n ← ceil(vectorize(Gθ_min/G_min*v_min/depth))
    n[0] ← mod(sum(n) + 1, 2) + n[0]
    baffle_length ← depth - gap
    h_lmax ← vectorize(n*vectorize((k_b + vectorize(f*baffle_length/(4*R_h)))*v_max^2/(2*g)))
    h_lmin ← vectorize(n*vectorize((k_b + vectorize(f_min*baffle_length/(4*R_h)))*v_min^2/(2*g)))
    total_hl ← sum(h_lmax)
    d_start ← depth + total_hl
    Length ← vectorize(b*n)
    floc_dim ← [2 m; FlocTank_width; depth]
    baffle_spacing ← b
    floc_inleth ← 1.5 m
    n_baffle ← n
    return [floc_dim/m, baffle_spacing/m, floc_inleth/m, n_baffle]
# Grit Chamber Design
gritchamber(Q_plant) :=
    depth ← 2 m
    width ← 2 m
    length ← 2 m
    gritriser_h ← 2 m
    grit_dim ← [length; width; depth]
    return [gritriser_h/m, grit_dim/m]
# Chemical Feed Design
ChemicalFeed(Q_plant, Dose_Alum, r_drum, h_drum) :=
    t_supply ← 2 day
    Concentration_Alum ← 5*mg/L
    Q_Alum ← r_drum*2*π*h_drum/t_supply
    Alum_TubeD ← 2 cm
    Re_tube ← 5
    return [Q_Alum, Alum_TubeD]
# T.supply is the length of time your supply should last.
#
# I made up values/equations for all of these.
# Unit Processes Function
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UnitProcess(Q_plant, SedTank_width, FlocTank_width, r_drum, h_drum) := [
    SedTankDesign(Q_plant, SedTank_width)[0, 0];
    SedTankDesign(Q_plant, SedTank_width)[0, 1];
    SedTankDesign(Q_plant, SedTank_width)[0, 2];
    flocculator(Q_plant, FlocTank_width)[0, 0];
    flocculator(Q_plant, FlocTank_width)[0, 1];
    flocculator(Q_plant, FlocTank_width)[0, 2];
    flocculator(Q_plant, FlocTank_width)[0, 3];
    gritchamber(Q_plant)[0, 0];
    gritchamber(Q_plant)[0, 1]
]
